# OpenSim document version 40000
ForceSet ThoracoscapularShoulder:
  CoordinateActuator spine_rot_x: coordinate=ground_spine_rot_x optimal_force=1000
  CoordinateActuator spine_rot_y: coordinate=ground_spine_rot_y optimal_force=1000
  CoordinateActuator spine_rot_z: coordinate=ground_spine_rot_z optimal_force=1000
  CoordinateActuator scap_abd: coordinate=scapula_abduction optimal_force=1
  CoordinateActuator scap_elv: coordinate=scapula_elevation optimal_force=1
  CoordinateActuator scap_up_rot: coordinate=scapula_upward_rot optimal_force=1
  CoordinateActuator scap_wing: coordinate=scapula_winging optimal_force=2
  CoordinateActuator plane_elv_res: coordinate=plane_elv optimal_force=1
  CoordinateActuator shoulder_elv_res: coordinate=shoulder_elv optimal_force=1
  CoordinateActuator axial_rot_res: coordinate=axial_rot optimal_force=1
  CoordinateActuator pitch1_reserve: coordinate=pitch1 optimal_force=0.2
  CoordinateActuator pitch2_reserve: coordinate=pitch2 optimal_force=0.2
  CoordinateActuator yaw1_reserve: coordinate=yaw1 optimal_force=0.2
  CoordinateActuator yaw2_reserve: coordinate=yaw2 optimal_force=0.2
  CoordinateActuator roll1_reserve: coordinate=roll1 optimal_force=0.2
  CoordinateActuator roll2_reserve: coordinate=roll2 optimal_force=0.2
  CoordinateActuator ground_spine_tx_res: coordinate=ground_spine_tx optimal_force=100
  CoordinateActuator ground_spine_ty_res: coordinate=ground_spine_ty optimal_force=100
  CoordinateActuator ground_spine_tz_res: coordinate=ground_spine_tz optimal_force=100
