# OpenSim document version 40000
InverseKinematicsTool:
  results_directory: ./
  constraint_weight: Inf
  accuracy: 1e-5
  marker_file: ../ExperimentalDataTRC/Head_movements.trc
  time_range: 12.437 15.776
  report_errors: true
  report_marker_locations: false
  IKTaskSet:
    IKMarkerTask CV7: apply=true weight=1
    IKMarkerTask TV8: apply=true weight=1
    IKMarkerTask SXS: apply=false weight=1
    IKMarkerTask ScapulaThoracicContactPt: apply=false weight=0.01
    IKMarkerTask RCAJ: apply=true weight=0.1
    IKMarkerTask LCAJ: apply=false weight=0.1
    IKMarkerTask AI: apply=false weight=0.01
    IKMarkerTask TS: apply=false weight=0.01
    IKMarkerTask AA: apply=true weight=0.1
    IKMarkerTask GH: apply=true weight=0.1
    IKMarkerTask RHLE: apply=true weight=0.01
    IKMarkerTask RHME: apply=true weight=0.01
    IKMarkerTask centelbow: apply=false weight=0.03
    IKMarkerTask centijc7: apply=false weight=1
    IKMarkerTask centpxt8: apply=false weight=1
    IKMarkerTask SJN: apply=true weight=1
    IKMarkerTask RAH: apply=true weight=0.25
    IKMarkerTask LAH: apply=true weight=0.25
    IKMarkerTask RPH: apply=true weight=0.25
    IKMarkerTask LPH: apply=true weight=0.25
    IKCoordinateTask scapula_upward_rot: apply=true weight=0.5 value_type=manual_value value=0.2094395
