# OpenSim document version 40000
Model ModelOfNeckAndShoulder-scaled:
  gravity: 0 -9.80665 0
  length_units: meters
  force_units: N
  Ground
  BodySet:
    Body spine: mass=0 [kg] mass_center=(0 0 0) inertia=(0 0 0 0 0 0) meshes=tlspine.vtp
    Body thorax: mass=28.84384 mass_center=(-0.08983178 -0.2219356 0) inertia=(0.4218576 0.1795049 0.4218576 0 0 0)
        meshes=thorax.vtp
      WrapEllipsoid Thorax: xyz_body_rotation=(-0.07 -0.0363972 0.21) translation=(-0.032 -0.219098 0.07) quadrant=all
          dimensions=(0.12 0.263183 0.11)
      WrapEllipsoid EllipsoidSurface: translation=(-0.0303999 -0.02583768 0.1050579) quadrant=all
          dimensions=(0.1511227 0.2987015 0.1310514)
      WrapEllipsoid Thor_surf: active=false xyz_body_rotation=(0 -1 0) translation=(-0.078 0 0.085) quadrant=all
          dimensions=(0.122 0.25 0.128)
    Body cerv7: mass=0.494699 mass_center=(-0.0002285376 0.006432578 0)
        inertia=(0.001603242 0.006412966 0.001603242 0 0 0) meshes=rotatedcerv7.vtp
    Body cerv6: mass=0.3847659 mass_center=(0.0002285376 0.00579838 0)
        inertia=(0.001603242 0.006412966 0.001603242 0 0 0) meshes=cerv6.vtp
    Body cerv5: mass=0.3297993 mass_center=(0.0001142688 0.00570778 0)
        inertia=(0.001603242 0.006412966 0.001603242 0 0 0) meshes=cerv5.vtp
    Body cerv4: mass=0.3297993 mass_center=(-0.0003428063 0.006070179 0)
        inertia=(0.001603242 0.006412966 0.001603242 0 0 0) meshes=cerv4.vtp
    Body cerv3: mass=0.3297993 mass_center=(-0.0009141502 0.006432578 0)
        inertia=(0.001603242 0.006412966 0.001603242 0 0 0) meshes=cerv3.vtp
    Body cerv2: mass=0.494699 mass_center=(-0.001142688 0.005345382 0)
        inertia=(0.001603242 0.006412966 0.001603242 0 0 0) meshes=cerv2.vtp
    Body cerv1: mass=0.3847659 mass_center=(0.03565186 0.001721394 0)
        inertia=(0.001603242 0.006412966 0.001603242 0 0 0) meshes=cerv1.vtp
    Body skull: mass=3.166873 mass_center=(0 0.07011833 0) inertia=(0.005226468 0.001606507 0.005636298 0 0 0)
        meshes=skull.vtp
    Body jaw: mass=0.3800247 mass_center=(0 0.05186267 0) inertia=(0.007933978 0.003966989 0.007933978 0 0 0)
        meshes=jaw.vtp
    Body clavicle: mass=0.5674091 mass_center=(-0.01520788 0.008729312 0.0742133)
        inertia=(0.0004751076 0.0004751076 8.699607e-5 -3.717214e-5 -0.000136977 0.0001051847) meshes=clavicle.vtp
      PhysicalOffsetFrame cp_in_clavicle: socket_parent=.. translation=(-0.0400588 0.0277288 0.1644685) [meters]
    Body scapula: mass=1.945916 mass_center=(-0.08033922 -0.04422183 -0.04157618)
        inertia=(0.0003257279 0.0003013337 0.0003257279 0.0001177619 0.0001072224 6.318132e-5) meshes=scapula.vtp
      PhysicalOffsetFrame cp_in_scapula: socket_parent=.. translation=(-0.01993433 0.0001388585 -0.01448498)
      WrapCylinder Subscapuralis: xyz_body_rotation=(0.8 -1.1 1) translation=(-0.035 -0.046 -0.0335) quadrant=-y
          radius=0.0155 length=0.1191625
      WrapCylinder Tmajscapula: xyz_body_rotation=(-1.4854 -0.3354 -0.8754)
          translation=(-0.131181 -0.1340674 -0.04763232) quadrant=-y radius=0.009299277 length=0.06460467
      WrapEllipsoid deltsca: xyz_body_rotation=(1.4823 0.1606 -0.4472)
          translation=(-0.05038637 -0.04216422 -0.04211801) quadrant=all dimensions=(0.05566475 0.09713074 0.03803764)
      WrapCylinder Infra: xyz_body_rotation=(1.8 -0.553 -2.3) translation=(-0.085 -0.055 -0.047) quadrant=-y
          radius=0.026 length=0.135
    Body humerus: mass=1.967308 mass_center=(0.02603312 -0.1484055 -0.01786635)
        inertia=(0.004246938 0.0008830154 0.004246938 -0.0001202471 -8.047865e-5 4.253947e-5) meshes=humerus.vtp
      WrapSphere hhead: translation=(-0.004612738 0.005190502 -0.002802573) quadrant=all radius=0.03215781
      WrapSphere hheadsupraTminor: translation=(-0.00115318 0.00308457 0.00022296) quadrant=all radius=0.02875964
      WrapEllipsoid hheadInfra: xyz_body_rotation=(0.1419 0.13474 0.28117) translation=(0.000144147 0.00105929 -0.0035)
          quadrant=all dimensions=(0.04213686 0.02590082 0.0378414)
    Body ulna: mass=0.6127618 mass_center=(0.01362639 -0.1016379 0.03405895)
        inertia=(0.001764681 0.0003758872 0.001611457 0.0001033119 -2.482551e-5 0.0003560007) meshes=ulna.vtp
      WrapCylinder PQ2: xyz_body_rotation=(1.39138 0.0689405 1.52245) translation=(-0.001682616 -0.2216014 0.0600133)
          quadrant=all radius=0.009776749 length=0.010737
    Body radius: mass=0.6127618 mass_center=(0.04715531 -0.1923229 0.02187401)
        inertia=(0.0001429871 2.888104e-5 1.312508e-5 9.82588e-6 -1.382274e-6 2.092319e-5) meshes=radius.vtp
    Body hand: mass=0.4595713 mass_center=(0.000841308 -0.09586484 -0.05117957)
        inertia=(0.0002082213 6.207191e-5 0.0002082213 0 0 0)
    Body lscapula: mass=1.945916 mass_center=(0 0 0) inertia=(0.08296522 0.08296522 0.04148261 0 0 0)
        meshes=lscapula.vtp
    Body lclavicle: mass=0.5674091 mass_center=(0 0 0) inertia=(0.3478415 0.3478415 0.1739207 0 0 0)
        meshes=lclavicle.vtp
    Body rscapula: mass=1.945916 mass_center=(0 0 0) inertia=(0.08296522 0.08296522 0.04148261 0 0 0)
        meshes=rscapula.vtp
  JointSet:
    CustomJoint ground_spine: socket_parent_frame=ground_offset socket_child_frame=spine_offset
      Coordinate ground_spine_rot_x: default_value=0.01571767 range=(-3.141593 3.141593) clamped=false
      Coordinate ground_spine_rot_y: default_value=-0.0274334 range=(-3.141593 3.141593) clamped=false
      Coordinate ground_spine_rot_z: default_value=-0.03809048 range=(-3.141593 3.141593) clamped=false
      Coordinate ground_spine_tx: default_value=-0.0993223 range=(-3.141593 3.141593) clamped=false
      Coordinate ground_spine_ty: default_value=1.090812 range=(-3.141593 3.141593) clamped=false
      Coordinate ground_spine_tz: default_value=0.5156078 range=(-3.141593 3.141593) clamped=false
      PhysicalOffsetFrame ground_offset: socket_parent=/ground translation=(0 0 0)
      PhysicalOffsetFrame spine_offset: socket_parent=/bodyset/spine translation=(0 0 0)
      SpatialTransform:
        TransformAxis rotation1: coordinates=ground_spine_rot_x axis=(1 0 0) LinearFunction(coefficients=1 0)
        TransformAxis rotation2: coordinates=ground_spine_rot_y axis=(0 1 0) LinearFunction(coefficients=1 0)
        TransformAxis rotation3: coordinates=ground_spine_rot_z axis=(0 0 1) LinearFunction(coefficients=1 0)
        TransformAxis translation1: coordinates=ground_spine_tx axis=(1 0 0) LinearFunction(coefficients=1 0)
        TransformAxis translation2: coordinates=ground_spine_ty axis=(0 1 0) LinearFunction(coefficients=1 0)
        TransformAxis translation3: coordinates=ground_spine_tz axis=(0 0 1) LinearFunction(coefficients=1 0)
    CustomJoint sternoclavicular: socket_parent_frame=thorax_offset socket_child_frame=clavicle_offset
      Coordinate clav_prot: default_value=-0.5309861 range=(-3.141593 3.141593) clamped=true
      Coordinate clav_elev: default_value=0.02025834 range=(-3.141593 3.141593) clamped=true
      PhysicalOffsetFrame thorax_offset: socket_parent=/bodyset/thorax translation=(0.009613964 0.01035002 0.03357791)
      PhysicalOffsetFrame clavicle_offset: socket_parent=/bodyset/clavicle translation=(0 0 0)
      SpatialTransform: axes_held_at_zero=(rotation3 translation1 translation2 translation3)
        TransformAxis rotation1: coordinates=clav_prot axis=(-0.1196586 0.9928151 0) LinearFunction(coefficients=1 0)
        TransformAxis rotation2: coordinates=clav_elev axis=(-0.9719844 0 -0.2350456) LinearFunction(coefficients=1 0)
    ScapulothoracicJoint scapulothoracic: socket_parent_frame=thorax_offset socket_child_frame=scapula_offset
        thoracic_ellipsoid_radii_x_y_z=(0.122 0.25 0.128) scapula_winging_axis_origin=(0 0)
        scapula_winging_axis_direction=0 [radians]
      Coordinate scapula_abduction: default_value=-0.1257876 range=(-3.141593 3.141593) clamped=true
      Coordinate scapula_elevation: default_value=-0.2481589 range=(-3.141593 3.141593) clamped=true
      Coordinate scapula_upward_rot: default_value=0.2067425 range=(-3.141593 3.141593) clamped=true
      Coordinate scapula_winging: default_value=0.3942029 range=(-1.570796 1.570796) clamped=false
      PhysicalOffsetFrame thorax_offset: socket_parent=/bodyset/thorax translation=(-0.078 0 0.085)
          orientation=(0 -1 0) [radians]
      PhysicalOffsetFrame scapula_offset: socket_parent=/bodyset/scapula
          translation=(-0.1235849 -0.04858006 -0.0569596) orientation=(-0.4716752 -0.9972148 -0.3479122)
    CustomJoint GlenoHumeral: socket_parent_frame=scapula_offset socket_child_frame=humerus_offset
      Coordinate plane_elv: default_value=5.880154e-11 default_speed_value=1 range=(-1.5 3.141593) clamped=true
      Coordinate shoulder_elv: default_value=0.6512906 range=(-0.78 2.53) clamped=false
      Coordinate axial_rot: default_value=0.2090303 default_speed_value=1 range=(-2 2) clamped=true
      PhysicalOffsetFrame scapula_offset: socket_parent=/bodyset/scapula
          translation=(-0.03395901 -0.04867981 0.01734128)
      PhysicalOffsetFrame humerus_offset: socket_parent=/bodyset/humerus translation=(0 0 0)
      SpatialTransform: axes_held_at_zero=(translation1 translation2 translation3)
        TransformAxis rotation1: coordinates=plane_elv axis=(0 1 0) LinearFunction(coefficients=1 0)
        TransformAxis rotation2: coordinates=shoulder_elv axis=(-1 0 0) LinearFunction(coefficients=1 0)
        TransformAxis rotation3: coordinates=axial_rot axis=(-0.00677487 0.9982018 0.05955885)
            LinearFunction(coefficients=1 0)
    CustomJoint elbow: socket_parent_frame=humerus_offset socket_child_frame=ulna_offset
      Coordinate elbow_flexion: default_value=5.193488e-24 range=(0 2.268928) clamped=false locked=true
      PhysicalOffsetFrame humerus_offset: socket_parent=/bodyset/humerus
          translation=(0.008793034 -0.3076161 -0.01723577)
      PhysicalOffsetFrame ulna_offset: socket_parent=/bodyset/ulna translation=(0 0 0)
      SpatialTransform: axes_held_at_zero=(rotation1 rotation2 translation1 translation2 translation3)
        TransformAxis rotation3: coordinates=elbow_flexion axis=(0.04940001 0.03660001 0.9981083)
            LinearFunction(coefficients=1 0)
    CustomJoint radioulnar: socket_parent_frame=ulna_offset socket_child_frame=radius_offset
      Coordinate pro_sup: default_value=0.598997 range=(-1.570796 1.570796) clamped=false locked=true
      PhysicalOffsetFrame ulna_offset: socket_parent=/bodyset/ulna translation=(0.000560872 -0.0121849 0.0280422)
      PhysicalOffsetFrame radius_offset: socket_parent=/bodyset/radius translation=(0 0 0)
      SpatialTransform: axes_held_at_zero=(rotation1 rotation3 translation1 translation2 translation3)
        TransformAxis rotation2: coordinates=pro_sup axis=(-0.01716099 0.9926656 -0.119668)
            LinearFunction(coefficients=1 0)
    WeldJoint rc: socket_parent_frame=radius_offset socket_child_frame=hand_offset
      PhysicalOffsetFrame radius_offset: socket_parent=/bodyset/radius translation=(0.02523924 -0.2563458 0.0350545)
      PhysicalOffsetFrame hand_offset: socket_parent=/bodyset/hand translation=(0 0 0)
    WeldJoint lscapulajnt: socket_parent_frame=spine_offset socket_child_frame=lscapula_offset
      PhysicalOffsetFrame spine_offset: socket_parent=/bodyset/spine translation=(-0.064 0.467 -0.164)
          orientation=(-0.09 -0.05 0.05)
      PhysicalOffsetFrame lscapula_offset: socket_parent=/bodyset/lscapula translation=(0 0 0)
    CustomJoint lclaviclejnt: socket_parent_frame=thorax_offset socket_child_frame=clavicle_offset
      Coordinate clav_prot_l: default_value=0.5309861 range=(-3.141593 3.141593) clamped=true locked=true
      Coordinate clav_elev_l: default_value=-0.02025834 range=(-3.141593 3.141593) clamped=true locked=true
      PhysicalOffsetFrame thorax_offset: socket_parent=/bodyset/thorax translation=(0.009613964 0.01035002 -0.03357791)
      PhysicalOffsetFrame clavicle_offset: socket_parent=/bodyset/lclavicle
          translation=(0.007166891 -0.001411593 -0.00449842) orientation=(0.04247197 0.1797628 0.007128011)
      SpatialTransform: axes_held_at_zero=(rotation3 translation1 translation2 translation3)
        TransformAxis rotation1: coordinates=clav_prot_l axis=(-0.1196586 0.9928151 0) LinearFunction(coefficients=1 0)
        TransformAxis rotation2: coordinates=clav_elev_l axis=(-0.9719844 0 0.2350456) LinearFunction(coefficients=1 0)
    CustomJoint auxt1jnt: socket_parent_frame=spine_offset socket_child_frame=cerv7_offset
      Coordinate pitch2: default_value=0.06802407 range=(-0.5759587 0.837758) clamped=true
      Coordinate roll2: default_value=0.001591337 range=(-0.5759587 0.5759587) clamped=true
      Coordinate yaw2: default_value=-0.01691515 range=(-0.4712389 0.4712389) clamped=true
      PhysicalOffsetFrame spine_offset: socket_parent=/bodyset/spine translation=(-0.05427767 0.4785568 0)
      PhysicalOffsetFrame cerv7_offset: socket_parent=/bodyset/cerv7 translation=(0.007815984 -0.005123412 0)
      SpatialTransform: axes_held_at_zero=(translation1 translation2 translation3)
        TransformAxis rotation1: coordinates=pitch2 axis=(0 0 1)
          SimmSpline: x=(-1.74533 1.74533) y=(-0.172788 0.172788)
        TransformAxis rotation2: coordinates=roll2 axis=(1 0 0)
          SimmSpline: x=(-1.74533 1.74533) y=(-0.136136 0.136136)
        TransformAxis rotation3: coordinates=yaw2 axis=(0 1 0)
          SimmSpline: x=(-1.74533 1.74533) y=(-0.109956 0.109956)
    CustomJoint aux7jnt: socket_parent_frame=cerv7_offset socket_child_frame=cerv6_offset
      Coordinate aux7jnt_r3: default_value=0.01272051 range=(-99999.9 99999.9) clamped=false
      Coordinate aux7jnt_r1: default_value=0.000218013 range=(-99999.9 99999.9) clamped=false
      Coordinate aux7jnt_r2: default_value=-0.003180049 range=(-99999.9 99999.9) clamped=false
      PhysicalOffsetFrame cerv7_offset: socket_parent=/bodyset/cerv7 translation=(0.01514747 0.01121624 0)
      PhysicalOffsetFrame cerv6_offset: socket_parent=/bodyset/cerv6 translation=(0.01076298 -0.003682877 0)
      SpatialTransform: axes_held_at_zero=(translation1 translation2 translation3)
        TransformAxis rotation1: coordinates=aux7jnt_r3 axis=(0 0 1) LinearFunction(coefficients=1 0)
        TransformAxis rotation2: coordinates=aux7jnt_r1 axis=(1 0 0) LinearFunction(coefficients=1 0)
        TransformAxis rotation3: coordinates=aux7jnt_r2 axis=(0 1 0) LinearFunction(coefficients=1 0)
    CustomJoint aux6jnt: socket_parent_frame=cerv6_offset socket_child_frame=cerv5_offset
      Coordinate aux6jnt_r3: default_value=0.01496527 range=(-99999.9 99999.9) clamped=false
      Coordinate aux6jnt_r1: default_value=0.0002498401 range=(-99999.9 99999.9) clamped=false
      Coordinate aux6jnt_r2: default_value=-0.003704416 range=(-99999.9 99999.9) clamped=false
      PhysicalOffsetFrame cerv6_offset: socket_parent=/bodyset/cerv6 translation=(0.01125547 0.00883347 0)
      PhysicalOffsetFrame cerv5_offset: socket_parent=/bodyset/cerv5 translation=(0.00647904 -0.007383875 0)
      SpatialTransform: axes_held_at_zero=(translation1 translation2 translation3)
        TransformAxis rotation1: coordinates=aux6jnt_r3 axis=(0 0 1) LinearFunction(coefficients=1 0)
        TransformAxis rotation2: coordinates=aux6jnt_r1 axis=(1 0 0) LinearFunction(coefficients=1 0)
        TransformAxis rotation3: coordinates=aux6jnt_r2 axis=(0 1 0) LinearFunction(coefficients=1 0)
    CustomJoint aux5jnt: socket_parent_frame=cerv5_offset socket_child_frame=cerv4_offset
      Coordinate aux5jnt_r3: default_value=0.01496527 range=(-99999.9 99999.9) clamped=false
      Coordinate aux5jnt_r1: default_value=0.0003437285 range=(-99999.9 99999.9) clamped=false
      Coordinate aux5jnt_r2: default_value=-0.003704416 range=(-99999.9 99999.9) clamped=false
      PhysicalOffsetFrame cerv5_offset: socket_parent=/bodyset/cerv5 translation=(0.009632858 0.006749677 0)
      PhysicalOffsetFrame cerv4_offset: socket_parent=/bodyset/cerv4 translation=(0.005736293 -0.01061828 0)
      SpatialTransform: axes_held_at_zero=(translation1 translation2 translation3)
        TransformAxis rotation1: coordinates=aux5jnt_r3 axis=(0 0 1) LinearFunction(coefficients=1 0)
        TransformAxis rotation2: coordinates=aux5jnt_r1 axis=(1 0 0) LinearFunction(coefficients=1 0)
        TransformAxis rotation3: coordinates=aux5jnt_r2 axis=(0 1 0) LinearFunction(coefficients=1 0)
    CustomJoint aux4jnt: socket_parent_frame=cerv4_offset socket_child_frame=cerv3_offset
      Coordinate aux4jnt_r3: default_value=0.01122395 range=(-99999.9 99999.9) clamped=false
      Coordinate aux4jnt_r1: default_value=0.0003437285 range=(-99999.9 99999.9) clamped=false
      Coordinate aux4jnt_r2: default_value=-0.003704416 range=(-99999.9 99999.9) clamped=false
      PhysicalOffsetFrame cerv4_offset: socket_parent=/bodyset/cerv4 translation=(0.008364475 0.00578026 0)
      PhysicalOffsetFrame cerv3_offset: socket_parent=/bodyset/cerv3 translation=(0.005382059 -0.008172092 0)
      SpatialTransform: axes_held_at_zero=(translation1 translation2 translation3)
        TransformAxis rotation1: coordinates=aux4jnt_r3 axis=(0 0 1) LinearFunction(coefficients=1 0)
        TransformAxis rotation2: coordinates=aux4jnt_r1 axis=(1 0 0) LinearFunction(coefficients=1 0)
        TransformAxis rotation3: coordinates=aux4jnt_r2 axis=(0 1 0) LinearFunction(coefficients=1 0)
    CustomJoint aux3jnt: socket_parent_frame=cerv3_offset socket_child_frame=cerv2_offset
      Coordinate aux3jnt_r3: default_value=0.007482636 range=(-99999.9 99999.9) clamped=false
      Coordinate aux3jnt_r1: default_value=0.0003119023 range=(-99999.9 99999.9) clamped=false
      Coordinate aux3jnt_r2: default_value=-0.001590024 range=(-99999.9 99999.9) clamped=false
      PhysicalOffsetFrame cerv3_offset: socket_parent=/bodyset/cerv3 translation=(0.005999111 0.004584344 0)
      PhysicalOffsetFrame cerv2_offset: socket_parent=/bodyset/cerv2 translation=(0.006204795 -0.01017435 0)
      SpatialTransform: axes_held_at_zero=(translation1 translation2 translation3)
        TransformAxis rotation1: coordinates=aux3jnt_r3 axis=(0 0 1) LinearFunction(coefficients=1 0)
        TransformAxis rotation2: coordinates=aux3jnt_r1 axis=(1 0 0) LinearFunction(coefficients=1 0)
        TransformAxis rotation3: coordinates=aux3jnt_r2 axis=(0 1 0) LinearFunction(coefficients=1 0)
    CustomJoint aux2jnt: socket_parent_frame=cerv2_offset socket_child_frame=cerv1_offset
      Coordinate pitch1: default_value=-0.2137527 range=(-0.2792527 0.418879) clamped=true
      Coordinate roll1: default_value=-0.002670698 range=(-0.1047198 0.1047198) clamped=true
      Coordinate yaw1: default_value=-0.0171994 range=(-0.6632251 0.6632251) clamped=true
      PhysicalOffsetFrame cerv2_offset: socket_parent=/bodyset/cerv2 translation=(0.007873119 0.01927961 0)
      PhysicalOffsetFrame cerv1_offset: socket_parent=/bodyset/cerv1 translation=(0.0485071 0.003189109 0)
      SpatialTransform: axes_held_at_zero=(translation1 translation2 translation3)
        TransformAxis rotation1: coordinates=pitch1 axis=(0 0 1)
          SimmSpline: x=(-1.74533 1.74533) y=(-0.774926 0.774926)
        TransformAxis rotation2: coordinates=roll1 axis=(1 0 0)
          SimmSpline: x=(-1.74533 1.74533) y=(-0.872665 0.872665)
        TransformAxis rotation3: coordinates=yaw1 axis=(0 1 0)
          SimmSpline: x=(-1.74533 1.74533) y=(-1.5516 1.5516)
    CustomJoint aux1jnt: socket_parent_frame=cerv1_offset socket_child_frame=skull_offset
      Coordinate aux1jnt_r3: default_value=-0.1188464 range=(-99999.9 99999.9) clamped=false
      Coordinate aux1jnt_r1: default_value=-0.001335349 range=(-99999.9 99999.9) clamped=false
      Coordinate aux1jnt_r2: default_value=-0.001909138 range=(-99999.9 99999.9) clamped=false
      PhysicalOffsetFrame cerv1_offset: socket_parent=/bodyset/cerv1 translation=(0.04953552 0.01351747 0)
      PhysicalOffsetFrame skull_offset: socket_parent=/bodyset/skull translation=(0 0 0)
      SpatialTransform: axes_held_at_zero=(translation1 translation2 translation3)
        TransformAxis rotation1: coordinates=aux1jnt_r3 axis=(0 0 1) LinearFunction(coefficients=1 0)
        TransformAxis rotation2: coordinates=aux1jnt_r1 axis=(1 0 0) LinearFunction(coefficients=1 0)
        TransformAxis rotation3: coordinates=aux1jnt_r2 axis=(0 1 0) LinearFunction(coefficients=1 0)
    WeldJoint jawjnt: socket_parent_frame=skull_offset socket_child_frame=jaw_offset
      PhysicalOffsetFrame skull_offset: socket_parent=/bodyset/skull translation=(0 0 0)
      PhysicalOffsetFrame jaw_offset: socket_parent=/bodyset/jaw translation=(0 0 0)
    WeldJoint thorax_spine: socket_parent_frame=spine_offset socket_child_frame=thorax_offset
      PhysicalOffsetFrame thorax_offset: socket_parent=/bodyset/thorax translation=(-0.1689571 -0.4397342 0)
      PhysicalOffsetFrame spine_offset: socket_parent=/bodyset/spine translation=(-0.1468081 -0.01064101 0)
    WeldJoint rscapulajnt: socket_parent_frame=spine_offset socket_child_frame=rscapula_offset
      PhysicalOffsetFrame spine_offset: socket_parent=/bodyset/spine translation=(-0.064 0.467 0.164)
          orientation=(0.09 0.05 0.05)
      PhysicalOffsetFrame rscapula_offset: socket_parent=/bodyset/rscapula translation=(0 0 0)
  ConstraintSet:
    PointConstraint AC: socket_body_1=/bodyset/clavicle socket_body_2=/bodyset/scapula
        location_body_1=(-0.0364237 0.0261219 0.160514) location_body_2=(-0.0134962 -0.000501906 -0.0138542)
    CoordinateCouplerConstraint aux7jnt_r1_con: independent_coordinate_names=roll2 dependent_coordinate_name=aux7jnt_r1
      coupled_coordinates_function: SimmSpline: x=(-1.74533 1.74533) y=(-0.23911 0.23911)
    CoordinateCouplerConstraint aux7jnt_r2_con: independent_coordinate_names=yaw2 dependent_coordinate_name=aux7jnt_r2
      coupled_coordinates_function: SimmSpline: x=(-1.74533 1.74533) y=(-0.328122 0.328122)
    CoordinateCouplerConstraint aux7jnt_r3_con: independent_coordinate_names=pitch2
        dependent_coordinate_name=aux7jnt_r3
      coupled_coordinates_function: SimmSpline: x=(-1.74533 1.74533) y=(-0.326377 0.326377)
    CoordinateCouplerConstraint aux6jnt_r1_con: independent_coordinate_names=roll2 dependent_coordinate_name=aux6jnt_r1
      coupled_coordinates_function: SimmSpline: x=(-1.74533 1.74533) y=(-0.274017 0.274017)
    CoordinateCouplerConstraint aux6jnt_r2_con: independent_coordinate_names=yaw2 dependent_coordinate_name=aux6jnt_r2
      coupled_coordinates_function: SimmSpline: x=(-1.74533 1.74533) y=(-0.382227 0.382227)
    CoordinateCouplerConstraint aux6jnt_r3_con: independent_coordinate_names=pitch2
        dependent_coordinate_name=aux6jnt_r3
      coupled_coordinates_function: SimmSpline: x=(-1.74533 1.74533) y=(-0.383972 0.383972)
    CoordinateCouplerConstraint aux5jnt_r1_con: independent_coordinate_names=roll2 dependent_coordinate_name=aux5jnt_r1
      coupled_coordinates_function: SimmSpline: x=(-1.74533 1.74533) y=(-0.376991 0.376991)
    CoordinateCouplerConstraint aux5jnt_r2_con: independent_coordinate_names=yaw2 dependent_coordinate_name=aux5jnt_r2
      coupled_coordinates_function: SimmSpline: x=(-1.74533 1.74533) y=(-0.382227 0.382227)
    CoordinateCouplerConstraint aux5jnt_r3_con: independent_coordinate_names=pitch2
        dependent_coordinate_name=aux5jnt_r3
      coupled_coordinates_function: SimmSpline: x=(-1.74533 1.74533) y=(-0.383972 0.383972)
    CoordinateCouplerConstraint aux4jnt_r1_con: independent_coordinate_names=roll2 dependent_coordinate_name=aux4jnt_r1
      coupled_coordinates_function: SimmSpline: x=(-1.74533 1.74533) y=(-0.376991 0.376991)
    CoordinateCouplerConstraint aux4jnt_r2_con: independent_coordinate_names=yaw2 dependent_coordinate_name=aux4jnt_r2
      coupled_coordinates_function: SimmSpline: x=(-1.74533 1.74533) y=(-0.382227 0.382227)
    CoordinateCouplerConstraint aux4jnt_r3_con: independent_coordinate_names=pitch2
        dependent_coordinate_name=aux4jnt_r3
      coupled_coordinates_function: SimmSpline: x=(-1.74533 1.74533) y=(-0.287979 0.287979)
    CoordinateCouplerConstraint aux3jnt_r1_con: independent_coordinate_names=roll2 dependent_coordinate_name=aux3jnt_r1
      coupled_coordinates_function: SimmSpline: x=(-1.74533 1.74533) y=(-0.342085 0.342085)
    CoordinateCouplerConstraint aux3jnt_r2_con: independent_coordinate_names=yaw2 dependent_coordinate_name=aux3jnt_r2
      coupled_coordinates_function: SimmSpline: x=(-1.74533 1.74533) y=(-0.164061 0.164061)
    CoordinateCouplerConstraint aux3jnt_r3_con: independent_coordinate_names=pitch2
        dependent_coordinate_name=aux3jnt_r3
      coupled_coordinates_function: SimmSpline: x=(-1.74533 1.74533) y=(-0.191986 0.191986)
    CoordinateCouplerConstraint aux1jnt_r1_con: independent_coordinate_names=roll1 dependent_coordinate_name=aux1jnt_r1
      coupled_coordinates_function: SimmSpline: x=(-1.74533 1.74533) y=(-0.872665 0.872665)
    CoordinateCouplerConstraint aux1jnt_r2_con: independent_coordinate_names=yaw1 dependent_coordinate_name=aux1jnt_r2
      coupled_coordinates_function: SimmSpline: x=(-1.74533 1.74533) y=(-0.193732 0.193732)
    CoordinateCouplerConstraint aux1jnt_r3_con: independent_coordinate_names=pitch1
        dependent_coordinate_name=aux1jnt_r3
      coupled_coordinates_function: SimmSpline: x=(-1.74533 1.74533) y=(-0.970403 0.970403)
  ForceSet:
    Millard2012EquilibriumMuscle [values shared by the 41 below unless stated]:
      FiberForceLengthCurve
      TendonForceLengthCurve
    Millard2012EquilibriumMuscle TrapeziusScapula_M: optimal_force=1 max_isometric_force=470.4
        optimal_fiber_length=0.09747245 tendon_slack_length=0.0374894 pennation_angle_at_optimal=0 [radians]
        max_contraction_velocity=10 ignore_tendon_compliance=true activation_time_constant=0.01 [seconds]
        deactivation_time_constant=0.04 [seconds] minimum_activation=0.01
      PathPoint TrapeziusScapula5-P1: thorax (-0.1284239 -0.0005534044 -0.002329469)
      PathPoint TrapeziusScapula5-P2: scapula (-0.08556406 -0.002470034 -0.03454287)
      PathWrap: wrap_object=Thorax method=hybrid
      ActiveForceLengthCurve: minimum_value=0
      ForceVelocityCurve: concentric_slope_at_vmax=0 concentric_slope_near_vmax=0.25 isometric_slope=5
          eccentric_slope_at_vmax=0 eccentric_slope_near_vmax=0.15 max_eccentric_velocity_force_multiplier=1.4
    Millard2012EquilibriumMuscle TrapeziusScapula_I: optimal_force=1 max_isometric_force=414.4
        optimal_fiber_length=0.1753974 tendon_slack_length=0.04856733 pennation_angle_at_optimal=0
        max_contraction_velocity=10 ignore_tendon_compliance=true activation_time_constant=0.01
        deactivation_time_constant=0.04 minimum_activation=0.01
      PathPoint TrapeziusScapula10-P1: thorax (-0.1544619 -0.2009822 0.001516376)
      PathPoint TrapeziusScapula10-P2: scapula (-0.111232 -0.01192969 -0.07025059)
      PathWrap: wrap_object=Thorax method=hybrid
      ActiveForceLengthCurve: minimum_value=0
      ForceVelocityCurve: concentric_slope_at_vmax=0 concentric_slope_near_vmax=0.25 isometric_slope=5
          eccentric_slope_at_vmax=0 eccentric_slope_near_vmax=0.15 max_eccentric_velocity_force_multiplier=1.4
    Millard2012EquilibriumMuscle SerratusAnterior_I: optimal_force=1 max_isometric_force=430
        optimal_fiber_length=0.1924141 tendon_slack_length=0 pennation_angle_at_optimal=0 max_contraction_velocity=10
        ignore_tendon_compliance=true activation_time_constant=0.01 deactivation_time_constant=0.04
        minimum_activation=0.01
      PathPoint SerratusAnterior4-P1: scapula (-0.1668046 -0.1416451 -0.08133487)
      PathPoint SerratusAnterior4-P2: thorax (-0.0008154837 -0.2546363 0.1954789)
      PathWrap: wrap_object=Thorax method=midpoint
      ActiveForceLengthCurve: minimum_value=0
      ForceVelocityCurve: concentric_slope_at_vmax=0 concentric_slope_near_vmax=0.25 isometric_slope=5
          eccentric_slope_at_vmax=0 eccentric_slope_near_vmax=0.15 max_eccentric_velocity_force_multiplier=1.4
    Millard2012EquilibriumMuscle SerratusAnterior_M: optimal_force=1 max_isometric_force=508
        optimal_fiber_length=0.1634499 tendon_slack_length=0.01275292 pennation_angle_at_optimal=0
        max_contraction_velocity=10 ignore_tendon_compliance=true activation_time_constant=0.01
        deactivation_time_constant=0.04 minimum_activation=0.01
      PathPoint SerratusAnterior7-P1: scapula (-0.151481 -0.1048806 -0.0937735)
      PathPoint SerratusAnterior7-P2: thorax (0.02537192 -0.113919 0.1512889)
      PathWrap: wrap_object=Thorax method=hybrid
      ActiveForceLengthCurve: minimum_value=0
      ForceVelocityCurve: concentric_slope_at_vmax=0 concentric_slope_near_vmax=0.25 isometric_slope=5
          eccentric_slope_at_vmax=0 eccentric_slope_near_vmax=0.15 max_eccentric_velocity_force_multiplier=1.4
    Millard2012EquilibriumMuscle SerratusAnterior_S: optimal_force=1 max_isometric_force=387.8
        optimal_fiber_length=0.09635547 tendon_slack_length=0 pennation_angle_at_optimal=0 max_contraction_velocity=10
        ignore_tendon_compliance=true activation_time_constant=0.01 deactivation_time_constant=0.04
        minimum_activation=0.01
      PathPoint SerratusAnterior12-P1: scapula (-0.07126075 0.01136161 -0.0804996)
      PathPoint SerratusAnterior12-P2: thorax (-0.04326112 -0.02169816 0.1310012)
      PathWrap: wrap_object=Thorax method=hybrid
      ActiveForceLengthCurve: minimum_value=0
      ForceVelocityCurve: concentric_slope_at_vmax=0 concentric_slope_near_vmax=0.25 isometric_slope=5
          eccentric_slope_at_vmax=0 eccentric_slope_near_vmax=0.15 max_eccentric_velocity_force_multiplier=1.4
    Millard2012EquilibriumMuscle Rhomboideus_S: optimal_force=1 max_isometric_force=200.2
        optimal_fiber_length=0.1387254 tendon_slack_length=0.02110427 pennation_angle_at_optimal=0
        max_contraction_velocity=10 activation_time_constant=0.01 deactivation_time_constant=0.04
        minimum_activation=0.01
      PathPoint Rhomboideus1-P1: thorax (-0.1114156 0.06000923 -0.002689912)
      PathPoint Rhomboideus1-P2: scapula (-0.1214415 -0.02892158 -0.09675711)
      PathWrap: wrap_object=Thorax method=hybrid
      ActiveForceLengthCurve: minimum_value=0
      ForceVelocityCurve: concentric_slope_at_vmax=0 concentric_slope_near_vmax=0.25 isometric_slope=5
          eccentric_slope_at_vmax=0 eccentric_slope_near_vmax=0.15 max_eccentric_velocity_force_multiplier=1.4
    Millard2012EquilibriumMuscle Rhomboideus_I: optimal_force=1 max_isometric_force=407.4
        optimal_fiber_length=0.1596209 tendon_slack_length=0.03879675 pennation_angle_at_optimal=0
        max_contraction_velocity=10 activation_time_constant=0.01 deactivation_time_constant=0.04
        minimum_activation=0.01
      PathPoint Rhomboideus4-P1: thorax (-0.1378027 -0.01384483 -0.0006724799)
      PathPoint Rhomboideus4-P2: scapula (-0.15609 -0.1347087 -0.08818854)
      PathWrap: wrap_object=Thorax method=hybrid
      ActiveForceLengthCurve: minimum_value=0
      ForceVelocityCurve: concentric_slope_at_vmax=0 concentric_slope_near_vmax=0.25 isometric_slope=5
          eccentric_slope_at_vmax=0 eccentric_slope_near_vmax=0.15 max_eccentric_velocity_force_multiplier=1.4
    Millard2012EquilibriumMuscle Coracobrachialis: optimal_force=1 max_isometric_force=648.2
        optimal_fiber_length=0.07185389 tendon_slack_length=0.1094115 pennation_angle_at_optimal=0
        max_contraction_velocity=10 ignore_tendon_compliance=true activation_time_constant=0.01
        deactivation_time_constant=0.04 minimum_activation=0.01
      PathPoint Coracobrachialis2-P1: scapula (0.01214601 -0.05356751 -0.02671721)
      PathPoint Coracobrachialis2-P2: humerus (-0.003329828 -0.1535962 -0.01307401)
      ActiveForceLengthCurve: minimum_value=0
      ForceVelocityCurve: concentric_slope_at_vmax=0 concentric_slope_near_vmax=0.25 isometric_slope=5
          eccentric_slope_at_vmax=0 eccentric_slope_near_vmax=0.15 max_eccentric_velocity_force_multiplier=1.4
    Millard2012EquilibriumMuscle DeltoideusClavicle_A: optimal_force=1 max_isometric_force=707.7
        optimal_fiber_length=0.09773943 tendon_slack_length=0.09150074 pennation_angle_at_optimal=0.08726646
        max_contraction_velocity=10 activation_time_constant=0.01 deactivation_time_constant=0.04
        minimum_activation=0.01
      PathPoint DeltoideusClavicle2-P1: clavicle (-0.03118461 0.02670303 0.1152074)
      PathPoint DeltoideusClavicle2-P2: scapula (0.02873691 -0.008315207 0.009889058)
      PathPoint DeltoideusClavicle2-P3: humerus (0.009576705 -0.1163145 0.001607872)
      PathWrap: wrap_object=deltsca method=hybrid
      ActiveForceLengthCurve: minimum_value=0
      ForceVelocityCurve: concentric_slope_at_vmax=0 concentric_slope_near_vmax=0.25 isometric_slope=5
          eccentric_slope_at_vmax=0 eccentric_slope_near_vmax=0.15 max_eccentric_velocity_force_multiplier=1.4
    Millard2012EquilibriumMuscle DeltoideusScapula_P: optimal_force=1 max_isometric_force=1324.4
        optimal_fiber_length=0.1086744 tendon_slack_length=0.08703116 pennation_angle_at_optimal=0.08726646
        max_contraction_velocity=10 activation_time_constant=0.01 deactivation_time_constant=0.04
        minimum_activation=0.01
      PathPoint DeltoideusScapulaPost2-P1: scapula (-0.08481645 -0.008724847 -0.02589748)
      PathPoint DeltoideusScapulaPost2-P2: scapula (-0.08079903 -0.04085708 0.006993019)
      PathPoint DeltoideusScapulaPost2-P3: humerus (-0.006869967 -0.09127023 0.008742781)
      PathWrap: wrap_object=deltsca method=hybrid
      ActiveForceLengthCurve: minimum_value=0
      ForceVelocityCurve: concentric_slope_at_vmax=0 concentric_slope_near_vmax=0.25 isometric_slope=5
          eccentric_slope_at_vmax=0 eccentric_slope_near_vmax=0.15 max_eccentric_velocity_force_multiplier=1.4
    Millard2012EquilibriumMuscle DeltoideusScapula_M: optimal_force=1 max_isometric_force=2597.8
        optimal_fiber_length=0.08313236 tendon_slack_length=0.07112929 pennation_angle_at_optimal=0.08726646
        max_contraction_velocity=10 activation_time_constant=0.01 deactivation_time_constant=0.04
        minimum_activation=0.01
      PathPoint DeltoideusScapulaLat10-P1: scapula (-0.02353367 0.002567663 0.007416423)
      PathPoint DeltoideusScapulaLat10-P2: scapula (-0.007547474 -0.008509784 0.02951106)
      PathPoint DeltoideusScapulaLat10-P3: humerus (-0.006216764 -0.1064098 0.005388729)
      PathWrap: wrap_object=deltsca method=hybrid
      ActiveForceLengthCurve: minimum_value=0
      ForceVelocityCurve: concentric_slope_at_vmax=0 concentric_slope_near_vmax=0.25 isometric_slope=5
          eccentric_slope_at_vmax=0 eccentric_slope_near_vmax=0.15 max_eccentric_velocity_force_multiplier=1.4
    Millard2012EquilibriumMuscle TeresMajor: optimal_force=1 max_isometric_force=851.2 optimal_fiber_length=0.1871236
        tendon_slack_length=0.007962707 pennation_angle_at_optimal=0 max_contraction_velocity=10
        ignore_tendon_compliance=true activation_time_constant=0.01 deactivation_time_constant=0.04
        minimum_activation=0.01
      PathPoint TeresMajor1-P1: scapula (-0.1533766 -0.1482194 -0.06856777)
      PathPoint TeresMajor1-P2: humerus (0.006227201 -0.04131213 -0.002382199)
      PathWrap: wrap_object=Thorax method=hybrid
      PathWrap pathwrap_0: wrap_object=Tmajscapula method=hybrid
      ActiveForceLengthCurve: minimum_value=0
      ForceVelocityCurve: concentric_slope_at_vmax=0 concentric_slope_near_vmax=0.25 isometric_slope=5
          eccentric_slope_at_vmax=0 eccentric_slope_near_vmax=0.15 max_eccentric_velocity_force_multiplier=1.4
    Millard2012EquilibriumMuscle Infraspinatus_I: optimal_force=1 max_isometric_force=1037.4
        optimal_fiber_length=0.08300153 tendon_slack_length=0.1029857 pennation_angle_at_optimal=0
        max_contraction_velocity=10 activation_time_constant=0.01 deactivation_time_constant=0.04
        minimum_activation=0.01
      PathPoint Infraspinatus3-P1: scapula (-0.1455331 -0.1020651 -0.07728609)
      PathPoint Infraspinatus3-P2: humerus (-0.02473873 -0.00606967 0.03476212)
      PathWrap: wrap_object=Infra method=hybrid
      PathWrap pathwrap_0: wrap_object=hheadInfra method=hybrid
      ActiveForceLengthCurve: minimum_value=0
      ForceVelocityCurve: concentric_slope_at_vmax=0 concentric_slope_near_vmax=0.25 isometric_slope=5
          eccentric_slope_at_vmax=0 eccentric_slope_near_vmax=0.15 max_eccentric_velocity_force_multiplier=1.4
    Millard2012EquilibriumMuscle Infraspinatus_S: optimal_force=1 max_isometric_force=967.4
        optimal_fiber_length=0.08295105 tendon_slack_length=0.05942052 pennation_angle_at_optimal=0
        max_contraction_velocity=10 activation_time_constant=0.01 deactivation_time_constant=0.04
        minimum_activation=0.01
      PathPoint Infraspinatus5-P1: scapula (-0.1225579 -0.04073766 -0.08262936)
      PathPoint Infraspinatus5-P2: humerus (-0.02066162 0.002880272 0.03111432)
      PathWrap: wrap_object=Infra method=hybrid
      PathWrap pathwrap_0: wrap_object=hheadInfra method=hybrid
      ActiveForceLengthCurve: minimum_value=0
      ForceVelocityCurve: concentric_slope_at_vmax=0 concentric_slope_near_vmax=0.25 isometric_slope=5
          eccentric_slope_at_vmax=0 eccentric_slope_near_vmax=0.15 max_eccentric_velocity_force_multiplier=1.4
    Millard2012EquilibriumMuscle TeresMinor: optimal_force=1 max_isometric_force=695.8 optimal_fiber_length=0.07187262
        tendon_slack_length=0.06664552 pennation_angle_at_optimal=0 max_contraction_velocity=10
        activation_time_constant=0.01 deactivation_time_constant=0.04 minimum_activation=0.01
      PathPoint TeresMinor2-P1: scapula (-0.1239387 -0.08338157 -0.04021652)
      PathPoint TeresMinor2-P2: humerus (-0.0228763 -0.009914913 0.01520389)
      PathWrap: wrap_object=hheadsupraTminor method=hybrid
      ActiveForceLengthCurve: minimum_value=0
      ForceVelocityCurve: concentric_slope_at_vmax=0 concentric_slope_near_vmax=0.25 isometric_slope=5
          eccentric_slope_at_vmax=0 eccentric_slope_near_vmax=0.15 max_eccentric_velocity_force_multiplier=1.4
    Millard2012EquilibriumMuscle Subscapularis_S: optimal_force=1 max_isometric_force=540.4
        optimal_fiber_length=0.07538889 tendon_slack_length=0.065798 pennation_angle_at_optimal=0.08726646
        max_contraction_velocity=10 activation_time_constant=0.01 deactivation_time_constant=0.04
        minimum_activation=0.01
      PathPoint Subscapularis3-P1: scapula (-0.1157418 -0.0394752 -0.08585238)
      PathPoint Subscapularis3-P2: humerus (0.02594678 -0.0002436363 -0.01681538)
      PathWrap: wrap_object=Subscapuralis method=hybrid
      PathWrap pathwrap_0: wrap_object=hhead method=hybrid
      ActiveForceLengthCurve: minimum_value=0
      ForceVelocityCurve: concentric_slope_at_vmax=0 concentric_slope_near_vmax=0.25 isometric_slope=5
          eccentric_slope_at_vmax=0 eccentric_slope_near_vmax=0.15 max_eccentric_velocity_force_multiplier=1.4
    Millard2012EquilibriumMuscle Subscapularis_M: optimal_force=1 max_isometric_force=609
        optimal_fiber_length=0.08281206 tendon_slack_length=0.06121859 pennation_angle_at_optimal=0.08726646
        max_contraction_velocity=10 activation_time_constant=0.01 deactivation_time_constant=0.04
        minimum_activation=0.01
      PathPoint Subscapularis4-P1: scapula (-0.1227636 -0.06931841 -0.07108724)
      PathPoint P2: scapula (-0.05151554 -0.06682541 -0.03917153)
      PathPoint Subscapularis4-P2: humerus (0.02003185 -0.001127902 -0.02436501)
      PathWrap: wrap_object=Subscapuralis method=hybrid
      PathWrap pathwrap_0: wrap_object=hhead method=hybrid
      ActiveForceLengthCurve: minimum_value=0
      ForceVelocityCurve: concentric_slope_at_vmax=0 concentric_slope_near_vmax=0.25 isometric_slope=5
          eccentric_slope_at_vmax=0 eccentric_slope_near_vmax=0.15 max_eccentric_velocity_force_multiplier=1.4
    Millard2012EquilibriumMuscle Subscapularis_I: optimal_force=1 max_isometric_force=854
        optimal_fiber_length=0.08470115 tendon_slack_length=0.06931162 pennation_angle_at_optimal=0
        max_contraction_velocity=10 activation_time_constant=0.01 deactivation_time_constant=0.04
        minimum_activation=0.01
      PathPoint Subscapularis9-P1: scapula (-0.139657 -0.1232735 -0.08119364)
      PathPoint Subscapularis9-P2: humerus (0.01583298 -0.003609328 -0.02736137)
      PathWrap: wrap_object=Subscapuralis method=hybrid
      PathWrap pathwrap_0: wrap_object=hhead method=hybrid
      ActiveForceLengthCurve: minimum_value=0
      ForceVelocityCurve: concentric_slope_at_vmax=0 concentric_slope_near_vmax=0.25 isometric_slope=5
          eccentric_slope_at_vmax=0 eccentric_slope_near_vmax=0.15 max_eccentric_velocity_force_multiplier=1.4
    Millard2012EquilibriumMuscle Supraspinatus_P: optimal_force=1 max_isometric_force=326.2
        optimal_fiber_length=0.08031146 tendon_slack_length=0.0339727 pennation_angle_at_optimal=0
        max_contraction_velocity=10 activation_time_constant=0.01 deactivation_time_constant=0.04
        minimum_activation=0.01
      PathPoint Supraspinatus2-P1: scapula (-0.08891805 -0.001742109 -0.04703345)
      PathPoint Supraspinatus2-P2: humerus (0.01465948 0.01013493 0.02809649)
      PathWrap: wrap_object=hheadsupraTminor method=hybrid
      ActiveForceLengthCurve: minimum_value=0
      ForceVelocityCurve: concentric_slope_at_vmax=0 concentric_slope_near_vmax=0.25 isometric_slope=5
          eccentric_slope_at_vmax=0 eccentric_slope_near_vmax=0.15 max_eccentric_velocity_force_multiplier=1.4
    Millard2012EquilibriumMuscle Supraspinatus_A: optimal_force=1 max_isometric_force=543.2
        optimal_fiber_length=0.06668858 tendon_slack_length=0.03731671 pennation_angle_at_optimal=0
        max_contraction_velocity=10 activation_time_constant=0.01 deactivation_time_constant=0.04
        minimum_activation=0.01
      PathPoint Supraspinatus4-P1: scapula (-0.07197089 0.001711371 -0.06585987)
      PathPoint Supraspinatus4-P2: humerus (0.02562951 0.01868578 0.01352242)
      PathWrap: wrap_object=Thorax method=hybrid
      PathWrap pathwrap_0: wrap_object=hheadsupraTminor method=hybrid
      ActiveForceLengthCurve: minimum_value=0
      ForceVelocityCurve: concentric_slope_at_vmax=0 concentric_slope_near_vmax=0.25 isometric_slope=5
          eccentric_slope_at_vmax=0 eccentric_slope_near_vmax=0.15 max_eccentric_velocity_force_multiplier=1.4
    Millard2012EquilibriumMuscle TRIlong: optimal_force=1 max_isometric_force=1580.6 optimal_fiber_length=0.1015655
        tendon_slack_length=0.2528133 pennation_angle_at_optimal=0.174533 max_contraction_velocity=10
        activation_time_constant=0.01 deactivation_time_constant=0.04 minimum_activation=0.01
      PathPoint TRIlong2-P1: ulna (-0.02728923 -0.03083426 0.01214256)
      PathPoint TRIlong2-P2: scapula (-0.06184455 -0.06552182 -0.01228873)
      ActiveForceLengthCurve: minimum_value=0
      ForceVelocityCurve: concentric_slope_at_vmax=0 concentric_slope_near_vmax=0.25 isometric_slope=5
          eccentric_slope_at_vmax=0 eccentric_slope_near_vmax=0.15 max_eccentric_velocity_force_multiplier=1.4
    Millard2012EquilibriumMuscle BIC_long: optimal_force=1 max_isometric_force=485.8 optimal_fiber_length=0.1554352
        tendon_slack_length=0.280899 pennation_angle_at_optimal=0 max_contraction_velocity=10
        activation_time_constant=0.01 deactivation_time_constant=0.04 minimum_activation=0.01
      PathPoint P1: scapula (-0.03318065 -0.02061353 -0.01724866)
      PathPoint P2: humerus (0.01705362 0.02981013 0.02807968)
      PathPoint P3: radius (-0.001240439 -0.04660239 -0.01325784)
      PathWrap: wrap_object=hhead method=hybrid
      ActiveForceLengthCurve: minimum_value=0
      ForceVelocityCurve: concentric_slope_at_vmax=0 concentric_slope_near_vmax=0.25 isometric_slope=5
          eccentric_slope_at_vmax=0 eccentric_slope_near_vmax=0.15 max_eccentric_velocity_force_multiplier=1.4
    Millard2012EquilibriumMuscle BIC_brevis: optimal_force=1 max_isometric_force=693 optimal_fiber_length=0.1332904
        tendon_slack_length=0.2235567 pennation_angle_at_optimal=0 max_contraction_velocity=10
        activation_time_constant=0.01 deactivation_time_constant=0.04 minimum_activation=0.01
      PathPoint BIC_brevis2-P1: scapula (0.01402515 -0.04825157 -0.02305305)
      PathPoint BIC_brevis2-P2: radius (0.0002847407 -0.04687981 -0.01382484)
      ActiveForceLengthCurve: minimum_value=0
      ForceVelocityCurve: concentric_slope_at_vmax=0 concentric_slope_near_vmax=0.25 isometric_slope=5
          eccentric_slope_at_vmax=0 eccentric_slope_near_vmax=0.15 max_eccentric_velocity_force_multiplier=1.4
    Millard2012EquilibriumMuscle Omo_hyoid: max_isometric_force=26.25 optimal_fiber_length=0.04271455
        tendon_slack_length=0.01830624 pennation_angle_at_optimal=0 minimum_activation=0.01
      PathPoint stern_mast-P1: cerv3 (0.05955689 -0.01259336 0.01234844)
      PathPoint default: spine (-0.02403415 0.4911797 0.03530532)
      ActiveForceLengthCurve: min_norm_active_fiber_length=0.4441 transition_norm_fiber_length=0.73
          max_norm_active_fiber_length=1.8123 shallow_ascending_slope=0.8616 minimum_value=0
      ForceVelocityCurve: concentric_slope_at_vmax=0 concentric_slope_near_vmax=0.25 isometric_slope=5
          eccentric_slope_at_vmax=0 eccentric_slope_near_vmax=0.15 max_eccentric_velocity_force_multiplier=1.4
          concentric_curviness=0.6 eccentric_curviness=0.9
    Millard2012EquilibriumMuscle Omo_hyoid_L: max_isometric_force=26.25 optimal_fiber_length=0.04271455
        tendon_slack_length=0.01830624 pennation_angle_at_optimal=0 minimum_activation=0.01
      PathPoint stern_mast-P1: cerv3 (0.05955689 -0.01259336 -0.01234844)
      PathPoint default: spine (-0.02403415 0.4911797 -0.03530532)
      ActiveForceLengthCurve: min_norm_active_fiber_length=0.4441 transition_norm_fiber_length=0.73
          max_norm_active_fiber_length=1.8123 shallow_ascending_slope=0.8616 minimum_value=0
      ForceVelocityCurve: concentric_slope_at_vmax=0 concentric_slope_near_vmax=0.25 isometric_slope=5
          eccentric_slope_at_vmax=0 eccentric_slope_near_vmax=0.15 max_eccentric_velocity_force_multiplier=1.4
          concentric_curviness=0.6 eccentric_curviness=0.9
    Millard2012EquilibriumMuscle stern_mast: max_isometric_force=68.95 optimal_fiber_length=0.1091092
        tendon_slack_length=0.05669941 pennation_angle_at_optimal=0.2617994 minimum_activation=0.01
      PathPoint P1: spine (-0.0007998814 0.4329926 0.008980685)
      PathPoint P2: skull (-0.005289992 0.007188166 0.06669539)
      ActiveForceLengthCurve: min_norm_active_fiber_length=0.4441 transition_norm_fiber_length=0.73
          max_norm_active_fiber_length=1.8123 shallow_ascending_slope=0.8616 minimum_value=0
      ForceVelocityCurve: concentric_slope_at_vmax=0 concentric_slope_near_vmax=0.25 isometric_slope=5
          eccentric_slope_at_vmax=0 eccentric_slope_near_vmax=0.15 max_eccentric_velocity_force_multiplier=1.4
          concentric_curviness=0.6 eccentric_curviness=0.9
    Millard2012EquilibriumMuscle stern_mast_L: max_isometric_force=68.95 optimal_fiber_length=0.1091092
        tendon_slack_length=0.05669941 pennation_angle_at_optimal=0.2617994 minimum_activation=0.01
      PathPoint P1: spine (-0.0007998814 0.4329926 -0.008980685)
      PathPoint P2: skull (-0.005289992 0.007188166 -0.06669539)
      ActiveForceLengthCurve: min_norm_active_fiber_length=0.4441 transition_norm_fiber_length=0.73
          max_norm_active_fiber_length=1.8123 shallow_ascending_slope=0.8616 minimum_value=0
      ForceVelocityCurve: concentric_slope_at_vmax=0 concentric_slope_near_vmax=0.25 isometric_slope=5
          eccentric_slope_at_vmax=0 eccentric_slope_near_vmax=0.15 max_eccentric_velocity_force_multiplier=1.4
          concentric_curviness=0.6 eccentric_curviness=0.9
    Millard2012EquilibriumMuscle cleid_mast: max_isometric_force=34.475 optimal_fiber_length=0.1199399
        tendon_slack_length=0.03908929 pennation_angle_at_optimal=0.2617994 minimum_activation=0.01
      PathPoint P1: clavicle (0.003476471 0.005483672 0.03546903)
      PathPoint P2: skull (-0.005289992 0.007188166 0.06669539)
      ActiveForceLengthCurve: min_norm_active_fiber_length=0.4441 transition_norm_fiber_length=0.73
          max_norm_active_fiber_length=1.8123 shallow_ascending_slope=0.8616 minimum_value=0
      ForceVelocityCurve: concentric_slope_at_vmax=0 concentric_slope_near_vmax=0.25 isometric_slope=5
          eccentric_slope_at_vmax=0 eccentric_slope_near_vmax=0.15 max_eccentric_velocity_force_multiplier=1.4
          concentric_curviness=0.6 eccentric_curviness=0.9
    Millard2012EquilibriumMuscle cleid_mast_L: max_isometric_force=34.475 optimal_fiber_length=0.1187369
        tendon_slack_length=0.03869725 pennation_angle_at_optimal=0.2617994 minimum_activation=0.01
      PathPoint P1: lclavicle (0.004361637 0.006092803 -0.03956949)
      PathPoint P2: skull (-0.005289992 0.007188166 -0.06669539)
      ActiveForceLengthCurve: min_norm_active_fiber_length=0.4441 transition_norm_fiber_length=0.73
          max_norm_active_fiber_length=1.8123 shallow_ascending_slope=0.8616 minimum_value=0
      ForceVelocityCurve: concentric_slope_at_vmax=0 concentric_slope_near_vmax=0.25 isometric_slope=5
          eccentric_slope_at_vmax=0 eccentric_slope_near_vmax=0.15 max_eccentric_velocity_force_multiplier=1.4
          concentric_curviness=0.6 eccentric_curviness=0.9
    Millard2012EquilibriumMuscle scalenus_ant: max_isometric_force=51.45 optimal_fiber_length=0.04310577
        tendon_slack_length=0.05482746 pennation_angle_at_optimal=0.1745329 minimum_activation=0.01
      PathPoint P1: spine (-0.01304398 0.4409788 0.06109338)
      PathPoint P2: cerv4 (0.008147364 0.007157375 0.02173139)
      ActiveForceLengthCurve: min_norm_active_fiber_length=0.4441 transition_norm_fiber_length=0.73
          max_norm_active_fiber_length=1.8123 shallow_ascending_slope=0.8616 minimum_value=0
      ForceVelocityCurve: concentric_slope_at_vmax=0 concentric_slope_near_vmax=0.25 isometric_slope=5
          eccentric_slope_at_vmax=0 eccentric_slope_near_vmax=0.15 max_eccentric_velocity_force_multiplier=1.4
          concentric_curviness=0.6 eccentric_curviness=0.9
    Millard2012EquilibriumMuscle scalenus_ant_L: max_isometric_force=51.45 optimal_fiber_length=0.04310577
        tendon_slack_length=0.05482746 pennation_angle_at_optimal=0.1745329 minimum_activation=0.01
      PathPoint P1: spine (-0.01304398 0.4409788 -0.06109338)
      PathPoint P2: cerv4 (0.008147364 0.007157375 -0.02173139)
      ActiveForceLengthCurve: min_norm_active_fiber_length=0.4441 transition_norm_fiber_length=0.73
          max_norm_active_fiber_length=1.8123 shallow_ascending_slope=0.8616 minimum_value=0
      ForceVelocityCurve: concentric_slope_at_vmax=0 concentric_slope_near_vmax=0.25 isometric_slope=5
          eccentric_slope_at_vmax=0 eccentric_slope_near_vmax=0.15 max_eccentric_velocity_force_multiplier=1.4
          concentric_curviness=0.6 eccentric_curviness=0.9
    Millard2012EquilibriumMuscle scalenus_med: max_isometric_force=72.1 optimal_fiber_length=0.04884333
        tendon_slack_length=0.06008511 pennation_angle_at_optimal=0.1745329 minimum_activation=0.01
      PathPoint P1: spine (-0.02753894 0.4493883 0.07138281)
      PathPoint P2: cerv3 (-0.01030704 0.008887829 0.01982299)
      ActiveForceLengthCurve: min_norm_active_fiber_length=0.4441 transition_norm_fiber_length=0.73
          max_norm_active_fiber_length=1.8123 shallow_ascending_slope=0.8616 minimum_value=0
      ForceVelocityCurve: concentric_slope_at_vmax=0 concentric_slope_near_vmax=0.25 isometric_slope=5
          eccentric_slope_at_vmax=0 eccentric_slope_near_vmax=0.15 max_eccentric_velocity_force_multiplier=1.4
          concentric_curviness=0.6 eccentric_curviness=0.9
    Millard2012EquilibriumMuscle scalenus_med_L: max_isometric_force=72.1 optimal_fiber_length=0.04884333
        tendon_slack_length=0.06008511 pennation_angle_at_optimal=0.1745329 minimum_activation=0.01
      PathPoint P1: spine (-0.02753894 0.4493883 -0.07138281)
      PathPoint P2: cerv3 (-0.01030704 0.008887829 -0.01982299)
      ActiveForceLengthCurve: min_norm_active_fiber_length=0.4441 transition_norm_fiber_length=0.73
          max_norm_active_fiber_length=1.8123 shallow_ascending_slope=0.8616 minimum_value=0
      ForceVelocityCurve: concentric_slope_at_vmax=0 concentric_slope_near_vmax=0.25 isometric_slope=5
          eccentric_slope_at_vmax=0 eccentric_slope_near_vmax=0.15 max_eccentric_velocity_force_multiplier=1.4
          concentric_curviness=0.6 eccentric_curviness=0.9
    Millard2012EquilibriumMuscle scalenus_post: max_isometric_force=54.95 optimal_fiber_length=0.06475097
        tendon_slack_length=0.07607717 pennation_angle_at_optimal=0.1745329 minimum_activation=0.01
      PathPoint P1: spine (-0.04289499 0.4267972 0.1028913)
      PathPoint P2: cerv5 (-0.003656601 0.01242122 0.02404204)
      ActiveForceLengthCurve: min_norm_active_fiber_length=0.4441 transition_norm_fiber_length=0.73
          max_norm_active_fiber_length=1.8123 shallow_ascending_slope=0.8616 minimum_value=0
      ForceVelocityCurve: concentric_slope_at_vmax=0 concentric_slope_near_vmax=0.25 isometric_slope=5
          eccentric_slope_at_vmax=0 eccentric_slope_near_vmax=0.15 max_eccentric_velocity_force_multiplier=1.4
          concentric_curviness=0.6 eccentric_curviness=0.9
    Millard2012EquilibriumMuscle scalenus_post_L: max_isometric_force=54.95 optimal_fiber_length=0.06475097
        tendon_slack_length=0.07607717 pennation_angle_at_optimal=0.1745329 minimum_activation=0.01
      PathPoint P1: spine (-0.04289499 0.4267972 -0.1028913)
      PathPoint P2: cerv5 (-0.003656601 0.01242122 -0.02404204)
      ActiveForceLengthCurve: min_norm_active_fiber_length=0.4441 transition_norm_fiber_length=0.73
          max_norm_active_fiber_length=1.8123 shallow_ascending_slope=0.8616 minimum_value=0
      ForceVelocityCurve: concentric_slope_at_vmax=0 concentric_slope_near_vmax=0.25 isometric_slope=5
          eccentric_slope_at_vmax=0 eccentric_slope_near_vmax=0.15 max_eccentric_velocity_force_multiplier=1.4
          concentric_curviness=0.6 eccentric_curviness=0.9
    Millard2012EquilibriumMuscle levator_scap: max_isometric_force=280 optimal_fiber_length=0.1228209
        tendon_slack_length=0.02377616 pennation_angle_at_optimal=0 minimum_activation=0.01
      PathPoint P1: scapula (-0.1018505 0.007592669 -0.08862639)
      PathPoint P2: cerv2 (-0.01355228 0.006568477 0.0198417)
      ActiveForceLengthCurve: min_norm_active_fiber_length=0.4441 transition_norm_fiber_length=0.73
          max_norm_active_fiber_length=1.8123 shallow_ascending_slope=0.8616 minimum_value=0
      ForceVelocityCurve: concentric_slope_at_vmax=0 concentric_slope_near_vmax=0.25 isometric_slope=5
          eccentric_slope_at_vmax=0 eccentric_slope_near_vmax=0.15 max_eccentric_velocity_force_multiplier=1.4
          concentric_curviness=0.6 eccentric_curviness=0.9
    Millard2012EquilibriumMuscle levator_scap_L: max_isometric_force=280 optimal_fiber_length=0.1241557
        tendon_slack_length=0.02403457 pennation_angle_at_optimal=0 minimum_activation=0.01
      PathPoint P1: lscapula (-0.1260776 -0.04027393 0.06820534)
      PathPoint P2: cerv2 (-0.01355228 0.006568477 -0.0198417)
      ActiveForceLengthCurve: min_norm_active_fiber_length=0.4441 transition_norm_fiber_length=0.73
          max_norm_active_fiber_length=1.8123 shallow_ascending_slope=0.8616 minimum_value=0
      ForceVelocityCurve: concentric_slope_at_vmax=0 concentric_slope_near_vmax=0.25 isometric_slope=5
          eccentric_slope_at_vmax=0 eccentric_slope_near_vmax=0.15 max_eccentric_velocity_force_multiplier=1.4
          concentric_curviness=0.6 eccentric_curviness=0.9
    Millard2012EquilibriumMuscle trap_acr: max_isometric_force=1043 optimal_fiber_length=0.1008235
        tendon_slack_length=0.08392678 pennation_angle_at_optimal=0 minimum_activation=0.01
      PathPoint P1: scapula (-0.02926674 0.0004659283 -0.01159331)
      PathPoint P2: cerv7 (-0.05450621 0.01721394 0.002853239)
      ActiveForceLengthCurve: min_norm_active_fiber_length=0.4441 transition_norm_fiber_length=0.73
          max_norm_active_fiber_length=1.8123 shallow_ascending_slope=0.8616 minimum_value=0
      ForceVelocityCurve: concentric_slope_at_vmax=0 concentric_slope_near_vmax=0.25 isometric_slope=5
          eccentric_slope_at_vmax=0 eccentric_slope_near_vmax=0.15 max_eccentric_velocity_force_multiplier=1.4
          concentric_curviness=0.6 eccentric_curviness=0.9
    Millard2012EquilibriumMuscle trap_acr_L: max_isometric_force=1043 optimal_fiber_length=0.08713002
        tendon_slack_length=0.07252817 pennation_angle_at_optimal=0 minimum_activation=0.01
      PathPoint P1: lscapula (-0.03076609 -0.01017961 0.006162427)
      PathPoint P2: cerv7 (-0.05450621 0.01721394 -0.002853239)
      ActiveForceLengthCurve: min_norm_active_fiber_length=0.4441 transition_norm_fiber_length=0.73
          max_norm_active_fiber_length=1.8123 shallow_ascending_slope=0.8616 minimum_value=0
      ForceVelocityCurve: concentric_slope_at_vmax=0 concentric_slope_near_vmax=0.25 isometric_slope=5
          eccentric_slope_at_vmax=0 eccentric_slope_near_vmax=0.15 max_eccentric_velocity_force_multiplier=1.4
          concentric_curviness=0.6 eccentric_curviness=0.9
    Millard2012EquilibriumMuscle trap_cl: max_isometric_force=77.6 optimal_fiber_length=0.09581602
        tendon_slack_length=0.1359926 pennation_angle_at_optimal=0.5235988 minimum_activation=0.01
      PathPoint P1: clavicle (-0.022361 0.02532349 0.09962161)
      PathPoint P2: skull (-0.08330182 0.02701008 0.01373324)
      ActiveForceLengthCurve: min_norm_active_fiber_length=0.4441 transition_norm_fiber_length=0.73
          max_norm_active_fiber_length=1.8123 shallow_ascending_slope=0.8616 minimum_value=0
      ForceVelocityCurve: concentric_slope_at_vmax=0 concentric_slope_near_vmax=0.25 isometric_slope=5
          eccentric_slope_at_vmax=0 eccentric_slope_near_vmax=0.15 max_eccentric_velocity_force_multiplier=1.4
          concentric_curviness=0.6 eccentric_curviness=0.9
    Millard2012EquilibriumMuscle trap_cl_L: max_isometric_force=77.6 optimal_fiber_length=0.09310861
        tendon_slack_length=0.1321499 pennation_angle_at_optimal=0.5235988 minimum_activation=0.01
      PathPoint P1: lclavicle (-0.03304952 0.02607989 -0.09768719)
      PathPoint P2: skull (-0.08330182 0.02701008 -0.01373324)
      ActiveForceLengthCurve: min_norm_active_fiber_length=0.4441 transition_norm_fiber_length=0.73
          max_norm_active_fiber_length=1.8123 shallow_ascending_slope=0.8616 minimum_value=0
      ForceVelocityCurve: concentric_slope_at_vmax=0 concentric_slope_near_vmax=0.25 isometric_slope=5
          eccentric_slope_at_vmax=0 eccentric_slope_near_vmax=0.15 max_eccentric_velocity_force_multiplier=1.4
          concentric_curviness=0.6 eccentric_curviness=0.9
    BushingForce [values shared by the 8 below unless stated]: translational_stiffness=(0 0 0) [N/m]
        translational_damping=(0 0 0) [N/(m/s)]
    BushingForce Spine_C7_Bushing: socket_frame1=/bodyset/spine socket_frame2=/bodyset/cerv7
        rotational_stiffness=(27.5 13.75 27.5) [Nm/rad] rotational_damping=(2.75 1.375 2.75) [Nm/(rad/s)]
    BushingForce C7_C6_Bushing: socket_frame1=/bodyset/cerv7 socket_frame2=/bodyset/cerv6
        rotational_stiffness=(27.5 13.75 27.5) rotational_damping=(2.75 1.375 2.75)
    BushingForce C6_C5_Bushing: socket_frame1=/bodyset/cerv6 socket_frame2=/bodyset/cerv5
        rotational_stiffness=(27.5 13.75 27.5) rotational_damping=(2.75 1.375 2.75)
    BushingForce C5_C4_Bushing: socket_frame1=/bodyset/cerv5 socket_frame2=/bodyset/cerv4
        rotational_stiffness=(23.2 11.6 23.2) rotational_damping=(2.32 1.16 2.32)
    BushingForce C4_C3_Bushing: socket_frame1=/bodyset/cerv4 socket_frame2=/bodyset/cerv3
        rotational_stiffness=(23.2 11.6 23.2) rotational_damping=(2.32 1.16 2.32)
    BushingForce C3_C2_Bushing: socket_frame1=/bodyset/cerv3 socket_frame2=/bodyset/cerv2
        rotational_stiffness=(7.8 3.9 7.8) rotational_damping=(0.78 0.39 0.78)
    BushingForce C2_C1_Bushing: socket_frame1=/bodyset/cerv2 socket_frame2=/bodyset/cerv1
        rotational_stiffness=(7.8 3.9 7.8) rotational_damping=(0.78 0.39 0.78)
    BushingForce C1_skull_Bushing: socket_frame1=/bodyset/cerv1 socket_frame2=/bodyset/skull
        rotational_stiffness=(7.8 3.9 7.8) rotational_damping=(0.78 0.39 0.78)
    ObjectGroup for_shoulder: members=(DeltoideusClavicle_A DeltoideusScapula_M Infraspinatus_S Supraspinatus_A Infraspinatus_I Subscapularis_M Subscapularis_S DeltoideusScapula_P TeresMajor Subscapularis_I Supraspinatus_P TeresMinor)
    ObjectGroup green: members=(stern_mast stern_mast_L cleid_mast cleid_mast_L trap_cl trap_cl_L trap_acr trap_acr_L levator_scap levator_scap_L TrapeziusScapula_M TrapeziusScapula_I Rhomboideus_S Rhomboideus_I TeresMajor Infraspinatus_I Infraspinatus_S TeresMinor Subscapularis_S Subscapularis_M Subscapularis_I Supraspinatus_P Supraspinatus_A)
    ObjectGroup yellow: members=(Omo_hyoid Omo_hyoid_L scalenus_ant scalenus_ant_L scalenus_med scalenus_med_L scalenus_post scalenus_post_L SerratusAnterior_I SerratusAnterior_M SerratusAnterior_S DeltoideusClavicle_A DeltoideusScapula_P DeltoideusScapula_M TRIlong BIC_long BIC_brevis)
  MarkerSet:
    Marker CV7: spine (-0.1335132 0.4991034 -0.001192295)
    Marker TV8: spine (-0.1413637 0.2108987 0.0006573133)
    Marker SXS: thorax (0.07498505 -0.1838932 0.0007814923)
    Marker ScapulaThoracicContactPt: scapula (-0.119264 -0.05370863 -0.05590642)
    Marker RCAJ: clavicle (-0.02357533 0.03416445 0.1679121)
    Marker LCAJ: lscapula (-0.01535385 -0.003300615 -0.01783024)
    Marker AI: scapula (-0.1738211 -0.1435581 -0.06656822)
    Marker TS: scapula (-0.1061242 -0.01966679 -0.1108346)
    Marker AA: scapula (-0.07784677 0.002098965 0.009683528)
    Marker GH: humerus (0 0 0)
    Marker RHLE: humerus (0.002131247 -0.3007367 0.04080151)
    Marker RHME: humerus (-9.186374e-5 -0.3162581 -0.08037912)
    Marker centelbow: humerus (0.001019692 -0.3084974 -0.01978881)
    Marker centijc7: thorax (-0.07300561 0.02850893 -0.001189556)
    Marker centpxt8: thorax (-0.04426381 -0.2010439 0.0007194028)
    Marker SJN: thorax (0.009651 -0.01299234 -0.001186817)
    Marker RAH: skull (0.09818526 0.109161 0.04827043)
    Marker LAH: skull (0.1053555 0.1097103 -0.04675216)
    Marker RPH: skull (-0.087521 0.02900671 0.05913222)
    Marker LPH: skull (-0.09215033 0.02582872 -0.05646685)
    Marker centLPHRPH: skull (-0.08983566 0.02741772 0.001332687)
