# OpenSim document version 40000
Model ModelOfNeckAndShoulder:
  gravity: 0 -9.80665 0
  length_units: meters
  force_units: N
  Ground
  BodySet:
    Body spine: mass=0 [kg] mass_center=(0 0 0) inertia=(0 0 0 0 0 0) meshes=tlspine.vtp
    Body thorax: mass=26.2 mass_center=(-0.05909986 -0.148601 0) inertia=(1.14705 0.4880821 1.14705 0 0 0)
        meshes=thorax.vtp
      WrapEllipsoid Thorax: xyz_body_rotation=(-0.17 -0.0383972 0.212232)
          translation=(-0.02199988 -0.1467009 0.06999836) quadrant=all dimensions=(0.0740668 0.169952 0.0704834)
      WrapEllipsoid EllipsoidSurface: translation=(-0.01999993 -0.01730009 0.07967259) quadrant=all
          dimensions=(0.0994228 0.200001 0.0993853)
      WrapEllipsoid Thor_surf: active=false xyz_body_rotation=(0 -0.87 0)
          translation=(-0.02942288 -0.01730009 0.07028557) quadrant=all dimensions=(0.0829975 0.199991 0.083001)
    Body cerv7: mass=0.9 mass_center=(-0.0001730703 0.006143994 0) inertia=(0.004359288 0.01743715 0.004359288 0 0 0)
        meshes=rotatedcerv7.vtp
    Body cerv6: mass=0.7 mass_center=(0.0001730703 0.005538249 0) inertia=(0.004359288 0.01743715 0.004359288 0 0 0)
        meshes=cerv6.vtp
    Body cerv5: mass=0.6 mass_center=(8.653513e-5 0.005451713 0) inertia=(0.004359288 0.01743715 0.004359288 0 0 0)
        meshes=cerv5.vtp
    Body cerv4: mass=0.6 mass_center=(-0.0002596054 0.005797854 0) inertia=(0.004359288 0.01743715 0.004359288 0 0 0)
        meshes=cerv4.vtp
    Body cerv3: mass=0.6 mass_center=(-0.0006922811 0.006143994 0) inertia=(0.004359288 0.01743715 0.004359288 0 0 0)
        meshes=cerv3.vtp
    Body cerv2: mass=0.9 mass_center=(-0.0008653513 0.005105573 0) inertia=(0.004359288 0.01743715 0.004359288 0 0 0)
        meshes=cerv2.vtp
    Body cerv1: mass=0.7 mass_center=(0.02699896 0.001644168 0) inertia=(0.004359288 0.01743715 0.004359288 0 0 0)
        meshes=cerv1.vtp
    Body skull: mass=5 mass_center=(0 0.05849775 0) inertia=(0.005743319 0.001765377 0.006193677 0 0 0)
        meshes=skull.vtp
    Body jaw: mass=0.6 mass_center=(0 0.04326757 0) inertia=(0.008718576 0.004359288 0.008718576 0 0 0) meshes=jaw.vtp
    Body clavicle: mass=0.6 mass_center=(-0.01110064 0.006371761 0.05417029)
        inertia=(0.0002676737 0.0002676737 4.901324e-5 -2.094264e-5 -7.717231e-5 5.926065e-5) meshes=clavicle.vtp
      PhysicalOffsetFrame cp_in_clavicle: socket_parent=.. translation=(-0.02924 0.02024 0.12005) [meters]
    Body scapula: mass=3 mass_center=(-0.05468973 -0.03503135 -0.04371461)
        inertia=(0.0008856693 0.0008193404 0.0008856693 0.0003202001 0.0002915427 0.0001717929) meshes=scapula.vtp
      PhysicalOffsetFrame cp_in_scapula: socket_parent=.. translation=(-0.01357 0.00011 -0.01523)
      WrapCylinder Subscapuralis: xyz_body_rotation=(1 -1 1) translation=(-0.02510093 -0.0389995 -0.02838988)
          quadrant=-y radius=0.01255591 length=0.08567586
      WrapCylinder Tmajscapula: xyz_body_rotation=(-1.4854 -0.3354 -0.8754)
          translation=(-0.08929952 -0.1062046 -0.05008224) quadrant=-y radius=0.00759205 length=0.0502915
      WrapEllipsoid deltsca: xyz_body_rotation=(1.4823 0.1606 -0.4472)
          translation=(-0.03429977 -0.03340137 -0.04428431) quadrant=all dimensions=(0.0403287 0.0906472 0.0300459)
      WrapCylinder Infra: xyz_body_rotation=(1.87 -0.543 -2.355) translation=(-0.05811966 -0.04590191 -0.04563393)
          quadrant=-y radius=0.01973532 length=0.1011614
    Body humerus: mass=2.5 mass_center=(0.01805999 -0.1401004 -0.01274988)
        inertia=(0.01154762 0.00240096 0.01154762 -0.0003269573 -0.0002188252 0.0001156668) meshes=humerus.vtp
      WrapSphere hhead: translation=(-0.003200001 0.004900028 -0.001999988) quadrant=all radius=0.02453975
      WrapSphere hheadsupraTminor: translation=(-0.0008000003 0.004800024 0.002299987) quadrant=all radius=0.0234728
      WrapEllipsoid hheadInfra: xyz_body_rotation=(0.1419 0.13474 0.28117)
          translation=(9.999942e-5 0.001000005 -0.004799974) quadrant=all dimensions=(0.0298252 0.0233659 0.0302255)
    Body ulna: mass=0.8 mass_center=(0.009718 -0.09595 0.02429)
        inertia=(0.00479825 0.001022055 0.004381627 0.0002809099 -6.75017e-5 0.0009679824) meshes=ulna.vtp
      WrapCylinder PQ2: xyz_body_rotation=(1.39138 0.0689405 1.52245) translation=(-0.0012 -0.2092 0.0428) quadrant=all
          radius=0.007 length=0.01
    Body radius: mass=0.8 mass_center=(0.03363 -0.18156 0.0156)
        inertia=(0.0003887885 7.85289e-5 3.56877e-5 2.671702e-5 -3.758467e-6 5.689113e-5) meshes=radius.vtp
    Body hand: mass=0.6 mass_center=(0.0006 -0.0905 -0.0365) inertia=(0.0005661633 0.0001687764 0.0005661633 0 0 0)
    Body lscapula: mass=3 mass_center=(0 0 0) inertia=(0.2255863 0.2255863 0.1127931 0 0 0) meshes=lscapula.vtp
    Body lclavicle: mass=0.6 mass_center=(0 0 0) inertia=(0.1959725 0.1959725 0.09798626 0 0 0) meshes=lclavicle.vtp
  JointSet:
    CustomJoint ground_spine: socket_parent_frame=ground_offset socket_child_frame=spine_offset
      Coordinate ground_spine_rot_x: default_value=0.06971656 range=(-3.141593 3.141593) clamped=false
      Coordinate ground_spine_rot_y: default_value=-0.06316956 range=(-3.141593 3.141593) clamped=false
      Coordinate ground_spine_rot_z: default_value=-0.1821671 range=(-3.141593 3.141593) clamped=false
      Coordinate ground_spine_tx: default_value=-0.004231307 range=(-3.141593 3.141593) clamped=false
      Coordinate ground_spine_ty: default_value=0.00403036 range=(-3.141593 3.141593) clamped=false
      Coordinate ground_spine_tz: default_value=-0.0007835185 range=(-3.141593 3.141593) clamped=false
      PhysicalOffsetFrame ground_offset: socket_parent=/ground translation=(0 0 0)
      PhysicalOffsetFrame spine_offset: socket_parent=/bodyset/spine translation=(0 0 0)
      SpatialTransform:
        TransformAxis rotation1: coordinates=ground_spine_rot_x axis=(1 0 0) LinearFunction(coefficients=1 0)
        TransformAxis rotation2: coordinates=ground_spine_rot_y axis=(0 1 0) LinearFunction(coefficients=1 0)
        TransformAxis rotation3: coordinates=ground_spine_rot_z axis=(0 0 1) LinearFunction(coefficients=1 0)
        TransformAxis translation1: coordinates=ground_spine_tx axis=(1 0 0) LinearFunction(coefficients=1 0)
        TransformAxis translation2: coordinates=ground_spine_ty axis=(0 1 0) LinearFunction(coefficients=1 0)
        TransformAxis translation3: coordinates=ground_spine_tz axis=(0 0 1) LinearFunction(coefficients=1 0)
    CustomJoint sternoclavicular: socket_parent_frame=thorax_offset socket_child_frame=clavicle_offset
      Coordinate clav_prot: default_value=-0.2998917 range=(-3.141593 3.141593) clamped=true
      Coordinate clav_elev: default_value=-0.06473725 range=(-3.141593 3.141593) clamped=true
      PhysicalOffsetFrame thorax_offset: socket_parent=/bodyset/thorax translation=(0.006324977 0.006930043 0.02546443)
      PhysicalOffsetFrame clavicle_offset: socket_parent=/bodyset/clavicle translation=(0 0 0)
      SpatialTransform: axes_held_at_zero=(rotation3 translation1 translation2 translation3)
        TransformAxis rotation1: coordinates=clav_prot axis=(0.0153 0.9892987 -0.1451) LinearFunction(coefficients=1 0)
        TransformAxis rotation2: coordinates=clav_elev axis=(-0.9944725 0 -0.104997) LinearFunction(coefficients=1 0)
    ScapulothoracicJoint scapulothoracic: socket_parent_frame=thorax_offset socket_child_frame=scapula_offset
        thoracic_ellipsoid_radii_x_y_z=(0.0829975 0.199991 0.083001) scapula_winging_axis_origin=(0 0)
        scapula_winging_axis_direction=0 [radians]
      Coordinate scapula_abduction: default_value=-0.3115611 range=(-3.141593 3.141593) clamped=true
      Coordinate scapula_elevation: default_value=-0.05049787 range=(-3.141593 3.141593) clamped=true
      Coordinate scapula_upward_rot: default_value=0.2082049 range=(-3.141593 3.141593) clamped=true
      Coordinate scapula_winging: default_value=0.2735852 range=(-1.570796 1.570796) clamped=false
      PhysicalOffsetFrame thorax_offset: socket_parent=/bodyset/thorax translation=(-0.02942288 -0.01730009 0.07028557)
          orientation=(0 -0.87 0) [radians]
      PhysicalOffsetFrame scapula_offset: socket_parent=/bodyset/scapula
          translation=(-0.08412859 -0.03848383 -0.05988926) orientation=(-0.5181 -1.1416 -0.2854)
    CustomJoint GlenoHumeral: socket_parent_frame=scapula_offset socket_child_frame=humerus_offset
      Coordinate plane_elv: default_value=2.844205e-11 default_speed_value=1 range=(-1.5 3.141593) clamped=true
      Coordinate shoulder_elv: default_value=0.3216331 range=(-0.78 2.53) clamped=false
      Coordinate axial_rot: default_value=1.028832 default_speed_value=1 range=(-1.570795 1.570795) clamped=true
      PhysicalOffsetFrame scapula_offset: socket_parent=/bodyset/scapula
          translation=(-0.009549945 -0.03400136 0.008996822)
      PhysicalOffsetFrame humerus_offset: socket_parent=/bodyset/humerus translation=(0 0 0)
      SpatialTransform: axes_held_at_zero=(translation1 translation2 translation3)
        TransformAxis rotation1: coordinates=plane_elv axis=(0 1 0) LinearFunction(coefficients=1 0)
        TransformAxis rotation2: coordinates=shoulder_elv axis=(-1 0 0) LinearFunction(coefficients=1 0)
        TransformAxis rotation3: coordinates=axial_rot axis=(-0.0846 0.9947 -0.0584) LinearFunction(coefficients=1 0)
    CustomJoint elbow: socket_parent_frame=humerus_offset socket_child_frame=ulna_offset
      Coordinate elbow_flexion: default_value=5.193488e-24 range=(0 2.268928) clamped=false locked=true
      PhysicalOffsetFrame humerus_offset: socket_parent=/bodyset/humerus
          translation=(0.006100004 -0.2904012 -0.01229989)
      PhysicalOffsetFrame ulna_offset: socket_parent=/bodyset/ulna translation=(0 0 0)
      SpatialTransform: axes_held_at_zero=(rotation1 rotation2 translation1 translation2 translation3)
        TransformAxis rotation3: coordinates=elbow_flexion axis=(0.04940001 0.03660001 0.9981083)
            LinearFunction(coefficients=1 0)
    CustomJoint radioulnar: socket_parent_frame=ulna_offset socket_child_frame=radius_offset
      Coordinate pro_sup: default_value=0.598997 range=(-1.570796 1.570796) clamped=false locked=true
      PhysicalOffsetFrame ulna_offset: socket_parent=/bodyset/ulna translation=(0.0004 -0.011503 0.019999)
      PhysicalOffsetFrame radius_offset: socket_parent=/bodyset/radius translation=(0 0 0)
      SpatialTransform: axes_held_at_zero=(rotation1 rotation3 translation1 translation2 translation3)
        TransformAxis rotation2: coordinates=pro_sup axis=(-0.01716099 0.9926656 -0.119668)
            LinearFunction(coefficients=1 0)
    WeldJoint rc: socket_parent_frame=radius_offset socket_child_frame=hand_offset
      PhysicalOffsetFrame radius_offset: socket_parent=/bodyset/radius translation=(0.018 -0.242 0.025)
      PhysicalOffsetFrame hand_offset: socket_parent=/bodyset/hand translation=(0 0 0)
    WeldJoint lscapulajnt: socket_parent_frame=spine_offset socket_child_frame=lscapula_offset
      PhysicalOffsetFrame spine_offset: socket_parent=/bodyset/spine translation=(-0.0406719 0.306517 -0.143)
          orientation=(-0.175533 -0.036706 -0.198533)
      PhysicalOffsetFrame lscapula_offset: socket_parent=/bodyset/lscapula translation=(0 0 0)
    CustomJoint lclaviclejnt: socket_parent_frame=thorax_offset socket_child_frame=clavicle_offset
      Coordinate clav_prot_l: default_value=0.2998917 range=(-3.141593 3.141593) clamped=true locked=true
      Coordinate clav_elev_l: default_value=0.06473725 range=(-3.141593 3.141593) clamped=true locked=true
      PhysicalOffsetFrame thorax_offset: socket_parent=/bodyset/thorax
          translation=(0.006324977 0.006930043 -0.02546443)
      PhysicalOffsetFrame clavicle_offset: socket_parent=/bodyset/lclavicle
          translation=(0.005231307 -0.00103036 -0.003283518) orientation=(0.04247197 0.1797628 0.007128011)
      SpatialTransform: axes_held_at_zero=(rotation3 translation1 translation2 translation3)
        TransformAxis rotation1: coordinates=clav_prot_l axis=(0.0153 0.9892987 0.1451)
            LinearFunction(coefficients=1 0)
        TransformAxis rotation2: coordinates=clav_elev_l axis=(-0.9944725 0 0.104997) LinearFunction(coefficients=1 0)
    CustomJoint auxt1jnt: socket_parent_frame=spine_offset socket_child_frame=cerv7_offset
      Coordinate pitch2: default_value=1.190973e-6 range=(-0.5759587 0.837758) clamped=true
      Coordinate roll2: default_value=-7.417425e-34 range=(-0.5759587 0.5759587) clamped=true
      Coordinate yaw2: default_value=-1.940732e-33 range=(-0.4712389 0.4712389) clamped=true
      PhysicalOffsetFrame spine_offset: socket_parent=/bodyset/spine translation=(-0.04110419 0.3126514 0)
      PhysicalOffsetFrame cerv7_offset: socket_parent=/bodyset/cerv7 translation=(0.005919003 -0.004893562 0)
      SpatialTransform: axes_held_at_zero=(translation1 translation2 translation3)
        TransformAxis rotation1: coordinates=pitch2 axis=(0 0 1)
          SimmSpline: x=(-1.74533 1.74533) y=(-0.172788 0.172788)
        TransformAxis rotation2: coordinates=roll2 axis=(1 0 0)
          SimmSpline: x=(-1.74533 1.74533) y=(-0.136136 0.136136)
        TransformAxis rotation3: coordinates=yaw2 axis=(0 1 0)
          SimmSpline: x=(-1.74533 1.74533) y=(-0.109956 0.109956)
    CustomJoint aux7jnt: socket_parent_frame=cerv7_offset socket_child_frame=cerv6_offset
      Coordinate aux7jnt_r3: default_value=2.066836e-7 range=(-99999.9 99999.9) clamped=false
      Coordinate aux7jnt_r1: default_value=0 range=(-99999.9 99999.9) clamped=false
      Coordinate aux7jnt_r2: default_value=0 range=(-99999.9 99999.9) clamped=false
      PhysicalOffsetFrame cerv7_offset: socket_parent=/bodyset/cerv7 translation=(0.0114711 0.01071305 0)
      PhysicalOffsetFrame cerv6_offset: socket_parent=/bodyset/cerv6 translation=(0.008150744 -0.003517653 0)
      SpatialTransform: axes_held_at_zero=(translation1 translation2 translation3)
        TransformAxis rotation1: coordinates=aux7jnt_r3 axis=(0 0 1) LinearFunction(coefficients=1 0)
        TransformAxis rotation2: coordinates=aux7jnt_r1 axis=(1 0 0) LinearFunction(coefficients=1 0)
        TransformAxis rotation3: coordinates=aux7jnt_r2 axis=(0 1 0) LinearFunction(coefficients=1 0)
    CustomJoint aux6jnt: socket_parent_frame=cerv6_offset socket_child_frame=cerv5_offset
      Coordinate aux6jnt_r3: default_value=2.431566e-7 range=(-99999.9 99999.9) clamped=false
      Coordinate aux6jnt_r1: default_value=0 range=(-99999.9 99999.9) clamped=false
      Coordinate aux6jnt_r2: default_value=0 range=(-99999.9 99999.9) clamped=false
      PhysicalOffsetFrame cerv6_offset: socket_parent=/bodyset/cerv6 translation=(0.008523711 0.008437175 0)
      PhysicalOffsetFrame cerv5_offset: socket_parent=/bodyset/cerv5 translation=(0.004906542 -0.007052613 0)
      SpatialTransform: axes_held_at_zero=(translation1 translation2 translation3)
        TransformAxis rotation1: coordinates=aux6jnt_r3 axis=(0 0 1) LinearFunction(coefficients=1 0)
        TransformAxis rotation2: coordinates=aux6jnt_r1 axis=(1 0 0) LinearFunction(coefficients=1 0)
        TransformAxis rotation3: coordinates=aux6jnt_r2 axis=(0 1 0) LinearFunction(coefficients=1 0)
    CustomJoint aux5jnt: socket_parent_frame=cerv5_offset socket_child_frame=cerv4_offset
      Coordinate aux5jnt_r3: default_value=2.431566e-7 range=(-99999.9 99999.9) clamped=false
      Coordinate aux5jnt_r1: default_value=0 range=(-99999.9 99999.9) clamped=false
      Coordinate aux5jnt_r2: default_value=0 range=(-99999.9 99999.9) clamped=false
      PhysicalOffsetFrame cerv5_offset: socket_parent=/bodyset/cerv5 translation=(0.007294912 0.006446867 0)
      PhysicalOffsetFrame cerv4_offset: socket_parent=/bodyset/cerv4 translation=(0.004344064 -0.01014192 0)
      SpatialTransform: axes_held_at_zero=(translation1 translation2 translation3)
        TransformAxis rotation1: coordinates=aux5jnt_r3 axis=(0 0 1) LinearFunction(coefficients=1 0)
        TransformAxis rotation2: coordinates=aux5jnt_r1 axis=(1 0 0) LinearFunction(coefficients=1 0)
        TransformAxis rotation3: coordinates=aux5jnt_r2 axis=(0 1 0) LinearFunction(coefficients=1 0)
    CustomJoint aux4jnt: socket_parent_frame=cerv4_offset socket_child_frame=cerv3_offset
      Coordinate aux4jnt_r3: default_value=1.823674e-7 range=(-99999.9 99999.9) clamped=false
      Coordinate aux4jnt_r1: default_value=0 range=(-99999.9 99999.9) clamped=false
      Coordinate aux4jnt_r2: default_value=0 range=(-99999.9 99999.9) clamped=false
      PhysicalOffsetFrame cerv4_offset: socket_parent=/bodyset/cerv4 translation=(0.006334372 0.005520942 0)
      PhysicalOffsetFrame cerv3_offset: socket_parent=/bodyset/cerv3 translation=(0.004075805 -0.007805469 0)
      SpatialTransform: axes_held_at_zero=(translation1 translation2 translation3)
        TransformAxis rotation1: coordinates=aux4jnt_r3 axis=(0 0 1) LinearFunction(coefficients=1 0)
        TransformAxis rotation2: coordinates=aux4jnt_r1 axis=(1 0 0) LinearFunction(coefficients=1 0)
        TransformAxis rotation3: coordinates=aux4jnt_r2 axis=(0 1 0) LinearFunction(coefficients=1 0)
    CustomJoint aux3jnt: socket_parent_frame=cerv3_offset socket_child_frame=cerv2_offset
      Coordinate aux3jnt_r3: default_value=1.215783e-7 range=(-99999.9 99999.9) clamped=false
      Coordinate aux3jnt_r1: default_value=0 range=(-99999.9 99999.9) clamped=false
      Coordinate aux3jnt_r2: default_value=0 range=(-99999.9 99999.9) clamped=false
      PhysicalOffsetFrame cerv3_offset: socket_parent=/bodyset/cerv3 translation=(0.004543094 0.004378678 0)
      PhysicalOffsetFrame cerv2_offset: socket_parent=/bodyset/cerv2 translation=(0.004698858 -0.009717895 0)
      SpatialTransform: axes_held_at_zero=(translation1 translation2 translation3)
        TransformAxis rotation1: coordinates=aux3jnt_r3 axis=(0 0 1) LinearFunction(coefficients=1 0)
        TransformAxis rotation2: coordinates=aux3jnt_r1 axis=(1 0 0) LinearFunction(coefficients=1 0)
        TransformAxis rotation3: coordinates=aux3jnt_r2 axis=(0 1 0) LinearFunction(coefficients=1 0)
    CustomJoint aux2jnt: socket_parent_frame=cerv2_offset socket_child_frame=cerv1_offset
      Coordinate pitch1: default_value=1.572011e-6 range=(-0.2792527 0.418879) clamped=true
      Coordinate roll1: default_value=-1.889405e-33 range=(-0.1047198 0.1047198) clamped=true
      Coordinate yaw1: default_value=1.274842e-34 range=(-0.6632251 0.6632251) clamped=true
      PhysicalOffsetFrame cerv2_offset: socket_parent=/bodyset/cerv2 translation=(0.005962271 0.01841468 0)
      PhysicalOffsetFrame cerv1_offset: socket_parent=/bodyset/cerv1 translation=(0.03673416 0.003046037 0)
      SpatialTransform: axes_held_at_zero=(translation1 translation2 translation3)
        TransformAxis rotation1: coordinates=pitch1 axis=(0 0 1)
          SimmSpline: x=(-1.74533 1.74533) y=(-0.774926 0.774926)
        TransformAxis rotation2: coordinates=roll1 axis=(1 0 0)
          SimmSpline: x=(-1.74533 1.74533) y=(-0.872665 0.872665)
        TransformAxis rotation3: coordinates=yaw1 axis=(0 1 0)
          SimmSpline: x=(-1.74533 1.74533) y=(-1.5516 1.5516)
    CustomJoint aux1jnt: socket_parent_frame=cerv1_offset socket_child_frame=skull_offset
      Coordinate aux1jnt_r3: default_value=8.424689e-7 range=(-99999.9 99999.9) clamped=false
      Coordinate aux1jnt_r1: default_value=0 range=(-99999.9 99999.9) clamped=false
      Coordinate aux1jnt_r2: default_value=0 range=(-99999.9 99999.9) clamped=false
      PhysicalOffsetFrame cerv1_offset: socket_parent=/bodyset/cerv1 translation=(0.03751298 0.01291104 0)
      PhysicalOffsetFrame skull_offset: socket_parent=/bodyset/skull translation=(0 0 0)
      SpatialTransform: axes_held_at_zero=(translation1 translation2 translation3)
        TransformAxis rotation1: coordinates=aux1jnt_r3 axis=(0 0 1) LinearFunction(coefficients=1 0)
        TransformAxis rotation2: coordinates=aux1jnt_r1 axis=(1 0 0) LinearFunction(coefficients=1 0)
        TransformAxis rotation3: coordinates=aux1jnt_r2 axis=(0 1 0) LinearFunction(coefficients=1 0)
    WeldJoint jawjnt: socket_parent_frame=skull_offset socket_child_frame=jaw_offset
      PhysicalOffsetFrame skull_offset: socket_parent=/bodyset/skull translation=(0 0 0)
      PhysicalOffsetFrame jaw_offset: socket_parent=/bodyset/jaw translation=(0 0 0)
    WeldJoint thorax_spine: socket_parent_frame=spine_offset socket_child_frame=thorax_offset
      PhysicalOffsetFrame thorax_offset: socket_parent=/bodyset/thorax translation=(-0.111156 -0.294432 0)
      PhysicalOffsetFrame spine_offset: socket_parent=/bodyset/spine translation=(-0.111177 -0.006952 0)
  ConstraintSet:
    PointConstraint AC: socket_body_1=/bodyset/clavicle socket_body_2=/bodyset/scapula
        location_body_1=(-0.02924 0.02024 0.12005) location_body_2=(-0.01357 0.00011 -0.01523)
    CoordinateCouplerConstraint aux7jnt_r1_con: independent_coordinate_names=roll2 dependent_coordinate_name=aux7jnt_r1
      coupled_coordinates_function: SimmSpline: x=(-1.74533 1.74533) y=(-0.23911 0.23911)
    CoordinateCouplerConstraint aux7jnt_r2_con: independent_coordinate_names=yaw2 dependent_coordinate_name=aux7jnt_r2
      coupled_coordinates_function: SimmSpline: x=(-1.74533 1.74533) y=(-0.328122 0.328122)
    CoordinateCouplerConstraint aux7jnt_r3_con: independent_coordinate_names=pitch2
        dependent_coordinate_name=aux7jnt_r3
      coupled_coordinates_function: SimmSpline: x=(-1.74533 1.74533) y=(-0.326377 0.326377)
    CoordinateCouplerConstraint aux6jnt_r1_con: independent_coordinate_names=roll2 dependent_coordinate_name=aux6jnt_r1
      coupled_coordinates_function: SimmSpline: x=(-1.74533 1.74533) y=(-0.274017 0.274017)
    CoordinateCouplerConstraint aux6jnt_r2_con: independent_coordinate_names=yaw2 dependent_coordinate_name=aux6jnt_r2
      coupled_coordinates_function: SimmSpline: x=(-1.74533 1.74533) y=(-0.382227 0.382227)
    CoordinateCouplerConstraint aux6jnt_r3_con: independent_coordinate_names=pitch2
        dependent_coordinate_name=aux6jnt_r3
      coupled_coordinates_function: SimmSpline: x=(-1.74533 1.74533) y=(-0.383972 0.383972)
    CoordinateCouplerConstraint aux5jnt_r1_con: independent_coordinate_names=roll2 dependent_coordinate_name=aux5jnt_r1
      coupled_coordinates_function: SimmSpline: x=(-1.74533 1.74533) y=(-0.376991 0.376991)
    CoordinateCouplerConstraint aux5jnt_r2_con: independent_coordinate_names=yaw2 dependent_coordinate_name=aux5jnt_r2
      coupled_coordinates_function: SimmSpline: x=(-1.74533 1.74533) y=(-0.382227 0.382227)
    CoordinateCouplerConstraint aux5jnt_r3_con: independent_coordinate_names=pitch2
        dependent_coordinate_name=aux5jnt_r3
      coupled_coordinates_function: SimmSpline: x=(-1.74533 1.74533) y=(-0.383972 0.383972)
    CoordinateCouplerConstraint aux4jnt_r1_con: independent_coordinate_names=roll2 dependent_coordinate_name=aux4jnt_r1
      coupled_coordinates_function: SimmSpline: x=(-1.74533 1.74533) y=(-0.376991 0.376991)
    CoordinateCouplerConstraint aux4jnt_r2_con: independent_coordinate_names=yaw2 dependent_coordinate_name=aux4jnt_r2
      coupled_coordinates_function: SimmSpline: x=(-1.74533 1.74533) y=(-0.382227 0.382227)
    CoordinateCouplerConstraint aux4jnt_r3_con: independent_coordinate_names=pitch2
        dependent_coordinate_name=aux4jnt_r3
      coupled_coordinates_function: SimmSpline: x=(-1.74533 1.74533) y=(-0.287979 0.287979)
    CoordinateCouplerConstraint aux3jnt_r1_con: independent_coordinate_names=roll2 dependent_coordinate_name=aux3jnt_r1
      coupled_coordinates_function: SimmSpline: x=(-1.74533 1.74533) y=(-0.342085 0.342085)
    CoordinateCouplerConstraint aux3jnt_r2_con: independent_coordinate_names=yaw2 dependent_coordinate_name=aux3jnt_r2
      coupled_coordinates_function: SimmSpline: x=(-1.74533 1.74533) y=(-0.164061 0.164061)
    CoordinateCouplerConstraint aux3jnt_r3_con: independent_coordinate_names=pitch2
        dependent_coordinate_name=aux3jnt_r3
      coupled_coordinates_function: SimmSpline: x=(-1.74533 1.74533) y=(-0.191986 0.191986)
    CoordinateCouplerConstraint aux1jnt_r1_con: independent_coordinate_names=roll1 dependent_coordinate_name=aux1jnt_r1
      coupled_coordinates_function: SimmSpline: x=(-1.74533 1.74533) y=(-0.872665 0.872665)
    CoordinateCouplerConstraint aux1jnt_r2_con: independent_coordinate_names=yaw1 dependent_coordinate_name=aux1jnt_r2
      coupled_coordinates_function: SimmSpline: x=(-1.74533 1.74533) y=(-0.193732 0.193732)
    CoordinateCouplerConstraint aux1jnt_r3_con: independent_coordinate_names=pitch1
        dependent_coordinate_name=aux1jnt_r3
      coupled_coordinates_function: SimmSpline: x=(-1.74533 1.74533) y=(-0.970403 0.970403)
  ForceSet:
    Millard2012EquilibriumMuscle [values shared by the 128 below unless stated]:
      FiberForceLengthCurve
      TendonForceLengthCurve
      ActiveForceLengthCurve: min_norm_active_fiber_length=0.4441 transition_norm_fiber_length=0.73
          max_norm_active_fiber_length=1.8123 shallow_ascending_slope=0.8616 minimum_value=0
      ForceVelocityCurve: concentric_slope_at_vmax=0 concentric_slope_near_vmax=0.25 isometric_slope=5
          eccentric_slope_at_vmax=0 eccentric_slope_near_vmax=0.15 max_eccentric_velocity_force_multiplier=1.4
          concentric_curviness=0.6 eccentric_curviness=0.9
    Millard2012EquilibriumMuscle TrapeziusScapula_M: appliesForce=false optimal_force=1 max_isometric_force=470.4
        optimal_fiber_length=0.0832 tendon_slack_length=0.032 pennation_angle_at_optimal=0 [radians]
        max_contraction_velocity=10 ignore_tendon_compliance=true activation_time_constant=0.01 [seconds]
        deactivation_time_constant=0.04 [seconds] minimum_activation=0.01
      PathPoint TrapeziusScapula5-P1: thorax (-0.08448942 -0.000370542 -0.001766596)
      PathPoint TrapeziusScapula5-P2: scapula (-0.05824646 -0.001956695 -0.03631955)
      PathWrap: wrap_object=Thorax method=hybrid
      ActiveForceLengthCurve: minimum_value=0
      ForceVelocityCurve: concentric_slope_at_vmax=0 concentric_slope_near_vmax=0.25 isometric_slope=5
          eccentric_slope_at_vmax=0 eccentric_slope_near_vmax=0.15 max_eccentric_velocity_force_multiplier=1.4
    Millard2012EquilibriumMuscle TrapeziusScapula_I: optimal_force=1 max_isometric_force=414.4
        optimal_fiber_length=0.1264 tendon_slack_length=0.035 pennation_angle_at_optimal=0 max_contraction_velocity=10
        ignore_tendon_compliance=true activation_time_constant=0.01 deactivation_time_constant=0.04
        minimum_activation=0.01
      PathPoint TrapeziusScapula10-P1: thorax (-0.1016197 -0.1345713 0.001149972)
      PathPoint TrapeziusScapula10-P2: scapula (-0.07571951 -0.009450379 -0.07386386)
      PathWrap: wrap_object=Thorax method=hybrid
      ActiveForceLengthCurve: minimum_value=0
      ForceVelocityCurve: concentric_slope_at_vmax=0 concentric_slope_near_vmax=0.25 isometric_slope=5
          eccentric_slope_at_vmax=0 eccentric_slope_near_vmax=0.15 max_eccentric_velocity_force_multiplier=1.4
    Millard2012EquilibriumMuscle SerratusAnterior_I: optimal_force=1 max_isometric_force=430
        optimal_fiber_length=0.1587 tendon_slack_length=0 pennation_angle_at_optimal=0 max_contraction_velocity=10
        ignore_tendon_compliance=true activation_time_constant=0.01 deactivation_time_constant=0.04
        minimum_activation=0.01
      PathPoint SerratusAnterior4-P1: scapula (-0.1135498 -0.1122075 -0.08551825)
      PathPoint SerratusAnterior4-P2: thorax (-0.0005365024 -0.1704963 0.1482451)
      PathWrap: wrap_object=Thorax method=midpoint
      ActiveForceLengthCurve: minimum_value=0
      ForceVelocityCurve: concentric_slope_at_vmax=0 concentric_slope_near_vmax=0.25 isometric_slope=5
          eccentric_slope_at_vmax=0 eccentric_slope_near_vmax=0.15 max_eccentric_velocity_force_multiplier=1.4
    Millard2012EquilibriumMuscle SerratusAnterior_M: optimal_force=1 max_isometric_force=508
        optimal_fiber_length=0.1538 tendon_slack_length=0.012 pennation_angle_at_optimal=0 max_contraction_velocity=10
        ignore_tendon_compliance=true activation_time_constant=0.01 deactivation_time_constant=0.04
        minimum_activation=0.01
      PathPoint SerratusAnterior7-P1: scapula (-0.1031184 -0.08308359 -0.09859665)
      PathPoint SerratusAnterior7-P2: thorax (0.01669205 -0.07627655 0.1147328)
      PathWrap: wrap_object=Thorax method=hybrid
      ActiveForceLengthCurve: minimum_value=0
      ForceVelocityCurve: concentric_slope_at_vmax=0 concentric_slope_near_vmax=0.25 isometric_slope=5
          eccentric_slope_at_vmax=0 eccentric_slope_near_vmax=0.15 max_eccentric_velocity_force_multiplier=1.4
    Millard2012EquilibriumMuscle SerratusAnterior_S: optimal_force=1 max_isometric_force=387.8
        optimal_fiber_length=0.0945 tendon_slack_length=0 pennation_angle_at_optimal=0 max_contraction_velocity=10
        ignore_tendon_compliance=true activation_time_constant=0.01 deactivation_time_constant=0.04
        minimum_activation=0.01
      PathPoint SerratusAnterior12-P1: scapula (-0.0485097 0.009000365 -0.08464002)
      PathPoint SerratusAnterior12-P2: thorax (-0.02846127 -0.0145284 0.09934717)
      PathWrap: wrap_object=Thorax method=hybrid
      ActiveForceLengthCurve: minimum_value=0
      ForceVelocityCurve: concentric_slope_at_vmax=0 concentric_slope_near_vmax=0.25 isometric_slope=5
          eccentric_slope_at_vmax=0 eccentric_slope_near_vmax=0.15 max_eccentric_velocity_force_multiplier=1.4
    Millard2012EquilibriumMuscle Rhomboideus_S: optimal_force=1 max_isometric_force=200.2 optimal_fiber_length=0.0986
        tendon_slack_length=0.015 pennation_angle_at_optimal=0 max_contraction_velocity=10
        activation_time_constant=0.01 deactivation_time_constant=0.04 minimum_activation=0.01
      PathPoint Rhomboideus1-P1: thorax (-0.07329973 0.04018027 -0.002039944)
      PathPoint Rhomboideus1-P2: scapula (-0.08266947 -0.02291091 -0.1017337)
      PathWrap: wrap_object=Thorax method=hybrid
      ActiveForceLengthCurve: minimum_value=0
      ForceVelocityCurve: concentric_slope_at_vmax=0 concentric_slope_near_vmax=0.25 isometric_slope=5
          eccentric_slope_at_vmax=0 eccentric_slope_near_vmax=0.15 max_eccentric_velocity_force_multiplier=1.4
    Millard2012EquilibriumMuscle Rhomboideus_I: optimal_force=1 max_isometric_force=407.4 optimal_fiber_length=0.1152
        tendon_slack_length=0.028 pennation_angle_at_optimal=0 max_contraction_velocity=10
        activation_time_constant=0.01 deactivation_time_constant=0.04 minimum_activation=0.01
      PathPoint Rhomboideus4-P1: thorax (-0.09065969 -0.009270059 -0.0005099876)
      PathPoint Rhomboideus4-P2: scapula (-0.1062559 -0.1067126 -0.09272444)
      PathWrap: wrap_object=Thorax method=hybrid
      ActiveForceLengthCurve: minimum_value=0
      ForceVelocityCurve: concentric_slope_at_vmax=0 concentric_slope_near_vmax=0.25 isometric_slope=5
          eccentric_slope_at_vmax=0 eccentric_slope_near_vmax=0.15 max_eccentric_velocity_force_multiplier=1.4
    Millard2012EquilibriumMuscle Coracobrachialis: optimal_force=1 max_isometric_force=648.2
        optimal_fiber_length=0.0683 tendon_slack_length=0.104 pennation_angle_at_optimal=0 max_contraction_velocity=10
        ignore_tendon_compliance=true activation_time_constant=0.01 deactivation_time_constant=0.04
        minimum_activation=0.01
      PathPoint Coracobrachialis2-P1: scapula (0.008268217 -0.04243476 -0.02809138)
      PathPoint Coracobrachialis2-P2: humerus (-0.002310007 -0.1450006 -0.009329949)
      ActiveForceLengthCurve: minimum_value=0
      ForceVelocityCurve: concentric_slope_at_vmax=0 concentric_slope_near_vmax=0.25 isometric_slope=5
          eccentric_slope_at_vmax=0 eccentric_slope_near_vmax=0.15 max_eccentric_velocity_force_multiplier=1.4
    Millard2012EquilibriumMuscle DeltoideusClavicle_A: optimal_force=1 max_isometric_force=707.7
        optimal_fiber_length=0.094 tendon_slack_length=0.088 pennation_angle_at_optimal=0.08726646
        max_contraction_velocity=10 activation_time_constant=0.01 deactivation_time_constant=0.04
        minimum_activation=0.01
      PathPoint DeltoideusClavicle2-P1: clavicle (-0.02276249 0.01949127 0.08409301)
      PathPoint DeltoideusClavicle2-P2: scapula (0.01956223 -0.006587086 0.01039769)
      PathPoint DeltoideusClavicle2-P3: humerus (0.006643661 -0.1098052 0.001147419)
      PathWrap: wrap_object=deltsca method=hybrid
      ActiveForceLengthCurve: minimum_value=0
      ForceVelocityCurve: concentric_slope_at_vmax=0 concentric_slope_near_vmax=0.25 isometric_slope=5
          eccentric_slope_at_vmax=0 eccentric_slope_near_vmax=0.15 max_eccentric_velocity_force_multiplier=1.4
    Millard2012EquilibriumMuscle DeltoideusScapula_P: optimal_force=1 max_isometric_force=1324.4
        optimal_fiber_length=0.0949 tendon_slack_length=0.076 pennation_angle_at_optimal=0.08726646
        max_contraction_velocity=10 activation_time_constant=0.01 deactivation_time_constant=0.04
        minimum_activation=0.01
      PathPoint DeltoideusScapulaPost2-P1: scapula (-0.05773754 -0.006911591 -0.02722949)
      PathPoint DeltoideusScapulaPost2-P2: scapula (-0.05500274 -0.03236589 0.007352698)
      PathPoint DeltoideusScapulaPost2-P3: humerus (-0.004765912 -0.08616251 0.006239072)
      PathWrap: wrap_object=deltsca method=hybrid
      ActiveForceLengthCurve: minimum_value=0
      ForceVelocityCurve: concentric_slope_at_vmax=0 concentric_slope_near_vmax=0.25 isometric_slope=5
          eccentric_slope_at_vmax=0 eccentric_slope_near_vmax=0.15 max_eccentric_velocity_force_multiplier=1.4
    Millard2012EquilibriumMuscle DeltoideusScapula_M: optimal_force=1 max_isometric_force=2597.8
        optimal_fiber_length=0.0748 tendon_slack_length=0.064 pennation_angle_at_optimal=0.08726646
        max_contraction_velocity=10 activation_time_constant=0.01 deactivation_time_constant=0.04
        minimum_activation=0.01
      PathPoint DeltoideusScapulaLat10-P1: scapula (-0.0160202 0.002034034 0.007797879)
      PathPoint DeltoideusScapulaLat10-P2: scapula (-0.005137831 -0.006741224 0.03102894)
      PathPoint DeltoideusScapulaLat10-P3: humerus (-0.004312765 -0.1004549 0.003845535)
      PathWrap: wrap_object=deltsca method=hybrid
      ActiveForceLengthCurve: minimum_value=0
      ForceVelocityCurve: concentric_slope_at_vmax=0 concentric_slope_near_vmax=0.25 isometric_slope=5
          eccentric_slope_at_vmax=0 eccentric_slope_near_vmax=0.15 max_eccentric_velocity_force_multiplier=1.4
    Millard2012EquilibriumMuscle LatissimusDorsi_S: optimal_force=1 max_isometric_force=201.6
        optimal_fiber_length=0.2109 tendon_slack_length=0.081 pennation_angle_at_optimal=0 max_contraction_velocity=10
        ignore_tendon_compliance=true activation_time_constant=0.01 deactivation_time_constant=0.04
        minimum_activation=0.01
      PathPoint LatissimusDorsi1-P1: thorax (-0.1008797 -0.1166313 0.001709958)
      PathPoint LatissimusDorsi1-P2: thorax (-0.1155 -0.1163913 0.02879929)
      MovingPathPoint LatissimusDorsi1-P3: thorax socket_x_coordinate=/jointset/GlenoHumeral/shoulder_elv
          socket_y_coordinate=/jointset/GlenoHumeral/shoulder_elv
          socket_z_coordinate=/jointset/GlenoHumeral/shoulder_elv
        x_location: MultiplierFunction: scale=0.9999964
          SimmSpline: x=(0 3.14159) y=(-0.122564 -0.123775)
        y_location: MultiplierFunction: scale=1.000007
          SimmSpline: x=(0 3.14159) y=(-0.098615 -0.106769)
        z_location: MultiplierFunction: scale=0.9999763
          SimmSpline: x=(0 3.14159) y=(0.101016 0.114972)
      MovingPathPoint LatissimusDorsi1-P4: thorax socket_x_coordinate=/jointset/GlenoHumeral/shoulder_elv
          socket_y_coordinate=/jointset/GlenoHumeral/shoulder_elv
          socket_z_coordinate=/jointset/GlenoHumeral/shoulder_elv
        x_location: MultiplierFunction: scale=0.9999964
          SimmSpline: x=(0 3.14159) y=(-0.09279 -0.094357)
        y_location: MultiplierFunction: scale=1.000007
          SimmSpline: x=(0 3.14159) y=(-0.08329 -0.084707)
        z_location: MultiplierFunction: scale=0.9999763
          SimmSpline: x=(0 3.14159) y=(0.13581 0.144557)
      PathPoint LatissimusDorsi1-P5: humerus (0.005879996 -0.01904013 -0.003449986)
      PathWrap: wrap_object=Thorax method=hybrid
      ActiveForceLengthCurve: minimum_value=0
      ForceVelocityCurve: concentric_slope_at_vmax=0 concentric_slope_near_vmax=0.25 isometric_slope=5
          eccentric_slope_at_vmax=0 eccentric_slope_near_vmax=0.15 max_eccentric_velocity_force_multiplier=1.4
    Millard2012EquilibriumMuscle LatissimusDorsi_M: optimal_force=1 max_isometric_force=315 optimal_fiber_length=0.2656
        tendon_slack_length=0.0945 pennation_angle_at_optimal=0 max_contraction_velocity=10
        ignore_tendon_compliance=true activation_time_constant=0.01 deactivation_time_constant=0.04
        minimum_activation=0.01
      PathPoint LatissimusDorsi3-P1: thorax (-0.09081969 -0.2174517 -0.001559965)
      PathPoint LatissimusDorsi3-P2: thorax (-0.1076798 -0.2054421 0.0262294)
      MovingPathPoint LatissimusDorsi3-P3: thorax socket_x_coordinate=/jointset/GlenoHumeral/shoulder_elv
          socket_y_coordinate=/jointset/GlenoHumeral/shoulder_elv
          socket_z_coordinate=/jointset/GlenoHumeral/shoulder_elv
        x_location: MultiplierFunction: scale=0.9999964
          SimmSpline: x=(0 3.14159) y=(-0.103889 -0.101761)
        y_location: MultiplierFunction: scale=1.000007
          SimmSpline: x=(0 3.14159) y=(-0.147585 -0.149604)
        z_location: MultiplierFunction: scale=0.9999763
          SimmSpline: x=(0 3.14159) y=(0.113647 0.122566)
      MovingPathPoint LatissimusDorsi3-P4: thorax socket_x_coordinate=/jointset/GlenoHumeral/shoulder_elv
          socket_y_coordinate=/jointset/GlenoHumeral/shoulder_elv
          socket_z_coordinate=/jointset/GlenoHumeral/shoulder_elv
        x_location: MultiplierFunction: scale=0.9999964
          SimmSpline: x=(0 3.14159) y=(-0.076222 -0.077789)
        y_location: MultiplierFunction: scale=1.000007
          SimmSpline: x=(0 3.14159) y=(-0.110351 -0.111768)
        z_location: MultiplierFunction: scale=0.9999763
          SimmSpline: x=(0 3.14159) y=(0.140024 0.148771)
      PathPoint LatissimusDorsi3-P5: humerus (0.005779996 -0.04100028 -0.0009999978)
      PathWrap: wrap_object=Thorax method=hybrid
      ActiveForceLengthCurve: minimum_value=0
      ForceVelocityCurve: concentric_slope_at_vmax=0 concentric_slope_near_vmax=0.25 isometric_slope=5
          eccentric_slope_at_vmax=0 eccentric_slope_near_vmax=0.15 max_eccentric_velocity_force_multiplier=1.4
    Millard2012EquilibriumMuscle LatissimusDorsi_I: optimal_force=1 max_isometric_force=270.2
        optimal_fiber_length=0.3062 tendon_slack_length=0.0621 pennation_angle_at_optimal=0 max_contraction_velocity=10
        ignore_tendon_compliance=true activation_time_constant=0.01 deactivation_time_constant=0.04
        minimum_activation=0.01
      PathPoint LatissimusDorsi6-P1: thorax (-0.0627381 -0.254808 0.0906117)
      PathPoint LatissimusDorsi6-P2: thorax (-0.06719026 -0.1861642 0.1455871)
      MovingPathPoint LatissimusDorsi6-P3: thorax socket_x_coordinate=/jointset/GlenoHumeral/shoulder_elv
          socket_y_coordinate=/jointset/GlenoHumeral/shoulder_elv
          socket_z_coordinate=/jointset/GlenoHumeral/shoulder_elv
        x_location: MultiplierFunction: scale=0.9999701
          SimmSpline: x=(0 3.14159) y=(-0.040258 -0.031577)
        y_location: MultiplierFunction: scale=0.9999528
          SimmSpline: x=(0 3.14159) y=(-0.116638 -0.109479)
        z_location: MultiplierFunction: scale=1.000018
          SimmSpline: x=(0 3.14159) y=(0.146215 0.149666)
      PathPoint LatissimusDorsi6-P4: humerus (0.00422003 -0.0499984 -0.000179999)
      PathWrap: wrap_object=Thorax method=hybrid
      ActiveForceLengthCurve: minimum_value=0
      ForceVelocityCurve: concentric_slope_at_vmax=0 concentric_slope_near_vmax=0.25 isometric_slope=5
          eccentric_slope_at_vmax=0 eccentric_slope_near_vmax=0.15 max_eccentric_velocity_force_multiplier=1.4
    Millard2012EquilibriumMuscle PectoralisMajorClavicle_S: optimal_force=1 max_isometric_force=408.8
        optimal_fiber_length=0.1091 tendon_slack_length=0.014 pennation_angle_at_optimal=0 max_contraction_velocity=10
        ignore_tendon_compliance=true activation_time_constant=0.01 deactivation_time_constant=0.04
        minimum_activation=0.01
      PathPoint PectoralisMajorClavicle1-P1: clavicle (0.004599161 0.006818597 0.04738914)
      PathPoint PectoralisMajorClavicle1-P2: humerus (0.01007514 -0.04214492 -0.002600737)
      PathWrap: wrap_object=Thorax method=hybrid
      ActiveForceLengthCurve: minimum_value=0
      ForceVelocityCurve: concentric_slope_at_vmax=0 concentric_slope_near_vmax=0.25 isometric_slope=5
          eccentric_slope_at_vmax=0 eccentric_slope_near_vmax=0.15 max_eccentric_velocity_force_multiplier=1.4
    Millard2012EquilibriumMuscle PectoralisMajorThorax_I: optimal_force=1 max_isometric_force=571.2
        optimal_fiber_length=0.183 tendon_slack_length=0.043 pennation_angle_at_optimal=0 max_contraction_velocity=10
        ignore_tendon_compliance=true activation_time_constant=0.01 deactivation_time_constant=0.04
        minimum_activation=0.01
      PathPoint PectoralisMajorThorax2-P1: thorax (0.0532098 -0.1156612 0.02473946)
      PathPoint PectoralisMajorThorax2-P2: humerus (0.009999942 -0.03000015 0)
      PathWrap: wrap_object=Thorax method=hybrid
      ActiveForceLengthCurve: minimum_value=0
      ForceVelocityCurve: concentric_slope_at_vmax=0 concentric_slope_near_vmax=0.25 isometric_slope=5
          eccentric_slope_at_vmax=0 eccentric_slope_near_vmax=0.15 max_eccentric_velocity_force_multiplier=1.4
    Millard2012EquilibriumMuscle PectoralisMajorThorax_M: optimal_force=1 max_isometric_force=683.2
        optimal_fiber_length=0.15 tendon_slack_length=0.026 pennation_angle_at_optimal=0 max_contraction_velocity=10
        ignore_tendon_compliance=true activation_time_constant=0.01 deactivation_time_constant=0.04
        minimum_activation=0.01
      PathPoint PectoralisMajorThorax5-P1: thorax (0.01953991 -0.03800205 0.01299945)
      PathPoint PectoralisMajorThorax5-P2: humerus (0.01018524 -0.02620401 -0.003150686)
      PathWrap: wrap_object=Thorax method=hybrid
      ActiveForceLengthCurve: minimum_value=0
      ForceVelocityCurve: concentric_slope_at_vmax=0 concentric_slope_near_vmax=0.25 isometric_slope=5
          eccentric_slope_at_vmax=0 eccentric_slope_near_vmax=0.15 max_eccentric_velocity_force_multiplier=1.4
    Millard2012EquilibriumMuscle TeresMajor: optimal_force=1 max_isometric_force=851.2 optimal_fiber_length=0.141
        tendon_slack_length=0.006 pennation_angle_at_optimal=0 max_contraction_velocity=10
        ignore_tendon_compliance=true activation_time_constant=0.01 deactivation_time_constant=0.04
        minimum_activation=0.01
      PathPoint TeresMajor1-P1: scapula (-0.1044089 -0.1174155 -0.07209449)
      PathPoint TeresMajor1-P2: humerus (0.004320005 -0.0390002 -0.001699998)
      PathWrap: wrap_object=Thorax method=hybrid
      PathWrap pathwrap_0: wrap_object=Tmajscapula method=hybrid
      ActiveForceLengthCurve: minimum_value=0
      ForceVelocityCurve: concentric_slope_at_vmax=0 concentric_slope_near_vmax=0.25 isometric_slope=5
          eccentric_slope_at_vmax=0 eccentric_slope_near_vmax=0.15 max_eccentric_velocity_force_multiplier=1.4
    Millard2012EquilibriumMuscle Infraspinatus_I: optimal_force=1 max_isometric_force=1037.4
        optimal_fiber_length=0.0677 tendon_slack_length=0.084 pennation_angle_at_optimal=0 max_contraction_velocity=10
        activation_time_constant=0.01 deactivation_time_constant=0.04 minimum_activation=0.01
      PathPoint Infraspinatus3-P1: scapula (-0.09906948 -0.08085326 -0.08126122)
      PathPoint Infraspinatus3-P2: humerus (-0.01716203 -0.005729996 0.02480714)
      PathWrap: wrap_object=Infra method=hybrid
      PathWrap pathwrap_0: wrap_object=hheadInfra method=hybrid
      ActiveForceLengthCurve: minimum_value=0
      ForceVelocityCurve: concentric_slope_at_vmax=0 concentric_slope_near_vmax=0.25 isometric_slope=5
          eccentric_slope_at_vmax=0 eccentric_slope_near_vmax=0.15 max_eccentric_velocity_force_multiplier=1.4
    Millard2012EquilibriumMuscle Infraspinatus_S: optimal_force=1 max_isometric_force=967.4 optimal_fiber_length=0.0698
        tendon_slack_length=0.05 pennation_angle_at_optimal=0 max_contraction_velocity=10 activation_time_constant=0.01
        deactivation_time_constant=0.04 minimum_activation=0.01
      PathPoint Infraspinatus5-P1: scapula (-0.0834295 -0.03227129 -0.08687932)
      PathPoint Infraspinatus5-P2: humerus (-0.01433362 0.002719085 0.02220397)
      PathWrap: wrap_object=Infra method=hybrid
      PathWrap pathwrap_0: wrap_object=hheadInfra method=hybrid
      ActiveForceLengthCurve: minimum_value=0
      ForceVelocityCurve: concentric_slope_at_vmax=0 concentric_slope_near_vmax=0.25 isometric_slope=5
          eccentric_slope_at_vmax=0 eccentric_slope_near_vmax=0.15 max_eccentric_velocity_force_multiplier=1.4
    Millard2012EquilibriumMuscle PectoralisMinor: optimal_force=1 max_isometric_force=429.8 optimal_fiber_length=0.1183
        tendon_slack_length=0.032 pennation_angle_at_optimal=0 max_contraction_velocity=10
        ignore_tendon_compliance=true activation_time_constant=0.01 deactivation_time_constant=0.04
        minimum_activation=0.01
      PathPoint PectoralisMinor3-P1: thorax (0.04772946 -0.1040096 0.09117807)
      PathPoint PectoralisMinor3-P2: scapula (0.0108746 -0.03504135 -0.02294082)
      PathWrap: wrap_object=Thorax method=hybrid
      ActiveForceLengthCurve: minimum_value=0
      ForceVelocityCurve: concentric_slope_at_vmax=0 concentric_slope_near_vmax=0.25 isometric_slope=5
          eccentric_slope_at_vmax=0 eccentric_slope_near_vmax=0.15 max_eccentric_velocity_force_multiplier=1.4
    Millard2012EquilibriumMuscle TeresMinor: optimal_force=1 max_isometric_force=695.8 optimal_fiber_length=0.055
        tendon_slack_length=0.051 pennation_angle_at_optimal=0 max_contraction_velocity=10
        activation_time_constant=0.01 deactivation_time_constant=0.04 minimum_activation=0.01
      PathPoint TeresMinor2-P1: scapula (-0.08436943 -0.06605265 -0.04228502)
      PathPoint TeresMinor2-P2: humerus (-0.01587001 -0.00936005 0.01084989)
      PathWrap: wrap_object=hheadsupraTminor method=hybrid
      ActiveForceLengthCurve: minimum_value=0
      ForceVelocityCurve: concentric_slope_at_vmax=0 concentric_slope_near_vmax=0.25 isometric_slope=5
          eccentric_slope_at_vmax=0 eccentric_slope_near_vmax=0.15 max_eccentric_velocity_force_multiplier=1.4
    Millard2012EquilibriumMuscle Subscapularis_S: optimal_force=1 max_isometric_force=540.4 optimal_fiber_length=0.0676
        tendon_slack_length=0.059 pennation_angle_at_optimal=0.08726646 max_contraction_velocity=10
        activation_time_constant=0.01 deactivation_time_constant=0.04 minimum_activation=0.01
      PathPoint Subscapularis3-P1: scapula (-0.07878953 -0.0312712 -0.09026811)
      PathPoint Subscapularis3-P2: humerus (0.0180001 -0.0002300018 -0.01199989)
      PathWrap: wrap_object=Subscapuralis method=hybrid
      PathWrap pathwrap_0: wrap_object=hhead method=hybrid
      ActiveForceLengthCurve: minimum_value=0
      ForceVelocityCurve: concentric_slope_at_vmax=0 concentric_slope_near_vmax=0.25 isometric_slope=5
          eccentric_slope_at_vmax=0 eccentric_slope_near_vmax=0.15 max_eccentric_velocity_force_multiplier=1.4
    Millard2012EquilibriumMuscle Subscapularis_M: optimal_force=1 max_isometric_force=609 optimal_fiber_length=0.0744
        tendon_slack_length=0.055 pennation_angle_at_optimal=0.08726646 max_contraction_velocity=10
        activation_time_constant=0.01 deactivation_time_constant=0.04 minimum_activation=0.01
      PathPoint Subscapularis4-P1: scapula (-0.0835695 -0.0549122 -0.07474355)
      PathPoint Subscapularis4-P2: humerus (0.0163911 0.0009578058 -0.01943508)
      PathWrap: wrap_object=Subscapuralis method=hybrid
      PathWrap pathwrap_0: wrap_object=hhead method=hybrid
      ActiveForceLengthCurve: minimum_value=0
      ForceVelocityCurve: concentric_slope_at_vmax=0 concentric_slope_near_vmax=0.25 isometric_slope=5
          eccentric_slope_at_vmax=0 eccentric_slope_near_vmax=0.15 max_eccentric_velocity_force_multiplier=1.4
    Millard2012EquilibriumMuscle Subscapularis_I: optimal_force=1 max_isometric_force=854 optimal_fiber_length=0.0721
        tendon_slack_length=0.059 pennation_angle_at_optimal=0 max_contraction_velocity=10
        activation_time_constant=0.01 deactivation_time_constant=0.04 minimum_activation=0.01
      PathPoint Subscapularis9-P1: scapula (-0.09506943 -0.09765395 -0.08536976)
      PathPoint Subscapularis9-P2: humerus (0.01098384 -0.003407341 -0.01952578)
      PathWrap: wrap_object=Subscapuralis method=hybrid
      PathWrap pathwrap_0: wrap_object=hhead method=hybrid
      ActiveForceLengthCurve: minimum_value=0
      ForceVelocityCurve: concentric_slope_at_vmax=0 concentric_slope_near_vmax=0.25 isometric_slope=5
          eccentric_slope_at_vmax=0 eccentric_slope_near_vmax=0.15 max_eccentric_velocity_force_multiplier=1.4
    Millard2012EquilibriumMuscle Supraspinatus_P: optimal_force=1 max_isometric_force=326.2 optimal_fiber_length=0.0591
        tendon_slack_length=0.025 pennation_angle_at_optimal=0 max_contraction_velocity=10
        activation_time_constant=0.01 deactivation_time_constant=0.04 minimum_activation=0.01
      PathPoint Supraspinatus2-P1: scapula (-0.06052965 -0.001380052 -0.04945257)
      PathPoint Supraspinatus2-P2: humerus (0.01016974 0.009567758 0.02005038)
      PathWrap: wrap_object=hheadsupraTminor method=hybrid
      ActiveForceLengthCurve: minimum_value=0
      ForceVelocityCurve: concentric_slope_at_vmax=0 concentric_slope_near_vmax=0.25 isometric_slope=5
          eccentric_slope_at_vmax=0 eccentric_slope_near_vmax=0.15 max_eccentric_velocity_force_multiplier=1.4
    Millard2012EquilibriumMuscle Supraspinatus_A: optimal_force=1 max_isometric_force=543.2 optimal_fiber_length=0.0554
        tendon_slack_length=0.031 pennation_angle_at_optimal=0 max_contraction_velocity=10
        activation_time_constant=0.01 deactivation_time_constant=0.04 minimum_activation=0.01
      PathPoint Supraspinatus4-P1: scapula (-0.04899312 0.001355703 -0.06924731)
      PathPoint Supraspinatus4-P2: humerus (0.01778 0.01764008 0.009649948)
      PathWrap: wrap_object=Thorax method=hybrid
      PathWrap pathwrap_0: wrap_object=hheadsupraTminor method=hybrid
      ActiveForceLengthCurve: minimum_value=0
      ForceVelocityCurve: concentric_slope_at_vmax=0 concentric_slope_near_vmax=0.25 isometric_slope=5
          eccentric_slope_at_vmax=0 eccentric_slope_near_vmax=0.15 max_eccentric_velocity_force_multiplier=1.4
    Millard2012EquilibriumMuscle TRIlong: optimal_force=1 max_isometric_force=1580.6 optimal_fiber_length=0.0969
        tendon_slack_length=0.2412 pennation_angle_at_optimal=0.174533 max_contraction_velocity=10
        activation_time_constant=0.01 deactivation_time_constant=0.04 minimum_activation=0.01
      PathPoint TRIlong2-P1: ulna (-0.019462 -0.0291087 0.00865977)
      PathPoint TRIlong2-P2: scapula (-0.04209976 -0.05190463 -0.01292079)
      ActiveForceLengthCurve: minimum_value=0
      ForceVelocityCurve: concentric_slope_at_vmax=0 concentric_slope_near_vmax=0.25 isometric_slope=5
          eccentric_slope_at_vmax=0 eccentric_slope_near_vmax=0.15 max_eccentric_velocity_force_multiplier=1.4
    Millard2012EquilibriumMuscle BIC_long: optimal_force=1 max_isometric_force=485.8 optimal_fiber_length=0.1421
        tendon_slack_length=0.2568 pennation_angle_at_optimal=0 max_contraction_velocity=10
        activation_time_constant=0.01 deactivation_time_constant=0.04 minimum_activation=0.01
      PathPoint P1: scapula (-0.02258724 -0.01632949 -0.01813583)
      PathPoint P2: humerus (0.01183063 0.02814188 0.02003838)
      PathPoint P3: radius (-0.00088465 -0.0439944 -0.00945516)
      PathWrap: wrap_object=hhead method=hybrid
      ActiveForceLengthCurve: minimum_value=0
      ForceVelocityCurve: concentric_slope_at_vmax=0 concentric_slope_near_vmax=0.25 isometric_slope=5
          eccentric_slope_at_vmax=0 eccentric_slope_near_vmax=0.15 max_eccentric_velocity_force_multiplier=1.4
    Millard2012EquilibriumMuscle BIC_brevis: optimal_force=1 max_isometric_force=693 optimal_fiber_length=0.1264
        tendon_slack_length=0.212 pennation_angle_at_optimal=0 max_contraction_velocity=10
        activation_time_constant=0.01 deactivation_time_constant=0.04 minimum_activation=0.01
      PathPoint BIC_brevis2-P1: scapula (0.009547415 -0.03822361 -0.02423876)
      PathPoint BIC_brevis2-P2: radius (0.00020307 -0.0442563 -0.00985953)
      ActiveForceLengthCurve: minimum_value=0
      ForceVelocityCurve: concentric_slope_at_vmax=0 concentric_slope_near_vmax=0.25 isometric_slope=5
          eccentric_slope_at_vmax=0 eccentric_slope_near_vmax=0.15 max_eccentric_velocity_force_multiplier=1.4
    Millard2012EquilibriumMuscle digastric_post: max_isometric_force=40.6 optimal_fiber_length=0.0177397
        tendon_slack_length=0.0295379 pennation_angle_at_optimal=0.2496 minimum_activation=0.01
      PathPoint digastric-post-P1: skull (-0.005278643 0.002942195 0.04127726)
      PathPoint digastric-post-P2: cerv3 (0.0200848 0.005166156 0.02483558)
    Millard2012EquilibriumMuscle digastric_ant: max_isometric_force=40.6 optimal_fiber_length=0.01228799
        tendon_slack_length=0.004326757 pennation_angle_at_optimal=0 minimum_activation=0.01
      PathPoint digastric-post-P1: skull (0.02622015 -0.05564209 0.01497058)
      PathPoint digastric-post-P2: cerv1 (0.06307546 -0.04982693 0.004932503)
    Millard2012EquilibriumMuscle Geniohyoid: max_isometric_force=33.95 optimal_fiber_length=0.02968155
        tendon_slack_length=0.004690204 pennation_angle_at_optimal=0 minimum_activation=0.01
      PathPoint digastric-post-P1: cerv1 (0.06312738 -0.04593285 0.004932503)
      PathPoint digastric-post-P2: skull (0.05979578 -0.05823814 0.001384562)
    Millard2012EquilibriumMuscle Mylohyoid_Post: max_isometric_force=18.55 optimal_fiber_length=0.02440291
        tendon_slack_length=0.0121265 pennation_angle_at_optimal=0 minimum_activation=0.01
      PathPoint digastric-post-P1: cerv1 (0.06511769 -0.04835583 0.002682589)
      PathPoint digastric-post-P2: skull (0.03573901 -0.03366217 0.02518172)
    Millard2012EquilibriumMuscle Mylohyoid_Ant: max_isometric_force=55.65 optimal_fiber_length=0.01730703
        tendon_slack_length=0.002371063 pennation_angle_at_optimal=0 default_fiber_length=0.1 minimum_activation=0.01
      PathPoint digastric-post-P1: cerv1 (0.08415542 -0.04904811 -0.002682589)
      PathPoint digastric-post-P2: skull (0.05010384 -0.05157494 0.01367255)
    Millard2012EquilibriumMuscle Stylohyoid_Lat: max_isometric_force=6.825 optimal_fiber_length=0.01574939
        tendon_slack_length=0.04287816 pennation_angle_at_optimal=0.082 minimum_activation=0.01
      PathPoint digastric-post-P1: skull (0.00977847 -0.0006922811 0.03253721)
      PathPoint digastric-post-P2: cerv1 (0.05646417 -0.04255798 0.01375909)
    Millard2012EquilibriumMuscle Stylohyoid_Med: max_isometric_force=6.825 optimal_fiber_length=0.01574939
        tendon_slack_length=0.03775053 pennation_angle_at_optimal=0.08203 minimum_activation=0.01
      PathPoint digastric-post-P1: skull (0.01021115 -0.001730703 0.03253721)
      PathPoint digastric-post-P2: cerv1 (0.05542575 -0.03857736 0.01445137)
    Millard2012EquilibriumMuscle Sterno_hyoid: max_isometric_force=20.3 optimal_fiber_length=0.06420907
        tendon_slack_length=0.02751817 pennation_angle_at_optimal=0 minimum_activation=0.01
      PathPoint stern_mast-P1: cerv3 (0.04968847 -0.02002423 0.00544306)
      PathPoint default: spine (-0.01214348 0.2704396 0.01716857)
    Millard2012EquilibriumMuscle SternoThyroid: max_isometric_force=22.75 optimal_fiber_length=0.05360852
        tendon_slack_length=0.02297508 pennation_angle_at_optimal=0 minimum_activation=0.01
      PathPoint stern_mast-P1: cerv3 (0.03497759 -0.03734856 0.01150917)
      PathPoint default: spine (-0.01267134 0.2645812 0.01323988)
    Millard2012EquilibriumMuscle Omo_hyoid: max_isometric_force=26.25 optimal_fiber_length=0.03967636
        tendon_slack_length=0.01700415 pennation_angle_at_optimal=0 minimum_activation=0.01
      PathPoint stern_mast-P1: cerv3 (0.04510211 -0.01202838 0.01142264)
      PathPoint default: spine (-0.01820093 0.3208982 0.03265836)
    Millard2012EquilibriumMuscle digastric_post_L: max_isometric_force=40.6 optimal_fiber_length=0.0177397
        tendon_slack_length=0.0295379 pennation_angle_at_optimal=0.2496 minimum_activation=0.01
      PathPoint digastric-post-P1: skull (-0.005278643 0.002942195 -0.04127726)
      PathPoint digastric-post-P2: cerv3 (0.0200848 0.005166156 -0.02483558)
    Millard2012EquilibriumMuscle digastric_ant_L: max_isometric_force=40.6 optimal_fiber_length=0.01228799
        tendon_slack_length=0.004326757 pennation_angle_at_optimal=0 minimum_activation=0.01
      PathPoint digastric-post-P1: skull (0.02622015 -0.05564209 -0.01497058)
      PathPoint digastric-post-P2: cerv1 (0.06307546 -0.04982693 -0.004932503)
    Millard2012EquilibriumMuscle Geniohyoid_L: max_isometric_force=33.95 optimal_fiber_length=0.02968155
        tendon_slack_length=0.004690204 pennation_angle_at_optimal=0 minimum_activation=0.01
      PathPoint digastric-post-P1: cerv1 (0.06312738 -0.04593285 -0.004932503)
      PathPoint digastric-post-P2: skull (0.05979578 -0.05823814 -0.001384562)
    Millard2012EquilibriumMuscle Mylohyoid_Post_L: max_isometric_force=18.55 optimal_fiber_length=0.02440291
        tendon_slack_length=0.0121265 pennation_angle_at_optimal=0 minimum_activation=0.01
      PathPoint digastric-post-P1: cerv1 (0.06511769 -0.04835583 -0.002682589)
      PathPoint digastric-post-P2: skull (0.03573901 -0.03366217 -0.02518172)
    Millard2012EquilibriumMuscle Mylohyoid_Ant_L: max_isometric_force=55.65 optimal_fiber_length=0.01730703
        tendon_slack_length=0.002371063 pennation_angle_at_optimal=0 minimum_activation=0.01
      PathPoint digastric-post-P1: cerv1 (0.08415542 -0.04904811 0.002682589)
      PathPoint digastric-post-P2: skull (0.05010384 -0.05157494 -0.01367255)
    Millard2012EquilibriumMuscle Stylohyoid_Lat_L: max_isometric_force=6.825 optimal_fiber_length=0.01574939
        tendon_slack_length=0.04287816 pennation_angle_at_optimal=0.082 minimum_activation=0.01
      PathPoint digastric-post-P1: skull (0.00977847 -0.0006922811 -0.03253721)
      PathPoint digastric-post-P2: cerv3 (0.02553652 -0.01309277 -0.01375909)
    Millard2012EquilibriumMuscle Stylohyoid_Med_L: max_isometric_force=6.825 optimal_fiber_length=0.01574939
        tendon_slack_length=0.03775053 pennation_angle_at_optimal=0.08203 minimum_activation=0.01
      PathPoint digastric-post-P1: skull (0.01021115 -0.001730703 -0.03253721)
      PathPoint digastric-post-P2: cerv3 (0.0244981 -0.00911215 -0.01445137)
    Millard2012EquilibriumMuscle Sterno_hyoid_L: max_isometric_force=20.3 optimal_fiber_length=0.06420907
        tendon_slack_length=0.02751817 pennation_angle_at_optimal=0 minimum_activation=0.01
      PathPoint stern_mast-P1: cerv3 (0.04968847 -0.02002423 -0.00544306)
      PathPoint default: spine (-0.01214348 0.2704396 -0.01716857)
    Millard2012EquilibriumMuscle SternoThyroid_L: max_isometric_force=22.75 optimal_fiber_length=0.05360852
        tendon_slack_length=0.02297508 pennation_angle_at_optimal=0 minimum_activation=0.01
      PathPoint stern_mast-P1: cerv3 (0.03497759 -0.03734856 -0.01150917)
      PathPoint default: spine (-0.01267134 0.2645812 -0.01323988)
    Millard2012EquilibriumMuscle Omo_hyoid_L: max_isometric_force=26.25 optimal_fiber_length=0.03967636
        tendon_slack_length=0.01700415 pennation_angle_at_optimal=0 minimum_activation=0.01
      PathPoint stern_mast-P1: cerv3 (0.04510211 -0.01202838 -0.01142264)
      PathPoint default: spine (-0.01820093 0.3208982 -0.03265836)
    Millard2012EquilibriumMuscle stern_mast: max_isometric_force=68.95 optimal_fiber_length=0.09345794
        tendon_slack_length=0.04856611 pennation_angle_at_optimal=0.2617994 minimum_activation=0.01
      PathPoint P1: spine (-0.0006057459 0.2828834 0.008307373)
      PathPoint P2: skull (-0.004413292 0.005996885 0.05564209)
    Millard2012EquilibriumMuscle stern_mast_L: max_isometric_force=68.95 optimal_fiber_length=0.09345794
        tendon_slack_length=0.04856611 pennation_angle_at_optimal=0.2617994 minimum_activation=0.01
      PathPoint P1: spine (-0.0006057459 0.2828834 -0.008307373)
      PathPoint P2: skull (-0.004413292 0.005996885 -0.05564209)
    Millard2012EquilibriumMuscle cleid_mast: max_isometric_force=34.475 optimal_fiber_length=0.09362303
        tendon_slack_length=0.03051244 pennation_angle_at_optimal=0.2617994 minimum_activation=0.01
      PathPoint P1: clavicle (0.00253757 0.00400268 0.0258898)
      PathPoint P2: skull (-0.004413292 0.005996885 0.05564209)
    Millard2012EquilibriumMuscle cleid_mast_L: max_isometric_force=34.475 optimal_fiber_length=0.09362303
        tendon_slack_length=0.03051244 pennation_angle_at_optimal=0.2617994 minimum_activation=0.01
      PathPoint P1: lclavicle (0.003183677 0.004447301 -0.02888284)
      PathPoint P2: skull (-0.004413292 0.005996885 -0.05564209)
    Millard2012EquilibriumMuscle cleid_occ: max_isometric_force=34.475 optimal_fiber_length=0.09356609
        tendon_slack_length=0.06018292 pennation_angle_at_optimal=0.2617994 minimum_activation=0.01
      PathPoint P1: clavicle (0.00253757 0.00400268 0.0258898)
      PathPoint P2: skull (-0.0302873 0.01990308 0.05745933)
    Millard2012EquilibriumMuscle cleid_occ_L: max_isometric_force=34.475 optimal_fiber_length=0.09356609
        tendon_slack_length=0.06018292 pennation_angle_at_optimal=0.2617994 minimum_activation=0.01
      PathPoint P1: lclavicle (0.003183677 0.004447301 -0.02888284)
      PathPoint P2: skull (-0.0302873 0.01990308 -0.05745933)
    Millard2012EquilibriumMuscle scalenus_ant: max_isometric_force=51.45 optimal_fiber_length=0.03634476
        tendon_slack_length=0.04622793 pennation_angle_at_optimal=0.1745329 minimum_activation=0.01
      PathPoint P1: spine (-0.01850987 0.2876947 0.04577709)
      PathPoint P2: cerv4 (0.006169955 0.006836276 0.02010211)
    Millard2012EquilibriumMuscle scalenus_ant_L: max_isometric_force=51.45 optimal_fiber_length=0.03634476
        tendon_slack_length=0.04622793 pennation_angle_at_optimal=0.1745329 minimum_activation=0.01
      PathPoint P1: spine (-0.01850987 0.2876947 -0.04577709)
      PathPoint P2: cerv4 (0.006169955 0.006836276 -0.02010211)
    Millard2012EquilibriumMuscle scalenus_med: max_isometric_force=72.1 optimal_fiber_length=0.04326757
        tendon_slack_length=0.05322603 pennation_angle_at_optimal=0.1745329 minimum_activation=0.01
      PathPoint P1: spine (-0.02940464 0.2971011 0.05425753)
      PathPoint P2: cerv3 (-0.007805469 0.008489097 0.01833679)
    Millard2012EquilibriumMuscle scalenus_med_L: max_isometric_force=72.1 optimal_fiber_length=0.04326757
        tendon_slack_length=0.05322603 pennation_angle_at_optimal=0.1745329 minimum_activation=0.01
      PathPoint P1: spine (-0.02940464 0.2971011 -0.05425753)
      PathPoint P2: cerv3 (-0.007805469 0.008489097 -0.01833679)
    Millard2012EquilibriumMuscle scalenus_post: max_isometric_force=54.95 optimal_fiber_length=0.05365178
        tendon_slack_length=0.06303652 pennation_angle_at_optimal=0.1745329 minimum_activation=0.01
      PathPoint P1: spine (-0.03148148 0.2705954 0.09190031)
      PathPoint P2: cerv5 (-0.002769124 0.01186397 0.02223953)
    Millard2012EquilibriumMuscle scalenus_post_L: max_isometric_force=54.95 optimal_fiber_length=0.05365178
        tendon_slack_length=0.06303652 pennation_angle_at_optimal=0.1745329 minimum_activation=0.01
      PathPoint P1: spine (-0.03148148 0.2705954 -0.09190031)
      PathPoint P2: cerv5 (-0.002769124 0.01186397 -0.02223953)
    Millard2012EquilibriumMuscle long_cap_sklc4: max_isometric_force=33.32 optimal_fiber_length=0.03288335
        tendon_slack_length=0.03573641 pennation_angle_at_optimal=0.08726646 minimum_activation=0.01
      PathPoint P1: cerv4 (0.005642091 0.01007269 0.0209415)
      PathPoint P2: cerv3 (0.01035826 0.008731395 0.01641571)
      PathPoint P3: cerv2 (0.01488404 0.007173763 0.01278124)
      PathPoint P4: cerv1 (0.05034614 0.002673936 0.01002942)
      PathPoint P5: skull (0.008480443 0.01381101 0.003115265)
    Millard2012EquilibriumMuscle long_cap_sklc4_L: max_isometric_force=33.32 optimal_fiber_length=0.03288335
        tendon_slack_length=0.03573641 pennation_angle_at_optimal=0.08726646 minimum_activation=0.01
      PathPoint P1: cerv4 (0.005642091 0.01007269 -0.0209415)
      PathPoint P2: cerv3 (0.01035826 0.008731395 -0.01641571)
      PathPoint P3: cerv2 (0.01488404 0.007173763 -0.01278124)
      PathPoint P4: cerv1 (0.05034614 0.002673936 -0.01002942)
      PathPoint P5: skull (0.008480443 0.01381101 -0.003115265)
    Millard2012EquilibriumMuscle long_col_c1thx: max_isometric_force=9.57 optimal_fiber_length=0.07712876
        tendon_slack_length=0.07573468 pennation_angle_at_optimal=0.08726646 minimum_activation=0.01
      PathPoint P1: spine (-0.04229837 0.2624957 0.0032018)
      PathPoint P2: cerv7 (0.02007615 0.0009518865 0.003461405)
      PathPoint P3: cerv6 (0.02002423 0.001998962 0.003478712)
      PathPoint P4: cerv5 (0.01928003 0.001973001 0.00337487)
      PathPoint P5: cerv4 (0.019081 0.002864313 0.003279682)
      PathPoint P6: cerv3 (0.01914157 0.005218069 0.003184493)
      PathPoint P7: cerv2 (0.01836276 0.008419868 0.003080651)
      PathPoint P8: cerv1 (0.05040672 0.004170993 0.002682589)
    Millard2012EquilibriumMuscle long_col_c1thx_L: max_isometric_force=9.57 optimal_fiber_length=0.07712876
        tendon_slack_length=0.07573468 pennation_angle_at_optimal=0.08726646 minimum_activation=0.01
      PathPoint P1: spine (-0.04229837 0.2624957 -0.0032018)
      PathPoint P2: cerv7 (0.02007615 0.0009518865 -0.003461405)
      PathPoint P3: cerv6 (0.02002423 0.001998962 -0.003478712)
      PathPoint P4: cerv5 (0.01928003 0.001973001 -0.00337487)
      PathPoint P5: cerv4 (0.019081 0.002864313 -0.003279682)
      PathPoint P6: cerv3 (0.01914157 0.005218069 -0.003184493)
      PathPoint P7: cerv2 (0.01836276 0.008419868 -0.003080651)
      PathPoint P8: cerv1 (0.05040672 0.004170993 -0.002682589)
    Millard2012EquilibriumMuscle long_col_c1c5: max_isometric_force=9.57 optimal_fiber_length=0.03108342
        tendon_slack_length=0.03049412 pennation_angle_at_optimal=0.08726646 minimum_activation=0.01
      PathPoint P1: cerv5 (0.0057892 0.007692973 0.02059536)
      PathPoint P2: cerv4 (0.009700588 0.006481481 0.01791277)
      PathPoint P3: cerv2 (0.01504846 0.001375909 0.01181205)
      PathPoint P4: cerv1 (0.04954136 0.004170993 0.005365178)
    Millard2012EquilibriumMuscle long_col_c1c5_L: max_isometric_force=9.57 optimal_fiber_length=0.03108342
        tendon_slack_length=0.03049412 pennation_angle_at_optimal=0.08726646 minimum_activation=0.01
      PathPoint P1: cerv5 (0.0057892 0.007692973 -0.02059536)
      PathPoint P2: cerv4 (0.009700588 0.006481481 -0.01791277)
      PathPoint P3: cerv2 (0.01504846 0.001375909 -0.01181205)
      PathPoint P4: cerv1 (0.04954136 0.004170993 -0.005365178)
    Millard2012EquilibriumMuscle long_col_c5thx: max_isometric_force=9.57 optimal_fiber_length=0.04982693
        tendon_slack_length=0.04741606 pennation_angle_at_optimal=0.08726646 minimum_activation=0.01
      PathPoint P1: spine (-0.04310315 0.2621668 0.005884389)
      PathPoint P2: spine (-0.0417532 0.2771461 0.008843891)
      PathPoint P3: spine (-0.03951194 0.2895725 0.01156975)
      PathPoint P4: spine (-0.03864659 0.2973347 0.0130495)
      PathPoint P5: spine (-0.03668224 0.3096487 0.01538595)
      PathPoint P6: cerv7 (0.009614053 0.006325718 0.0171253)
      PathPoint P7: cerv6 (0.008316026 0.006169955 0.01917619)
      PathPoint P8: cerv5 (0.0057892 0.007692973 0.02059536)
    Millard2012EquilibriumMuscle long_col_c5thx_L: max_isometric_force=9.57 optimal_fiber_length=0.04982693
        tendon_slack_length=0.04741606 pennation_angle_at_optimal=0.08726646 minimum_activation=0.01
      PathPoint P1: spine (-0.04310315 0.2621668 -0.005884389)
      PathPoint P2: spine (-0.0417532 0.2771461 -0.008843891)
      PathPoint P3: spine (-0.03951194 0.2895725 -0.01156975)
      PathPoint P4: spine (-0.03864659 0.2973347 -0.0130495)
      PathPoint P5: spine (-0.03668224 0.3096487 -0.01538595)
      PathPoint P6: cerv7 (0.009614053 0.006325718 -0.0171253)
      PathPoint P7: cerv6 (0.008316026 0.006169955 -0.01917619)
      PathPoint P8: cerv5 (0.0057892 0.007692973 -0.02059536)
    Millard2012EquilibriumMuscle splen_cap_sklc6: max_isometric_force=49.51 optimal_fiber_length=0.08220838
        tendon_slack_length=0.02251038 pennation_angle_at_optimal=0 minimum_activation=0.01
      PathPoint P1: cerv6 (-0.04205607 0.01425234 0.002639322)
      PathPoint P2: skull (-0.05334026 0.01659744 0.03807546)
    Millard2012EquilibriumMuscle splen_cap_sklc6_L: max_isometric_force=49.51 optimal_fiber_length=0.08220838
        tendon_slack_length=0.02251038 pennation_angle_at_optimal=0 minimum_activation=0.01
      PathPoint P1: cerv6 (-0.04205607 0.01425234 -0.002639322)
      PathPoint P2: skull (-0.05334026 0.01659744 -0.03807546)
    Millard2012EquilibriumMuscle splen_cap_sklthx: max_isometric_force=49.51 optimal_fiber_length=0.08220838
        tendon_slack_length=0.07083853 pennation_angle_at_optimal=0 minimum_activation=0.01
      PathPoint P1: spine (-0.08985808 0.2933714 0.002596054)
      PathPoint P2: skull (-0.03475251 0.009518865 0.046928)
    Millard2012EquilibriumMuscle splen_cap_sklthx_L: max_isometric_force=49.51 optimal_fiber_length=0.08220838
        tendon_slack_length=0.07083853 pennation_angle_at_optimal=0 minimum_activation=0.01
      PathPoint P1: spine (-0.08985808 0.2933714 -0.002596054)
      PathPoint P2: skull (-0.03475251 0.009518865 -0.046928)
    Millard2012EquilibriumMuscle splen_cerv_c3thx: max_isometric_force=49.51 optimal_fiber_length=0.08220838
        tendon_slack_length=0.09383697 pennation_angle_at_optimal=0 minimum_activation=0.01
      PathPoint P1: spine (-0.1111803 0.2269124 0.00354794)
      PathPoint P2: cerv3 (-0.006810315 0.008696781 0.02046556)
    Millard2012EquilibriumMuscle splen_cerv_c3thx_L: max_isometric_force=49.51 optimal_fiber_length=0.08220838
        tendon_slack_length=0.09383697 pennation_angle_at_optimal=0 minimum_activation=0.01
      PathPoint P1: spine (-0.1111803 0.2269124 -0.00354794)
      PathPoint P2: cerv3 (-0.006810315 0.008696781 -0.02046556)
    Millard2012EquilibriumMuscle semi_cap_sklc5: max_isometric_force=64.05 optimal_fiber_length=0.05884389
        tendon_slack_length=0.04029249 pennation_angle_at_optimal=0.08726646 minimum_activation=0.01
      PathPoint P1: cerv5 (-0.008056421 0.009986154 0.02033576)
      PathPoint P2: skull (-0.06439079 0.01730703 0.01557632)
    Millard2012EquilibriumMuscle semi_cap_sklc5_L: max_isometric_force=64.05 optimal_fiber_length=0.05884389
        tendon_slack_length=0.04029249 pennation_angle_at_optimal=0.08726646 minimum_activation=0.01
      PathPoint P1: cerv5 (-0.008056421 0.009986154 -0.02033576)
      PathPoint P2: skull (-0.06439079 0.01730703 -0.01557632)
    Millard2012EquilibriumMuscle semi_cap_sklthx: max_isometric_force=64.05 optimal_fiber_length=0.05884389
        tendon_slack_length=0.05961405 pennation_angle_at_optimal=0.08726646 minimum_activation=0.01
      PathPoint P1: spine (-0.07389235 0.3265144 0.03002769)
      PathPoint P2: skull (-0.0663811 0.01730703 0.0096054)
    Millard2012EquilibriumMuscle semi_cap_sklthx_L: max_isometric_force=64.05 optimal_fiber_length=0.05884389
        tendon_slack_length=0.05961405 pennation_angle_at_optimal=0.08726646 minimum_activation=0.01
      PathPoint P1: spine (-0.07389235 0.3265144 -0.03002769)
      PathPoint P2: skull (-0.0663811 0.01730703 -0.0096054)
    Millard2012EquilibriumMuscle semi_cerv_c3thx: max_isometric_force=64.05 optimal_fiber_length=0.05884389
        tendon_slack_length=0.02368813 pennation_angle_at_optimal=0.08726646 minimum_activation=0.01
      PathPoint P1: spine (-0.07698165 0.302847 0.02255971)
      PathPoint P2: cerv3 (-0.03516788 -0.002786431 0.002076843)
    Millard2012EquilibriumMuscle semi_cerv_c3thx_L: max_isometric_force=64.05 optimal_fiber_length=0.05884389
        tendon_slack_length=0.02368813 pennation_angle_at_optimal=0.08726646 minimum_activation=0.01
      PathPoint P1: spine (-0.07698165 0.302847 -0.02255971)
      PathPoint P2: cerv3 (-0.03516788 -0.002786431 -0.002076843)
    Millard2012EquilibriumMuscle longissi_cap_sklc6: max_isometric_force=31.18 optimal_fiber_length=0.06217549
        tendon_slack_length=0.0207217 pennation_angle_at_optimal=0 minimum_activation=0.01
      PathPoint P1: cerv6 (-0.00706992 0.01311007 0.02387504)
      PathPoint P2: skull (-0.02976809 0.004413292 0.04759432)
    Millard2012EquilibriumMuscle longissi_cap_sklc6_L: max_isometric_force=31.18 optimal_fiber_length=0.06217549
        tendon_slack_length=0.0207217 pennation_angle_at_optimal=0 minimum_activation=0.01
      PathPoint P1: cerv6 (-0.00706992 0.01311007 -0.02387504)
      PathPoint P2: skull (-0.02976809 0.004413292 -0.04759432)
    Millard2012EquilibriumMuscle longissi_cerv_c4thx: max_isometric_force=20.05 optimal_fiber_length=0.1140646
        tendon_slack_length=0.03662946 pennation_angle_at_optimal=0 minimum_activation=0.01
      PathPoint P1: spine (-0.09513673 0.2387158 0.02782105)
      PathPoint P2: spine (-0.09447906 0.2616649 0.02631533)
      PathPoint P3: spine (-0.08634476 0.2829007 0.02525961)
      PathPoint P4: spine (-0.07035306 0.322776 0.0241433)
      PathPoint P5: cerv4 (-0.006135341 0.01001211 0.02258567)
    Millard2012EquilibriumMuscle longissi_cerv_c4thx_L: max_isometric_force=20.05 optimal_fiber_length=0.1140646
        tendon_slack_length=0.03662946 pennation_angle_at_optimal=0 minimum_activation=0.01
      PathPoint P1: spine (-0.09513673 0.2387158 -0.02782105)
      PathPoint P2: spine (-0.09447906 0.2616649 -0.02631533)
      PathPoint P3: spine (-0.08634476 0.2829007 -0.02525961)
      PathPoint P4: spine (-0.07035306 0.322776 -0.0241433)
      PathPoint P5: cerv4 (-0.006135341 0.01001211 -0.02258567)
    Millard2012EquilibriumMuscle iliocost_cerv_c5rib: max_isometric_force=20.05 optimal_fiber_length=0.0700026
        tendon_slack_length=0.02224472 pennation_angle_at_optimal=0 minimum_activation=0.01
      PathPoint P1: spine (-0.08955521 0.2838093 0.04612323)
      PathPoint P2: spine (-0.07246452 0.3257009 0.03491693)
      PathPoint P3: cerv5 (-0.008134303 0.01088612 0.02249913)
    Millard2012EquilibriumMuscle iliocost_cerv_c5rib_L: max_isometric_force=20.05 optimal_fiber_length=0.0700026
        tendon_slack_length=0.02224472 pennation_angle_at_optimal=0 minimum_activation=0.01
      PathPoint P1: spine (-0.08955521 0.2838093 -0.04612323)
      PathPoint P2: spine (-0.07246452 0.3257009 -0.03491693)
      PathPoint P3: cerv5 (-0.008134303 0.01088612 -0.02249913)
    Millard2012EquilibriumMuscle rectcap_post_maj: max_isometric_force=32.62 optimal_fiber_length=0.032018
        tendon_slack_length=0.0197577 pennation_angle_at_optimal=0.08726646 minimum_activation=0.01
      PathPoint P1: cerv2 (-0.03147283 -0.005598823 0.002076843)
      PathPoint P2: skull (-0.05226722 0.007788162 0.01990308)
    Millard2012EquilibriumMuscle rectcap_post_maj_L: max_isometric_force=32.62 optimal_fiber_length=0.032018
        tendon_slack_length=0.0197577 pennation_angle_at_optimal=0.08726646 minimum_activation=0.01
      PathPoint P1: cerv2 (-0.03147283 -0.005598823 -0.002076843)
      PathPoint P2: skull (-0.05226722 0.007788162 -0.01990308)
    Millard2012EquilibriumMuscle rectcap_post_min: max_isometric_force=17.92 optimal_fiber_length=0.01644168
        tendon_slack_length=0.01462184 pennation_angle_at_optimal=0.08726646 minimum_activation=0.01
      PathPoint P1: cerv1 (6.057459e-5 0.0007788162 0.005278643)
      PathPoint P2: skull (-0.05771893 0.007788162 0.01254759)
    Millard2012EquilibriumMuscle rectcap_post_min_L: max_isometric_force=17.92 optimal_fiber_length=0.01644168
        tendon_slack_length=0.01462184 pennation_angle_at_optimal=0.08726646 minimum_activation=0.01
      PathPoint P1: cerv1 (6.057459e-5 0.0007788162 -0.005278643)
      PathPoint P2: skull (-0.05771893 0.007788162 -0.01254759)
    Millard2012EquilibriumMuscle obl_cap_sup: max_isometric_force=36.505 optimal_fiber_length=0.02163378
        tendon_slack_length=0.01766788 pennation_angle_at_optimal=0.1745329 minimum_activation=0.01
      PathPoint P1: cerv1 (0.03033056 0.003331603 0.03634476)
      PathPoint P2: skull (-0.04117342 0.008056421 0.03303911)
    Millard2012EquilibriumMuscle obl_cap_sup_L: max_isometric_force=36.505 optimal_fiber_length=0.02163378
        tendon_slack_length=0.01766788 pennation_angle_at_optimal=0.1745329 minimum_activation=0.01
      PathPoint P1: cerv1 (0.03033056 0.003331603 -0.03634476)
      PathPoint P2: skull (-0.04117342 0.008056421 -0.03303911)
    Millard2012EquilibriumMuscle obl_cap_inf: max_isometric_force=45.29 optimal_fiber_length=0.03288335
        tendon_slack_length=0.01350554 pennation_angle_at_optimal=0 minimum_activation=0.01
      PathPoint P1: cerv2 (-0.03147283 -0.005598823 0.004733472)
      PathPoint P2: cerv1 (0.02592593 0.003020076 0.03280547)
    Millard2012EquilibriumMuscle obl_cap_inf_L: max_isometric_force=45.29 optimal_fiber_length=0.03288335
        tendon_slack_length=0.01350554 pennation_angle_at_optimal=0 minimum_activation=0.01
      PathPoint P1: cerv2 (-0.03147283 -0.005598823 -0.004733472)
      PathPoint P2: cerv1 (0.02592593 0.003020076 -0.03280547)
    Millard2012EquilibriumMuscle levator_scap: max_isometric_force=76.3 optimal_fiber_length=0.09763612
        tendon_slack_length=0.0189008 pennation_angle_at_optimal=0 minimum_activation=0.01
      PathPoint P1: scapula (-0.0693332 0.00601471 -0.0931848)
      PathPoint P2: cerv2 (-0.01026307 0.006273797 0.0183541)
    Millard2012EquilibriumMuscle levator_scap_L: max_isometric_force=76.3 optimal_fiber_length=0.09763612
        tendon_slack_length=0.0189008 pennation_angle_at_optimal=0 minimum_activation=0.01
      PathPoint P1: lscapula (-0.08582545 -0.03190393 0.07171342)
      PathPoint P2: cerv2 (-0.01026307 0.006273797 -0.0183541)
    Millard2012EquilibriumMuscle trap_acr: max_isometric_force=376.95 optimal_fiber_length=0.07945744
        tendon_slack_length=0.06614141 pennation_angle_at_optimal=0 minimum_activation=0.01
      PathPoint P1: scapula (-0.0199229 0.000369096 -0.0121896)
      PathPoint P2: cerv7 (-0.04127726 0.01644168 0.002639322)
    Millard2012EquilibriumMuscle trap_acr_L: max_isometric_force=376.95 optimal_fiber_length=0.07945744
        tendon_slack_length=0.06614141 pennation_angle_at_optimal=0 minimum_activation=0.01
      PathPoint P1: lscapula (-0.02094356 -0.008064018 0.006479386)
      PathPoint P2: cerv7 (-0.04127726 0.01644168 -0.002639322)
    Millard2012EquilibriumMuscle trap_cl: max_isometric_force=77.6 optimal_fiber_length=0.07233971
        tendon_slack_length=0.1026724 pennation_angle_at_optimal=0.5235988 minimum_activation=0.01
      PathPoint P1: clavicle (-0.0163219 0.0184843 0.0727165)
      PathPoint P2: skull (-0.06949637 0.02253375 0.01145725)
    Millard2012EquilibriumMuscle trap_cl_L: max_isometric_force=77.6 optimal_fiber_length=0.07233971
        tendon_slack_length=0.1026724 pennation_angle_at_optimal=0.5235988 minimum_activation=0.01
      PathPoint P1: lclavicle (-0.02412374 0.01903642 -0.07130451)
      PathPoint P2: skull (-0.06949637 0.02253375 -0.01145725)
    Millard2012EquilibriumMuscle supmult-C4-5-C2: appliesForce=false max_isometric_force=14.14
        optimal_fiber_length=0.02076843 tendon_slack_length=0.01860505 pennation_angle_at_optimal=0
        minimum_activation=0.01
      PathPoint P1: cerv2 (-0.02856525 -0.009821738 0.004231568)
      PathPoint P2: cerv5 (-0.01160436 0.01725511 0.01987712)
    Millard2012EquilibriumMuscle supmult-C4-5-C2_L: appliesForce=false max_isometric_force=14.14
        optimal_fiber_length=0.02076843 tendon_slack_length=0.01860505 pennation_angle_at_optimal=0
        minimum_activation=0.01
      PathPoint P1: cerv2 (-0.02856525 -0.009821738 -0.004231568)
      PathPoint P2: cerv5 (-0.01160436 0.01725511 -0.01987712)
    Millard2012EquilibriumMuscle supmult-C5-6-C2: appliesForce=false max_isometric_force=22.18
        optimal_fiber_length=0.02120111 tendon_slack_length=0.02474905 pennation_angle_at_optimal=0
        minimum_activation=0.01
      PathPoint P1: cerv2 (-0.02937868 -0.009077535 0.004075805)
      PathPoint P2: cerv6 (-0.009994808 0.017982 0.02173763)
    Millard2012EquilibriumMuscle supmult-C5-6-C2_L: appliesForce=false max_isometric_force=22.18
        optimal_fiber_length=0.02120111 tendon_slack_length=0.02474905 pennation_angle_at_optimal=0
        minimum_activation=0.01
      PathPoint P1: cerv2 (-0.02937868 -0.009077535 -0.004075805)
      PathPoint P2: cerv6 (-0.009994808 0.017982 -0.02173763)
    Millard2012EquilibriumMuscle supmult-C6-7-C2: appliesForce=false max_isometric_force=18.79
        optimal_fiber_length=0.02362409 tendon_slack_length=0.02786431 pennation_angle_at_optimal=0
        minimum_activation=0.01
      PathPoint P1: cerv2 (-0.02940464 -0.009051575 0.004067151)
      PathPoint P2: cerv7 (-0.01053133 0.01826757 0.02308757)
    Millard2012EquilibriumMuscle supmult-C6-7-C2_L: appliesForce=false max_isometric_force=18.79
        optimal_fiber_length=0.02362409 tendon_slack_length=0.02786431 pennation_angle_at_optimal=0
        minimum_activation=0.01
      PathPoint P1: cerv2 (-0.02940464 -0.009051575 -0.004067151)
      PathPoint P2: cerv7 (-0.01053133 0.01826757 -0.02308757)
    Millard2012EquilibriumMuscle supmult-T1-C4: appliesForce=false max_isometric_force=64.05
        optimal_fiber_length=0.05884389 tendon_slack_length=0.02368467 pennation_angle_at_optimal=0.08726646
        minimum_activation=0.01
      PathPoint P1: cerv4 (-0.02631533 0.0007009346 0.003885427)
      PathPoint P2: spine (-0.07245587 0.323252 0.02756144)
    Millard2012EquilibriumMuscle supmult-T1-C4_L: appliesForce=false max_isometric_force=64.05
        optimal_fiber_length=0.05884389 tendon_slack_length=0.02368467 pennation_angle_at_optimal=0.08726646
        minimum_activation=0.01
      PathPoint P1: cerv4 (-0.02631533 0.0007009346 -0.003885427)
      PathPoint P2: spine (-0.07245587 0.323252 -0.02756144)
    Millard2012EquilibriumMuscle supmult-T1-C5: appliesForce=false max_isometric_force=64.05
        optimal_fiber_length=0.05884389 tendon_slack_length=0.02368467 pennation_angle_at_optimal=0.08726646
        minimum_activation=0.01
      PathPoint P1: cerv5 (-0.03071132 0.008506404 0.004387331)
      PathPoint P2: spine (-0.07143475 0.3213742 0.02583074)
    Millard2012EquilibriumMuscle supmult-T1-C5_L: appliesForce=false max_isometric_force=64.05
        optimal_fiber_length=0.05884389 tendon_slack_length=0.02368467 pennation_angle_at_optimal=0.08726646
        minimum_activation=0.01
      PathPoint P1: cerv5 (-0.03071132 0.008506404 -0.004387331)
      PathPoint P2: spine (-0.07143475 0.3213742 -0.02583074)
    Millard2012EquilibriumMuscle supmult-T2-C6: appliesForce=false max_isometric_force=64.05
        optimal_fiber_length=0.05884389 tendon_slack_length=0.02368467 pennation_angle_at_optimal=0.08726646
        minimum_activation=0.01
      PathPoint P1: cerv6 (-0.03205261 0.00963136 0.004248875)
      PathPoint P2: spine (-0.07683454 0.3039979 0.02391831)
    Millard2012EquilibriumMuscle supmult-T2-C6_L: appliesForce=false max_isometric_force=64.05
        optimal_fiber_length=0.05884389 tendon_slack_length=0.02368467 pennation_angle_at_optimal=0.08726646
        minimum_activation=0.01
      PathPoint P1: cerv6 (-0.03205261 0.00963136 -0.004248875)
      PathPoint P2: spine (-0.07683454 0.3039979 -0.02391831)
    Millard2012EquilibriumMuscle deepmult-C4-5-C2: appliesForce=false max_isometric_force=7.15
        optimal_fiber_length=0.01756663 tendon_slack_length=0.01315334 pennation_angle_at_optimal=0
        minimum_activation=0.01
      PathPoint P1: cerv2 (-0.01807719 -0.004300796 0.005183454)
      PathPoint P2: cerv5 (-0.01139668 0.01752336 0.01813776)
    Millard2012EquilibriumMuscle deepmult-C4-5-C2_L: appliesForce=false max_isometric_force=7.15
        optimal_fiber_length=0.01756663 tendon_slack_length=0.01315334 pennation_angle_at_optimal=0
        minimum_activation=0.01
      PathPoint P1: cerv2 (-0.01807719 -0.004300796 -0.005183454)
      PathPoint P2: cerv5 (-0.01139668 0.01752336 -0.01813776)
    Millard2012EquilibriumMuscle deepmult-C5-6-C3: appliesForce=false max_isometric_force=12.54
        optimal_fiber_length=0.016009 tendon_slack_length=0.01471097 pennation_angle_at_optimal=0
        minimum_activation=0.01
      PathPoint P1: cerv3 (-0.0184839 -0.002803738 0.005287297)
      PathPoint P2: cerv6 (-0.01002942 0.01819834 0.02042229)
    Millard2012EquilibriumMuscle deepmult-C5-6-C3_L: appliesForce=false max_isometric_force=12.54
        optimal_fiber_length=0.016009 tendon_slack_length=0.01471097 pennation_angle_at_optimal=0
        minimum_activation=0.01
      PathPoint P1: cerv3 (-0.0184839 -0.002803738 -0.005287297)
      PathPoint P2: cerv6 (-0.01002942 0.01819834 -0.02042229)
    Millard2012EquilibriumMuscle deepmult-C6-7-C4: appliesForce=false max_isometric_force=18.31
        optimal_fiber_length=0.01471097 tendon_slack_length=0.01505711 pennation_angle_at_optimal=0
        minimum_activation=0.01
      PathPoint P1: cerv4 (-0.01870024 -0.0001384562 0.005624784)
      PathPoint P2: cerv7 (-0.01105919 0.01819834 0.02170301)
    Millard2012EquilibriumMuscle deepmult-C6-7-C4_L: appliesForce=false max_isometric_force=18.31
        optimal_fiber_length=0.01471097 tendon_slack_length=0.01505711 pennation_angle_at_optimal=0
        minimum_activation=0.01
      PathPoint P1: cerv4 (-0.01870024 -0.0001384562 -0.005624784)
      PathPoint P2: cerv7 (-0.01105919 0.01819834 -0.02170301)
    Millard2012EquilibriumMuscle deepmult-T1-C5: appliesForce=false max_isometric_force=64.05
        optimal_fiber_length=0.05884389 tendon_slack_length=0.02368467 pennation_angle_at_optimal=0.08726646
        minimum_activation=0.01
      PathPoint P1: cerv5 (-0.02406542 0.008757355 0.005001731)
      PathPoint P2: spine (-0.07185877 0.3237193 0.02667013)
    Millard2012EquilibriumMuscle deepmult-T1-C5_L: appliesForce=false max_isometric_force=64.05
        optimal_fiber_length=0.05884389 tendon_slack_length=0.02368467 pennation_angle_at_optimal=0.08726646
        minimum_activation=0.01
      PathPoint P1: cerv5 (-0.02406542 0.008757355 -0.005001731)
      PathPoint P2: spine (-0.07185877 0.3237193 -0.02667013)
    Millard2012EquilibriumMuscle deepmult-T1-C6: appliesForce=false max_isometric_force=64.05
        optimal_fiber_length=0.05884389 tendon_slack_length=0.02368467 pennation_angle_at_optimal=0.08726646
        minimum_activation=0.01
      PathPoint P1: cerv6 (-0.02384908 0.009354448 0.005010384)
      PathPoint P2: spine (-0.07096746 0.3209502 0.02507788)
    Millard2012EquilibriumMuscle deepmult-T1-C6_L: appliesForce=false max_isometric_force=64.05
        optimal_fiber_length=0.05884389 tendon_slack_length=0.02368467 pennation_angle_at_optimal=0.08726646
        minimum_activation=0.01
      PathPoint P1: cerv6 (-0.02384908 0.009354448 -0.005010384)
      PathPoint P2: spine (-0.07096746 0.3209502 -0.02507788)
    Millard2012EquilibriumMuscle deepmult-T2-C7: appliesForce=false max_isometric_force=64.05
        optimal_fiber_length=0.05884389 tendon_slack_length=0.02368467 pennation_angle_at_optimal=0.08726646
        minimum_activation=0.01
      PathPoint P1: cerv7 (-0.02333853 0.0105919 0.005010384)
      PathPoint P2: spine (-0.07688647 0.3038075 0.02397889)
    Millard2012EquilibriumMuscle deepmult-T2-C7_L: appliesForce=false max_isometric_force=64.05
        optimal_fiber_length=0.05884389 tendon_slack_length=0.02368467 pennation_angle_at_optimal=0.08726646
        minimum_activation=0.01
      PathPoint P1: cerv7 (-0.02333853 0.0105919 -0.005010384)
      PathPoint P2: spine (-0.07688647 0.3038075 -0.02397889)
    Millard2012EquilibriumMuscle deepmult-T2-T1: appliesForce=false max_isometric_force=64.05
        optimal_fiber_length=0.05884389 tendon_slack_length=0.02368467 pennation_angle_at_optimal=0.08726646
        minimum_activation=0.01
      PathPoint P1: spine (-0.07538075 0.3021201 0.02124438)
      PathPoint P2: spine (-0.07342506 0.303297 0.003366217)
    Millard2012EquilibriumMuscle deepmult-T2-T1_L: appliesForce=false max_isometric_force=64.05
        optimal_fiber_length=0.05884389 tendon_slack_length=0.02368467 pennation_angle_at_optimal=0.08726646
        minimum_activation=0.01
      PathPoint P1: spine (-0.07538075 0.3021201 -0.02124438)
      PathPoint P2: spine (-0.07342506 0.303297 -0.003366217)
    BushingForce [values shared by the 8 below unless stated]: translational_stiffness=(0 0 0) [N/m]
        translational_damping=(0 0 0) [N/(m/s)]
    BushingForce Spine_C7_Bushing: socket_frame1=/bodyset/spine socket_frame2=/bodyset/cerv7
        rotational_stiffness=(27.5 13.75 27.5) [Nm/rad] rotational_damping=(2.75 1.375 2.75) [Nm/(rad/s)]
    BushingForce C7_C6_Bushing: socket_frame1=/bodyset/cerv7 socket_frame2=/bodyset/cerv6
        rotational_stiffness=(27.5 13.75 27.5) rotational_damping=(2.75 1.375 2.75)
    BushingForce C6_C5_Bushing: socket_frame1=/bodyset/cerv6 socket_frame2=/bodyset/cerv5
        rotational_stiffness=(27.5 13.75 27.5) rotational_damping=(2.75 1.375 2.75)
    BushingForce C5_C4_Bushing: socket_frame1=/bodyset/cerv5 socket_frame2=/bodyset/cerv4
        rotational_stiffness=(23.2 11.6 23.2) rotational_damping=(2.32 1.16 2.32)
    BushingForce C4_C3_Bushing: socket_frame1=/bodyset/cerv4 socket_frame2=/bodyset/cerv3
        rotational_stiffness=(23.2 11.6 23.2) rotational_damping=(2.32 1.16 2.32)
    BushingForce C3_C2_Bushing: socket_frame1=/bodyset/cerv3 socket_frame2=/bodyset/cerv2
        rotational_stiffness=(7.8 3.9 7.8) rotational_damping=(0.78 0.39 0.78)
    BushingForce C2_C1_Bushing: socket_frame1=/bodyset/cerv2 socket_frame2=/bodyset/cerv1
        rotational_stiffness=(7.8 3.9 7.8) rotational_damping=(0.78 0.39 0.78)
    BushingForce C1_skull_Bushing: socket_frame1=/bodyset/cerv1 socket_frame2=/bodyset/skull
        rotational_stiffness=(7.8 3.9 7.8) rotational_damping=(0.78 0.39 0.78)
  MarkerSet:
    Marker CV7: spine (-0.0899272 0.320237 0)
    Marker TV8: spine (-0.111177 0.133048 0)
    Marker SXS: thorax (0.06976344 -0.1643116 0)
    Marker ClavicleMassCenter: clavicle (-0.02172004 0.01007002 0.06704027)
    Marker acc: clavicle (-0.02830113 0.0185521 0.1170337)
    Marker sc: clavicle (0 0 0)
    Marker ScapulaMassCenter: scapula (-0.04611996 -0.03190012 -0.0456502)
    Marker ScapulaThoracicContactPt: scapula (-0.08412859 -0.03848383 -0.05988926)
    Marker RCAJ: scapula (-0.01192471 -0.001966882 -0.01764)
    Marker LCAJ: lscapula (-0.0140595 -0.00854809 0.0136564)
    Marker AI: scapula (-0.1153929 -0.1164373 -0.09102378)
    Marker TS: scapula (-0.09218603 -0.002484038 -0.1058868)
    Marker AA: scapula (-0.04480688 0.003469836 0.01724282)
    Marker HumerusMassCenter: humerus (0.005370027 -0.1149298 -0.00260999)
    Marker GH: humerus (0 0 0)
    Marker RHLE: humerus (0.001346959 -0.2856254 0.0222489)
    Marker RHME: humerus (0.001484159 -0.2820152 -0.0446511)
    Marker centelbow: humerus (0.00141556 -0.2838203 -0.0112011)
    Marker centijc7: thorax (-0.04149992 0.01630006 0)
    Marker centpxt8: thorax (-0.02069628 -0.1593718 0)
    Marker SJN: thorax (0 0 0)
    Marker RAH: skull (0.08531142 0.09848363 0.03672664)
    Marker LAH: skull (0.08531142 0.09848363 -0.03672664)
    Marker RPH: skull (-0.07265839 0.02628315 0.04651046)
    Marker LPH: skull (-0.07265839 0.02628315 -0.04651046)
    Marker centLPHRPH: skull (-0.07265839 0.02628315 0)
