# OpenSim document version 40000
ScaleTool ThoracoscapularShoulderModel-scaled-scaled:
  mass: 45.76404 [kg]
  height: -1
  age: -1
  ModelScaler:
    apply: true
    scaling_order: manualScale
    time_range: -1 -1
    preserve_mass_distribution: false
    ScaleSet:
      Scale: scales=(1 1 0.875) segment=humerus apply=true
  MarkerPlacer:
    apply: false
    time_range: -1 -1
    max_marker_movement: -1
    IKTaskSet:
      IKMarkerTask CV7: apply=true weight=1
      IKMarkerTask TV8: apply=true weight=1
      IKMarkerTask SXS: apply=true weight=1
      IKMarkerTask ScapulaThoracicContactPt: apply=true weight=1
      IKMarkerTask RCAJ: apply=true weight=1
      IKMarkerTask LCAJ: apply=true weight=1
      IKMarkerTask AI: apply=true weight=1
      IKMarkerTask TS: apply=true weight=1
      IKMarkerTask AA: apply=true weight=1
      IKMarkerTask GH: apply=true weight=1
      IKMarkerTask RHLE: apply=true weight=1
      IKMarkerTask RHME: apply=true weight=1
      IKMarkerTask centelbow: apply=true weight=1
      IKMarkerTask centijc7: apply=true weight=1
      IKMarkerTask centpxt8: apply=true weight=1
      IKMarkerTask SJN: apply=true weight=1
      IKMarkerTask RAH: apply=true weight=1
      IKMarkerTask LAH: apply=true weight=1
      IKMarkerTask RPH: apply=true weight=1
      IKMarkerTask LPH: apply=true weight=1
      IKMarkerTask centLPHRPH: apply=true weight=1
