# OpenSim document version 40000
ScaleTool ThoracoscapularShoulderModel-scaled:
  mass: 43.83 [kg]
  height: -1
  age: -1
  ModelScaler:
    apply: false
    scaling_order: measurements manualScale
    marker_file: C:/Users/maria/MIPT/OpenSim/My_model/Static_pose/../ExperimentalDataTRC/Static_with_additional_points_new.trc
    time_range: 0 4.72
    preserve_mass_distribution: false
    MeasurementSet:
      Measurement Skull: apply=false
        MarkerPair: markers=(LAH RAH)
      Measurement Neck: apply=false
        MarkerPair: markers=(SJN LAH)
      Measurement Y_hum: apply=true
        MarkerPair: markers=(centelbow GH)
        BodyScale humerus: axes=Y
      Measurement Z_hum: apply=false
        MarkerPair: markers=(RHLE RHME)
      Measurement X_hum: apply=true
        MarkerPair: markers=(RHLE RHME)
        MarkerPair: markers=(centelbow GH)
        BodyScale humerus: axes=(X Z)
      Measurement Y_thorax: apply=true
        MarkerPair: markers=(centpxt8 centijc7)
        BodyScale thorax: axes=Y
      Measurement X_thorax: apply=false
        MarkerPair: markers=(SXS TV8)
      Measurement Z_scap: apply=true
        MarkerPair: markers=(TS AA)
        BodyScale scapula: axes=Z
        BodyScale lscapula: axes=Z
      Measurement X_scap: apply=false
        MarkerPair: markers=(TS AA)
        MarkerPair: markers=(AI TS)
      Measurement Y_scap: apply=true
        MarkerPair: markers=(AI TS)
        BodyScale scapula: axes=Y
        BodyScale lscapula: axes=Y
      Measurement Z_clav: apply=false
        MarkerPair: markers=(SJN RCAJ)
      Measurement Skull_2: apply=false
        MarkerPair: markers=(RPH LPH)
      Measurement Skull_3: apply=true
        MarkerPair: markers=(RAH RPH)
        MarkerPair: markers=(LAH LPH)
        BodyScale skull: axes=(X Y Z)
        BodyScale jaw: axes=(X Y Z)
      Measurement X_thorax_2: apply=true
        MarkerPair: markers=(SJN CV7)
        BodyScale thorax: axes=X
      Measurement Z_thorax: apply=true
        MarkerPair: markers=(RCAJ LCAJ)
        BodyScale thorax: axes=Z
        BodyScale clavicle: axes=(X Y Z)
        BodyScale lclavicle: axes=(X Y Z)
      Measurement Neck2: apply=false
        MarkerPair: markers=(CV7 RAH)
      Measurement Skull_4: apply=false
        MarkerPair: markers=(RAH LAH)
        MarkerPair: markers=(RPH LPH)
      Measurement Neck_3: apply=true
        MarkerPair: markers=(CV7 centRPHLPH)
        BodyScale cerv7: axes=(X Y Z)
        BodyScale cerv6: axes=(X Y Z)
        BodyScale cerv5: axes=(X Y Z)
        BodyScale cerv4: axes=(X Y Z)
        BodyScale cerv3: axes=(X Y Z)
        BodyScale cerv2: axes=(X Y Z)
        BodyScale cerv1: axes=(X Y Z)
      Measurement spine: apply=true
        MarkerPair: markers=(CV7 TV8)
        BodyScale spine: axes=(X Y Z)
      Measurement X_scap_new: apply=true
        MarkerPair: markers=(RCAJ AA)
        BodyScale scapula: axes=X
        BodyScale lscapula: axes=X
    ScaleSet:
      Scale: scales=(1.32049 1.53064 1.08105) segment=spine apply=true
      Scale: scales=(1.52 1.4935 1.31862) segment=thorax apply=true
      Scale: scales=(1.32049 1.04697 1.08105) segment=cerv7 apply=true
      Scale: scales=(1.32049 1.04697 1.08105) segment=cerv6 apply=true
      Scale: scales=(1.32049 1.04697 1.08105) segment=cerv5 apply=true
      Scale: scales=(1.32049 1.04697 1.08105) segment=cerv4 apply=true
      Scale: scales=(1.32049 1.04697 1.08105) segment=cerv3 apply=true
      Scale: scales=(1.32049 1.04697 1.08105) segment=cerv2 apply=true
      Scale: scales=(1.32049 1.04697 1.08105) segment=cerv1 apply=true
      Scale: scales=(1.35 1.35 1.35) segment=clavicle apply=true
      Scale: scales=(1.469 1.26235 0.951082) segment=scapula apply=true
      Scale: scales=(1.44148 1.05928 1.60148) segment=humerus apply=true
      Scale: scales=(1.40218 1.05928 1.40218) segment=ulna apply=true
      Scale: scales=(1.40218 1.05928 1.40218) segment=radius apply=true
      Scale: scales=(1.40218 1.05928 1.40218) segment=hand apply=true
      Scale: scales=(1.469 1.26235 0.951082) segment=lscapula apply=true
      Scale: scales=(1.35 1.35 1.35) segment=lclavicle apply=true
  MarkerPlacer:
    apply: true
    marker_file: C:/Users/maria/MIPT/OpenSim/My_model/Static_pose/../ExperimentalDataTRC/Static_with_additional_points_new.trc
    time_range: 1 1.01
    max_marker_movement: -1
    IKTaskSet:
      IKMarkerTask CV7: apply=true weight=0.01
      IKMarkerTask TV8: apply=true weight=0.01
      IKMarkerTask SXS: apply=true weight=0
      IKMarkerTask ScapulaThoracicContactPt: apply=true weight=0
      IKMarkerTask RCAJ: apply=true weight=0
      IKMarkerTask LCAJ: apply=true weight=0
      IKMarkerTask AI: apply=true weight=0
      IKMarkerTask TS: apply=true weight=0
      IKMarkerTask AA: apply=true weight=0
      IKMarkerTask GH: apply=true weight=0
      IKMarkerTask RHLE: apply=true weight=0
      IKMarkerTask RHME: apply=true weight=0
      IKMarkerTask centelbow: apply=true weight=0
      IKMarkerTask centijc7: apply=true weight=0
      IKMarkerTask centpxt8: apply=true weight=0
      IKMarkerTask SJN: apply=true weight=0.01
      IKMarkerTask RAH: apply=true weight=0
      IKMarkerTask LAH: apply=true weight=0
      IKMarkerTask RPH: apply=true weight=0
      IKMarkerTask LPH: apply=true weight=0
      IKMarkerTask centLPHRPH: apply=true weight=0
      IKCoordinateTask [values shared by the 39 below unless stated]: weight=1 value_type=default_value value=0
      IKCoordinateTask ground_spine_rot_x: apply=true
      IKCoordinateTask ground_spine_rot_y: apply=true
      IKCoordinateTask ground_spine_rot_z: apply=true
      IKCoordinateTask ground_spine_tx: apply=true
      IKCoordinateTask ground_spine_ty: apply=true
      IKCoordinateTask ground_spine_tz: apply=true
      IKCoordinateTask clav_prot: apply=true
      IKCoordinateTask clav_elev: apply=true
      IKCoordinateTask scapula_abduction: apply=true
      IKCoordinateTask scapula_elevation: apply=true
      IKCoordinateTask scapula_upward_rot: apply=true
      IKCoordinateTask scapula_winging: apply=true
      IKCoordinateTask plane_elv: apply=true
      IKCoordinateTask shoulder_elv: apply=true
      IKCoordinateTask axial_rot: apply=true
      IKCoordinateTask pitch2: apply=true
      IKCoordinateTask roll2: apply=true
      IKCoordinateTask yaw2: apply=true
      IKCoordinateTask aux7jnt_r3: apply=false
      IKCoordinateTask aux7jnt_r1: apply=false
      IKCoordinateTask aux7jnt_r2: apply=false
      IKCoordinateTask aux6jnt_r3: apply=false
      IKCoordinateTask aux6jnt_r1: apply=false
      IKCoordinateTask aux6jnt_r2: apply=false
      IKCoordinateTask aux5jnt_r3: apply=false
      IKCoordinateTask aux5jnt_r1: apply=false
      IKCoordinateTask aux5jnt_r2: apply=false
      IKCoordinateTask aux4jnt_r3: apply=false
      IKCoordinateTask aux4jnt_r1: apply=false
      IKCoordinateTask aux4jnt_r2: apply=false
      IKCoordinateTask aux3jnt_r3: apply=false
      IKCoordinateTask aux3jnt_r1: apply=false
      IKCoordinateTask aux3jnt_r2: apply=false
      IKCoordinateTask pitch1: apply=true
      IKCoordinateTask roll1: apply=true
      IKCoordinateTask yaw1: apply=true
      IKCoordinateTask aux1jnt_r3: apply=false
      IKCoordinateTask aux1jnt_r1: apply=false
      IKCoordinateTask aux1jnt_r2: apply=false
