# OpenSim document version 40000
ScaleTool ThoracoscapularShoulderModel-scaled:
  mass: 43.83 [kg]
  height: -1
  age: -1
  ModelScaler:
    apply: true
    scaling_order: measurements manualScale
    marker_file: ExperimentalDataTRC/Static_with_additional_points_new.trc
    time_range: 0 4.72
    preserve_mass_distribution: false
    MeasurementSet:
      Measurement Skull: apply=false
        MarkerPair: markers=(LAH RAH)
      Measurement Neck: apply=false
        MarkerPair: markers=(SJN LAH)
      Measurement Y_hum: apply=true
        MarkerPair: markers=(centelbow GH)
        BodyScale humerus: axes=Y
      Measurement Z_hum: apply=false
        MarkerPair: markers=(RHLE RHME)
      Measurement X_hum: apply=true
        MarkerPair: markers=(RHLE RHME)
        MarkerPair: markers=(centelbow GH)
        BodyScale humerus: axes=(X Z)
      Measurement Y_thorax: apply=true
        MarkerPair: markers=(centpxt8 centijc7)
        BodyScale thorax: axes=Y
      Measurement X_thorax: apply=false
        MarkerPair: markers=(SXS TV8)
      Measurement Z_scap: apply=true
        MarkerPair: markers=(TS AA)
        BodyScale scapula: axes=Z
        BodyScale lscapula: axes=Z
      Measurement X_scap: apply=false
        MarkerPair: markers=(TS AA)
        MarkerPair: markers=(AI TS)
      Measurement Y_scap: apply=true
        MarkerPair: markers=(AI TS)
        BodyScale scapula: axes=Y
        BodyScale lscapula: axes=Y
      Measurement Z_clav: apply=false
        MarkerPair: markers=(SJN RCAJ)
      Measurement Skull_2: apply=false
        MarkerPair: markers=(RPH LPH)
      Measurement Skull_3: apply=true
        MarkerPair: markers=(RAH RPH)
        MarkerPair: markers=(LAH LPH)
        BodyScale skull: axes=(X Y Z)
        BodyScale jaw: axes=(X Y Z)
      Measurement X_thorax_2: apply=true
        MarkerPair: markers=(SJN CV7)
        BodyScale thorax: axes=X
      Measurement Z_thorax: apply=true
        MarkerPair: markers=(RCAJ LCAJ)
        BodyScale thorax: axes=Z
        BodyScale clavicle: axes=(X Y Z)
        BodyScale lclavicle: axes=(X Y Z)
      Measurement Neck2: apply=false
        MarkerPair: markers=(CV7 RAH)
      Measurement Skull_4: apply=false
        MarkerPair: markers=(RAH LAH)
        MarkerPair: markers=(RPH LPH)
      Measurement Neck_3: apply=true
        MarkerPair: markers=(CV7 centRPHLPH)
        BodyScale cerv7: axes=(X Y Z)
        BodyScale cerv6: axes=(X Y Z)
        BodyScale cerv5: axes=(X Y Z)
        BodyScale cerv4: axes=(X Y Z)
        BodyScale cerv3: axes=(X Y Z)
        BodyScale cerv2: axes=(X Y Z)
        BodyScale cerv1: axes=(X Y Z)
      Measurement spine: apply=true
        MarkerPair: markers=(CV7 TV8)
        BodyScale spine: axes=(X Y Z)
      Measurement X_scap_new: apply=true
        MarkerPair: markers=(RCAJ AA)
        BodyScale scapula: axes=X
        BodyScale lscapula: axes=X
    ScaleSet:
      Scale: scales=(1.32049 1.53064 1.08105) segment=spine apply=true
      Scale: scales=(1.52 1.4935 1.31862) segment=thorax apply=true
      Scale: scales=(1.32049 1.04697 1.08105) segment=cerv7 apply=true
      Scale: scales=(1.32049 1.04697 1.08105) segment=cerv6 apply=true
      Scale: scales=(1.32049 1.04697 1.08105) segment=cerv5 apply=true
      Scale: scales=(1.32049 1.04697 1.08105) segment=cerv4 apply=true
      Scale: scales=(1.32049 1.04697 1.08105) segment=cerv3 apply=true
      Scale: scales=(1.32049 1.04697 1.08105) segment=cerv2 apply=true
      Scale: scales=(1.32049 1.04697 1.08105) segment=cerv1 apply=true
      Scale: scales=(1.37 1.37 1.37) segment=clavicle apply=true
      Scale: scales=(1.469 1.26235 0.951082) segment=scapula apply=true
      Scale: scales=(1.44148 1.05928 1.60148) segment=humerus apply=true
      Scale: scales=(1.40218 1.05928 1.40218) segment=ulna apply=true
      Scale: scales=(1.40218 1.05928 1.40218) segment=radius apply=true
      Scale: scales=(1.40218 1.05928 1.40218) segment=hand apply=true
      Scale: scales=(1.469 1.26235 0.951082) segment=lscapula apply=true
      Scale: scales=(1.37 1.37 1.37) segment=lclavicle apply=true
  MarkerPlacer:
    apply: false
    marker_file: ExperimentalDataTRC/Static_with_additional_points_new.trc
    time_range: 0 0.1
    max_marker_movement: -1
    IKTaskSet:
      IKMarkerTask CV7: apply=false weight=1
      IKMarkerTask TV8: apply=false weight=1
      IKMarkerTask SXS: apply=false weight=1
      IKMarkerTask ClavicleMassCenter: apply=false weight=1
      IKMarkerTask acc: apply=false weight=1
      IKMarkerTask sc: apply=false weight=1
      IKMarkerTask ScapulaMassCenter: apply=false weight=1
      IKMarkerTask ScapulaThoracicContactPt: apply=false weight=1
      IKMarkerTask RCAJ: apply=true weight=1
      IKMarkerTask LCAJ: apply=false weight=0.3
      IKMarkerTask AI: apply=true weight=1
      IKMarkerTask TS: apply=true weight=1
      IKMarkerTask AA: apply=true weight=1
      IKMarkerTask HumerusMassCenter: apply=false weight=1
      IKMarkerTask GH: apply=false weight=1
      IKMarkerTask RHLE: apply=false weight=1
      IKMarkerTask RHME: apply=false weight=1
      IKMarkerTask centelbow: apply=false weight=1
      IKMarkerTask centijc7: apply=false weight=1
      IKMarkerTask centpxt8: apply=false weight=1
      IKMarkerTask SJN: apply=false weight=1
      IKMarkerTask RAH: apply=false weight=0.25
      IKMarkerTask LAH: apply=false weight=0.25
      IKMarkerTask RPH: apply=false weight=0.25
      IKMarkerTask LPH: apply=false weight=0.25
